// SBML level 3 version 2

model biocrnpyler_287046()
  // model units - substance: mole, time: second, volume: litre, area: square_metre, length: metre, extent: mole

  // Compartments:
  compartment default = 1e-6;

  // Species:
  species Core1_OFF in default = 0;
  species complex_Core1_ON in default = 0;
  species rna_rR1_i in default = 0;
  species dna_dA2 in default = 0;
  species rna_rR2 in default = 0;
  species protein_RNAP in default = 0;
  species protein_RNAseH in default = 0;
  species complex_Core1_AI in default = 0;
  species complex_Core1_ON_protein_RNAP in default = 0;
  species complex_Core1_OFF_protein_RNAP in default = 0;
  species complex_Core1_AI_protein_RNAseH in default = 0;
  species Core2_OFF in default = 0;
  species complex_Core2_ON in default = 0;
  species dna_dA1 in default = 0;
  species complex_Core2_AI in default = 0;
  species complex_Core2_ON_protein_RNAP in default = 0;
  species complex_Core2_OFF_protein_RNAP in default = 0;
  species complex_Core2_AI_protein_RNAseH in default = 0;

  // Reactions:
  r0: Core1_OFF + dna_dA2 => complex_Core1_ON; r0_k*Core1_OFF*dna_dA2;
    r0_k = 0.00394;
  r1: complex_Core1_ON + rna_rR2 => Core1_OFF + complex_Core1_AI; r1_k*complex_Core1_ON*rna_rR2;
    r1_k = 0.0696;
  r2: dna_dA2 + rna_rR2 => complex_Core1_AI; r2_k*dna_dA2*rna_rR2;
    r2_k = 0.0696;
  r3: complex_Core1_ON + protein_RNAP => complex_Core1_ON_protein_RNAP; r3_k*complex_Core1_ON*protein_RNAP;
    r3_k = 38.85714;
  r3_1: complex_Core1_ON_protein_RNAP => complex_Core1_ON + protein_RNAP; r3_1_k*complex_Core1_ON_protein_RNAP;
    r3_1_k = 10;
  r5: complex_Core1_ON_protein_RNAP => complex_Core1_ON + rna_rR1_i + protein_RNAP; r5_k*complex_Core1_ON_protein_RNAP;
    r5_k = 0.064;
  r6: Core1_OFF + protein_RNAP => complex_Core1_OFF_protein_RNAP; r6_k*Core1_OFF*protein_RNAP;
    r6_k = 9.530476;
  r6_1: complex_Core1_OFF_protein_RNAP => Core1_OFF + protein_RNAP; r6_1_k*complex_Core1_OFF_protein_RNAP;
    r6_1_k = 10;
  r8: complex_Core1_OFF_protein_RNAP => Core1_OFF + rna_rR1_i + protein_RNAP; r8_k*complex_Core1_OFF_protein_RNAP;
    r8_k = 0.007;
  r9: complex_Core1_AI + protein_RNAseH => complex_Core1_AI_protein_RNAseH; r9_k*complex_Core1_AI*protein_RNAseH;
    r9_k = 111.8242;
  r9_1: complex_Core1_AI_protein_RNAseH => complex_Core1_AI + protein_RNAseH; r9_1_k*complex_Core1_AI_protein_RNAseH;
    r9_1_k = 10;
  r11: complex_Core1_AI_protein_RNAseH => dna_dA2 + protein_RNAseH; r11_k*complex_Core1_AI_protein_RNAseH;
    r11_k = 0.176;
  r12: Core2_OFF + dna_dA1 => complex_Core2_ON; r12_k*Core2_OFF*dna_dA1;
    r12_k = 0.00394;
  r13: complex_Core2_ON + rna_rR1_i => Core2_OFF + complex_Core2_AI; r13_k*complex_Core2_ON*rna_rR1_i;
    r13_k = 0.0696;
  r14: dna_dA1 + rna_rR1_i => complex_Core2_AI; r14_k*dna_dA1*rna_rR1_i;
    r14_k = 0.0696;
  r15: complex_Core2_ON + protein_RNAP => complex_Core2_ON_protein_RNAP; r15_k*complex_Core2_ON*protein_RNAP;
    r15_k = 38.85714;
  r15_1: complex_Core2_ON_protein_RNAP => complex_Core2_ON + protein_RNAP; r15_1_k*complex_Core2_ON_protein_RNAP;
    r15_1_k = 10;
  r17: complex_Core2_ON_protein_RNAP => complex_Core2_ON + rna_rR2 + protein_RNAP; r17_k*complex_Core2_ON_protein_RNAP;
    r17_k = 0.064;
  r18: Core2_OFF + protein_RNAP => complex_Core2_OFF_protein_RNAP; r18_k*Core2_OFF*protein_RNAP;
    r18_k = 9.530476;
  r18_1: complex_Core2_OFF_protein_RNAP => Core2_OFF + protein_RNAP; r18_1_k*complex_Core2_OFF_protein_RNAP;
    r18_1_k = 10;
  r20: complex_Core2_OFF_protein_RNAP => Core2_OFF + rna_rR2 + protein_RNAP; r20_k*complex_Core2_OFF_protein_RNAP;
    r20_k = 0.007;
  r21: complex_Core2_AI + protein_RNAseH => complex_Core2_AI_protein_RNAseH; r21_k*complex_Core2_AI*protein_RNAseH;
    r21_k = 111.8242;
  r21_1: complex_Core2_AI_protein_RNAseH => complex_Core2_AI + protein_RNAseH; r21_1_k*complex_Core2_AI_protein_RNAseH;
    r21_1_k = 10;
  r23: complex_Core2_AI_protein_RNAseH => dna_dA1 + protein_RNAseH; r23_k*complex_Core2_AI_protein_RNAseH;
    r23_k = 0.176;

  // Unit definitions:
  unit square_metre = metre^2;
end
