// SBML level 3 version 2

model combined_model_of__combined_model_of__combined_model_of__external_reservoir_model_combined_model_of__rnaexp_membrane_combined_model_of__biocrnpyler_135091_combined_model_of__combined_model_of__external_reservoir_model_combined_model_of__rnaexp_membrane_combined_model_of__biocrnpyler_821483()
  // model units - substance: mole, time: second, volume: litre, area: square_metre, length: metre, extent: mole

  // Compartments:
  compartment cell_3_external_combined = 4e-6 litre;
  compartment cell_3_internal_combined = 1e-6 litre;
  compartment cell_4_external_combined = 2e-6 litre;
  compartment cell_4_internal_combined = 1e-6 litre;

  // Species:
  species rna_rR1_external_reservoir_model_1_combined in cell_3_external_combined = 100/cell_3_external_combined;
  species VirE2_b in cell_3_internal_combined = 1;
  species VirE2_b_rna_rR1 in cell_3_internal_combined = 0;
  species Core1_OFF_biocrnpyler_135091 in cell_3_internal_combined = 6000/cell_3_internal_combined;
  species complex_Core1_ON_biocrnpyler_135091 in cell_3_internal_combined = 0;
  species rna_rR1_1_1_combined in cell_3_internal_combined = 0;
  species dna_dA2_biocrnpyler_135091 in cell_3_internal_combined = 6000/cell_3_internal_combined;
  species rna_rR2_biocrnpyler_135091 in cell_3_internal_combined = 0;
  species protein_RNAP_biocrnpyler_135091 in cell_3_internal_combined = 300/cell_3_internal_combined;
  species protein_RNAseH_biocrnpyler_135091 in cell_3_internal_combined = 20/cell_3_internal_combined;
  species complex_Core1_AI_biocrnpyler_135091 in cell_3_internal_combined = 0;
  species complex_Core1_ON_protein_RNAP_biocrnpyler_135091 in cell_3_internal_combined = 0;
  species complex_Core1_OFF_protein_RNAP_biocrnpyler_135091 in cell_3_internal_combined = 0;
  species complex_Core1_AI_protein_RNAseH_biocrnpyler_135091 in cell_3_internal_combined = 0;
  species Core2_OFF_biocrnpyler_135091 in cell_3_internal_combined = 4000/cell_3_internal_combined;
  species complex_Core2_ON_biocrnpyler_135091 in cell_3_internal_combined = 0;
  species dna_dA1_biocrnpyler_135091 in cell_3_internal_combined = 6000/cell_3_internal_combined;
  species rna_rR1_i_biocrnpyler_135091 in cell_3_internal_combined = 0;
  species complex_Core2_AI_biocrnpyler_135091 in cell_3_internal_combined = 0;
  species complex_Core2_ON_protein_RNAP_biocrnpyler_135091 in cell_3_internal_combined = 0;
  species complex_Core2_OFF_protein_RNAP_biocrnpyler_135091 in cell_3_internal_combined = 0;
  species complex_Core2_AI_protein_RNAseH_biocrnpyler_135091 in cell_3_internal_combined = 0;
  species Prod2_OFF_biocrnpyler_821483 in cell_4_internal_combined = 4000/cell_4_internal_combined;
  species complex_Prod2_ON_biocrnpyler_821483 in cell_4_internal_combined = 0;
  species rna_BrocApt_biocrnpyler_821483 in cell_4_internal_combined = 0;
  species dna_dA1_biocrnpyler_821483 in cell_4_internal_combined = 4000/cell_4_internal_combined;
  species protein_RNAP_biocrnpyler_821483 in cell_4_internal_combined = 300/cell_4_internal_combined;
  species protein_RNAseH_biocrnpyler_821483 in cell_4_internal_combined = 20/cell_4_internal_combined;
  species complex_Prod2_AI_biocrnpyler_821483 in cell_4_internal_combined = 0;
  species complex_Prod2_ON_protein_RNAP_biocrnpyler_821483 in cell_4_internal_combined = 0;
  species complex_Prod2_OFF_protein_RNAP_biocrnpyler_821483 in cell_4_internal_combined = 0;
  species complex_Prod2_AI_protein_RNAseH_biocrnpyler_821483 in cell_4_internal_combined = 0;

  // Parameters:
  kb_combined = 0.01 per_second;
  kd_combined = 0.2 per_second;

  // Reactions:
  r0_biocrnpyler_135091: Core1_OFF_biocrnpyler_135091 + dna_dA2_biocrnpyler_135091 => complex_Core1_ON_biocrnpyler_135091; r0_biocrnpyler_135091_k*Core1_OFF_biocrnpyler_135091*dna_dA2_biocrnpyler_135091;
    r0_biocrnpyler_135091_k = 0.00394;
  r1_biocrnpyler_135091: complex_Core1_ON_biocrnpyler_135091 + rna_rR2_biocrnpyler_135091 => Core1_OFF_biocrnpyler_135091 + complex_Core1_AI_biocrnpyler_135091; r1_biocrnpyler_135091_k*complex_Core1_ON_biocrnpyler_135091*rna_rR2_biocrnpyler_135091;
    r1_biocrnpyler_135091_k = 0.0696;
  r2_biocrnpyler_135091: dna_dA2_biocrnpyler_135091 + rna_rR2_biocrnpyler_135091 => complex_Core1_AI_biocrnpyler_135091; r2_biocrnpyler_135091_k*dna_dA2_biocrnpyler_135091*rna_rR2_biocrnpyler_135091;
    r2_biocrnpyler_135091_k = 0.0696;
  r3_biocrnpyler_135091: complex_Core1_ON_biocrnpyler_135091 + protein_RNAP_biocrnpyler_135091 => complex_Core1_ON_protein_RNAP_biocrnpyler_135091; r3_biocrnpyler_135091_k*complex_Core1_ON_biocrnpyler_135091*protein_RNAP_biocrnpyler_135091;
    r3_biocrnpyler_135091_k = 38.85714;
  r3_1_biocrnpyler_135091: complex_Core1_ON_protein_RNAP_biocrnpyler_135091 => complex_Core1_ON_biocrnpyler_135091 + protein_RNAP_biocrnpyler_135091; r3_1_biocrnpyler_135091_k*complex_Core1_ON_protein_RNAP_biocrnpyler_135091;
    r3_1_biocrnpyler_135091_k = 10;
  r5_biocrnpyler_135091: complex_Core1_ON_protein_RNAP_biocrnpyler_135091 => complex_Core1_ON_biocrnpyler_135091 + rna_rR1_1_1_combined + protein_RNAP_biocrnpyler_135091; r5_biocrnpyler_135091_k*complex_Core1_ON_protein_RNAP_biocrnpyler_135091;
    r5_biocrnpyler_135091_k = 0.064;
  r6_biocrnpyler_135091: Core1_OFF_biocrnpyler_135091 + protein_RNAP_biocrnpyler_135091 => complex_Core1_OFF_protein_RNAP_biocrnpyler_135091; r6_biocrnpyler_135091_k*Core1_OFF_biocrnpyler_135091*protein_RNAP_biocrnpyler_135091;
    r6_biocrnpyler_135091_k = 9.530476;
  r6_1_biocrnpyler_135091: complex_Core1_OFF_protein_RNAP_biocrnpyler_135091 => Core1_OFF_biocrnpyler_135091 + protein_RNAP_biocrnpyler_135091; r6_1_biocrnpyler_135091_k*complex_Core1_OFF_protein_RNAP_biocrnpyler_135091;
    r6_1_biocrnpyler_135091_k = 10;
  r8_biocrnpyler_135091: complex_Core1_OFF_protein_RNAP_biocrnpyler_135091 => Core1_OFF_biocrnpyler_135091 + rna_rR1_1_1_combined + protein_RNAP_biocrnpyler_135091; r8_biocrnpyler_135091_k*complex_Core1_OFF_protein_RNAP_biocrnpyler_135091;
    r8_biocrnpyler_135091_k = 0.007;
  r9_biocrnpyler_135091: complex_Core1_AI_biocrnpyler_135091 + protein_RNAseH_biocrnpyler_135091 => complex_Core1_AI_protein_RNAseH_biocrnpyler_135091; r9_biocrnpyler_135091_k*complex_Core1_AI_biocrnpyler_135091*protein_RNAseH_biocrnpyler_135091;
    r9_biocrnpyler_135091_k = 111.8242;
  r9_1_biocrnpyler_135091: complex_Core1_AI_protein_RNAseH_biocrnpyler_135091 => complex_Core1_AI_biocrnpyler_135091 + protein_RNAseH_biocrnpyler_135091; r9_1_biocrnpyler_135091_k*complex_Core1_AI_protein_RNAseH_biocrnpyler_135091;
    r9_1_biocrnpyler_135091_k = 10;
  r11_biocrnpyler_135091: complex_Core1_AI_protein_RNAseH_biocrnpyler_135091 => dna_dA2_biocrnpyler_135091 + protein_RNAseH_biocrnpyler_135091; r11_biocrnpyler_135091_k*complex_Core1_AI_protein_RNAseH_biocrnpyler_135091;
    r11_biocrnpyler_135091_k = 0.176;
  r12_biocrnpyler_135091: Core2_OFF_biocrnpyler_135091 + dna_dA1_biocrnpyler_135091 => complex_Core2_ON_biocrnpyler_135091; r12_biocrnpyler_135091_k*Core2_OFF_biocrnpyler_135091*dna_dA1_biocrnpyler_135091;
    r12_biocrnpyler_135091_k = 0.00394;
  r13_biocrnpyler_135091: complex_Core2_ON_biocrnpyler_135091 + rna_rR1_i_biocrnpyler_135091 => Core2_OFF_biocrnpyler_135091 + complex_Core2_AI_biocrnpyler_135091; r13_biocrnpyler_135091_k*complex_Core2_ON_biocrnpyler_135091*rna_rR1_i_biocrnpyler_135091;
    r13_biocrnpyler_135091_k = 0.0696;
  r14_biocrnpyler_135091: dna_dA1_biocrnpyler_135091 + rna_rR1_i_biocrnpyler_135091 => complex_Core2_AI_biocrnpyler_135091; r14_biocrnpyler_135091_k*dna_dA1_biocrnpyler_135091*rna_rR1_i_biocrnpyler_135091;
    r14_biocrnpyler_135091_k = 0.0696;
  r15_biocrnpyler_135091: complex_Core2_ON_biocrnpyler_135091 + protein_RNAP_biocrnpyler_135091 => complex_Core2_ON_protein_RNAP_biocrnpyler_135091; r15_biocrnpyler_135091_k*complex_Core2_ON_biocrnpyler_135091*protein_RNAP_biocrnpyler_135091;
    r15_biocrnpyler_135091_k = 38.85714;
  r15_1_biocrnpyler_135091: complex_Core2_ON_protein_RNAP_biocrnpyler_135091 => complex_Core2_ON_biocrnpyler_135091 + protein_RNAP_biocrnpyler_135091; r15_1_biocrnpyler_135091_k*complex_Core2_ON_protein_RNAP_biocrnpyler_135091;
    r15_1_biocrnpyler_135091_k = 10;
  r17_biocrnpyler_135091: complex_Core2_ON_protein_RNAP_biocrnpyler_135091 => complex_Core2_ON_biocrnpyler_135091 + rna_rR2_biocrnpyler_135091 + protein_RNAP_biocrnpyler_135091; r17_biocrnpyler_135091_k*complex_Core2_ON_protein_RNAP_biocrnpyler_135091;
    r17_biocrnpyler_135091_k = 0.064;
  r18_biocrnpyler_135091: Core2_OFF_biocrnpyler_135091 + protein_RNAP_biocrnpyler_135091 => complex_Core2_OFF_protein_RNAP_biocrnpyler_135091; r18_biocrnpyler_135091_k*Core2_OFF_biocrnpyler_135091*protein_RNAP_biocrnpyler_135091;
    r18_biocrnpyler_135091_k = 9.530476;
  r18_1_biocrnpyler_135091: complex_Core2_OFF_protein_RNAP_biocrnpyler_135091 => Core2_OFF_biocrnpyler_135091 + protein_RNAP_biocrnpyler_135091; r18_1_biocrnpyler_135091_k*complex_Core2_OFF_protein_RNAP_biocrnpyler_135091;
    r18_1_biocrnpyler_135091_k = 10;
  r20_biocrnpyler_135091: complex_Core2_OFF_protein_RNAP_biocrnpyler_135091 => Core2_OFF_biocrnpyler_135091 + rna_rR2_biocrnpyler_135091 + protein_RNAP_biocrnpyler_135091; r20_biocrnpyler_135091_k*complex_Core2_OFF_protein_RNAP_biocrnpyler_135091;
    r20_biocrnpyler_135091_k = 0.007;
  r21_biocrnpyler_135091: complex_Core2_AI_biocrnpyler_135091 + protein_RNAseH_biocrnpyler_135091 => complex_Core2_AI_protein_RNAseH_biocrnpyler_135091; r21_biocrnpyler_135091_k*complex_Core2_AI_biocrnpyler_135091*protein_RNAseH_biocrnpyler_135091;
    r21_biocrnpyler_135091_k = 111.8242;
  r21_1_biocrnpyler_135091: complex_Core2_AI_protein_RNAseH_biocrnpyler_135091 => complex_Core2_AI_biocrnpyler_135091 + protein_RNAseH_biocrnpyler_135091; r21_1_biocrnpyler_135091_k*complex_Core2_AI_protein_RNAseH_biocrnpyler_135091;
    r21_1_biocrnpyler_135091_k = 10;
  r23_biocrnpyler_135091: complex_Core2_AI_protein_RNAseH_biocrnpyler_135091 => dna_dA1_biocrnpyler_135091 + protein_RNAseH_biocrnpyler_135091; r23_biocrnpyler_135091_k*complex_Core2_AI_protein_RNAseH_biocrnpyler_135091;
    r23_biocrnpyler_135091_k = 0.176;
  r0_biocrnpyler_821483: Prod2_OFF_biocrnpyler_821483 + dna_dA1_biocrnpyler_821483 => complex_Prod2_ON_biocrnpyler_821483; r0_biocrnpyler_821483_k*Prod2_OFF_biocrnpyler_821483*dna_dA1_biocrnpyler_821483;
    r0_biocrnpyler_821483_k = 0.00394;
  r1_biocrnpyler_821483: complex_Prod2_ON_biocrnpyler_821483 + rna_rR1_1_1_combined => Prod2_OFF_biocrnpyler_821483 + complex_Prod2_AI_biocrnpyler_821483; r1_biocrnpyler_821483_k*complex_Prod2_ON_biocrnpyler_821483*rna_rR1_1_1_combined;
    r1_biocrnpyler_821483_k = 0.0696;
  r2_biocrnpyler_821483: dna_dA1_biocrnpyler_821483 + rna_rR1_1_1_combined => complex_Prod2_AI_biocrnpyler_821483; r2_biocrnpyler_821483_k*dna_dA1_biocrnpyler_821483*rna_rR1_1_1_combined;
    r2_biocrnpyler_821483_k = 0.0696;
  r3_biocrnpyler_821483: complex_Prod2_ON_biocrnpyler_821483 + protein_RNAP_biocrnpyler_821483 => complex_Prod2_ON_protein_RNAP_biocrnpyler_821483; r3_biocrnpyler_821483_k*complex_Prod2_ON_biocrnpyler_821483*protein_RNAP_biocrnpyler_821483;
    r3_biocrnpyler_821483_k = 38.85714;
  r3_1_biocrnpyler_821483: complex_Prod2_ON_protein_RNAP_biocrnpyler_821483 => complex_Prod2_ON_biocrnpyler_821483 + protein_RNAP_biocrnpyler_821483; r3_1_biocrnpyler_821483_k*complex_Prod2_ON_protein_RNAP_biocrnpyler_821483;
    r3_1_biocrnpyler_821483_k = 10;
  r5_biocrnpyler_821483: complex_Prod2_ON_protein_RNAP_biocrnpyler_821483 => complex_Prod2_ON_biocrnpyler_821483 + rna_BrocApt_biocrnpyler_821483 + protein_RNAP_biocrnpyler_821483; r5_biocrnpyler_821483_k*complex_Prod2_ON_protein_RNAP_biocrnpyler_821483;
    r5_biocrnpyler_821483_k = 0.064;
  r6_biocrnpyler_821483: Prod2_OFF_biocrnpyler_821483 + protein_RNAP_biocrnpyler_821483 => complex_Prod2_OFF_protein_RNAP_biocrnpyler_821483; r6_biocrnpyler_821483_k*Prod2_OFF_biocrnpyler_821483*protein_RNAP_biocrnpyler_821483;
    r6_biocrnpyler_821483_k = 9.530476;
  r6_1_biocrnpyler_821483: complex_Prod2_OFF_protein_RNAP_biocrnpyler_821483 => Prod2_OFF_biocrnpyler_821483 + protein_RNAP_biocrnpyler_821483; r6_1_biocrnpyler_821483_k*complex_Prod2_OFF_protein_RNAP_biocrnpyler_821483;
    r6_1_biocrnpyler_821483_k = 10;
  r8_biocrnpyler_821483: complex_Prod2_OFF_protein_RNAP_biocrnpyler_821483 => Prod2_OFF_biocrnpyler_821483 + rna_BrocApt_biocrnpyler_821483 + protein_RNAP_biocrnpyler_821483; r8_biocrnpyler_821483_k*complex_Prod2_OFF_protein_RNAP_biocrnpyler_821483;
    r8_biocrnpyler_821483_k = 0.007;
  r9_biocrnpyler_821483: complex_Prod2_AI_biocrnpyler_821483 + protein_RNAseH_biocrnpyler_821483 => complex_Prod2_AI_protein_RNAseH_biocrnpyler_821483; r9_biocrnpyler_821483_k*complex_Prod2_AI_biocrnpyler_821483*protein_RNAseH_biocrnpyler_821483;
    r9_biocrnpyler_821483_k = 111.8242;
  r9_1_biocrnpyler_821483: complex_Prod2_AI_protein_RNAseH_biocrnpyler_821483 => complex_Prod2_AI_biocrnpyler_821483 + protein_RNAseH_biocrnpyler_821483; r9_1_biocrnpyler_821483_k*complex_Prod2_AI_protein_RNAseH_biocrnpyler_821483;
    r9_1_biocrnpyler_821483_k = 10;
  r11_biocrnpyler_821483: complex_Prod2_AI_protein_RNAseH_biocrnpyler_821483 => dna_dA1_biocrnpyler_821483 + protein_RNAseH_biocrnpyler_821483; r11_biocrnpyler_821483_k*complex_Prod2_AI_protein_RNAseH_biocrnpyler_821483;
    r11_biocrnpyler_821483_k = 0.176;

  // Unit definitions:
  unit square_metre = metre^2;
  unit per_second = 1 / second;
  unit substance = dimensionless;
end
