// SBML level 3 version 2

model combined_model_of__biocrnpyler_728640_biocrnpyler_955036()
  // model units - substance: mole, time: second, volume: litre, area: square_metre, length: metre, extent: mole

  // Compartments:
  compartment default_biocrnpyler_728640_combined = 2e-6;

  // Species:
  species Core1_OFF_biocrnpyler_728640 in default_biocrnpyler_728640_combined = 0;
  species complex_Core1_ON_biocrnpyler_728640 in default_biocrnpyler_728640_combined = 0;
  species dna_dA2_biocrnpyler_728640 in default_biocrnpyler_728640_combined = 0;
  species rna_rR2_biocrnpyler_728640 in default_biocrnpyler_728640_combined = 0;
  species protein_RNAP_biocrnpyler_728640 in default_biocrnpyler_728640_combined = 0;
  species protein_RNAseH_biocrnpyler_728640 in default_biocrnpyler_728640_combined = 0;
  species complex_Core1_AI_biocrnpyler_728640 in default_biocrnpyler_728640_combined = 0;
  species complex_Core1_ON_protein_RNAP_biocrnpyler_728640 in default_biocrnpyler_728640_combined = 0;
  species complex_Core1_OFF_protein_RNAP_biocrnpyler_728640 in default_biocrnpyler_728640_combined = 0;
  species complex_Core1_AI_protein_RNAseH_biocrnpyler_728640 in default_biocrnpyler_728640_combined = 0;
  species Core2_OFF_biocrnpyler_728640 in default_biocrnpyler_728640_combined = 0;
  species complex_Core2_ON_biocrnpyler_728640 in default_biocrnpyler_728640_combined = 0;
  species dna_dA1_biocrnpyler_728640 in default_biocrnpyler_728640_combined = 0;
  species complex_Core2_AI_biocrnpyler_728640 in default_biocrnpyler_728640_combined = 0;
  species complex_Core2_ON_protein_RNAP_biocrnpyler_728640 in default_biocrnpyler_728640_combined = 0;
  species complex_Core2_OFF_protein_RNAP_biocrnpyler_728640 in default_biocrnpyler_728640_combined = 0;
  species complex_Core2_AI_protein_RNAseH_biocrnpyler_728640 in default_biocrnpyler_728640_combined = 0;
  species rna_I4_B_biocrnpyler_955036 in default_biocrnpyler_728640_combined = 0;
  species rna_rR1_biocrnpyler_728640_1_combined in default_biocrnpyler_728640_combined = 0;
  species complex_rna_I4_B_rna_rR1_biocrnpyler_955036 in default_biocrnpyler_728640_combined = 0;

  // Reactions:
  r0_biocrnpyler_728640: Core1_OFF_biocrnpyler_728640 + dna_dA2_biocrnpyler_728640 => complex_Core1_ON_biocrnpyler_728640; r0_biocrnpyler_728640_k*Core1_OFF_biocrnpyler_728640*dna_dA2_biocrnpyler_728640;
    r0_biocrnpyler_728640_k = 0.00394;
  r1_biocrnpyler_728640: complex_Core1_ON_biocrnpyler_728640 + rna_rR2_biocrnpyler_728640 => Core1_OFF_biocrnpyler_728640 + complex_Core1_AI_biocrnpyler_728640; r1_biocrnpyler_728640_k*complex_Core1_ON_biocrnpyler_728640*rna_rR2_biocrnpyler_728640;
    r1_biocrnpyler_728640_k = 0.0696;
  r2_biocrnpyler_728640: dna_dA2_biocrnpyler_728640 + rna_rR2_biocrnpyler_728640 => complex_Core1_AI_biocrnpyler_728640; r2_biocrnpyler_728640_k*dna_dA2_biocrnpyler_728640*rna_rR2_biocrnpyler_728640;
    r2_biocrnpyler_728640_k = 0.0696;
  r3_biocrnpyler_728640: complex_Core1_ON_biocrnpyler_728640 + protein_RNAP_biocrnpyler_728640 => complex_Core1_ON_protein_RNAP_biocrnpyler_728640; r3_biocrnpyler_728640_k*complex_Core1_ON_biocrnpyler_728640*protein_RNAP_biocrnpyler_728640;
    r3_biocrnpyler_728640_k = 38.85714;
  r3_1_biocrnpyler_728640: complex_Core1_ON_protein_RNAP_biocrnpyler_728640 => complex_Core1_ON_biocrnpyler_728640 + protein_RNAP_biocrnpyler_728640; r3_1_biocrnpyler_728640_k*complex_Core1_ON_protein_RNAP_biocrnpyler_728640;
    r3_1_biocrnpyler_728640_k = 10;
  r5_biocrnpyler_728640: complex_Core1_ON_protein_RNAP_biocrnpyler_728640 => complex_Core1_ON_biocrnpyler_728640 + rna_rR1_biocrnpyler_728640_1_combined + protein_RNAP_biocrnpyler_728640; r5_biocrnpyler_728640_k*complex_Core1_ON_protein_RNAP_biocrnpyler_728640;
    r5_biocrnpyler_728640_k = 0.064;
  r6_biocrnpyler_728640: Core1_OFF_biocrnpyler_728640 + protein_RNAP_biocrnpyler_728640 => complex_Core1_OFF_protein_RNAP_biocrnpyler_728640; r6_biocrnpyler_728640_k*Core1_OFF_biocrnpyler_728640*protein_RNAP_biocrnpyler_728640;
    r6_biocrnpyler_728640_k = 9.530476;
  r6_1_biocrnpyler_728640: complex_Core1_OFF_protein_RNAP_biocrnpyler_728640 => Core1_OFF_biocrnpyler_728640 + protein_RNAP_biocrnpyler_728640; r6_1_biocrnpyler_728640_k*complex_Core1_OFF_protein_RNAP_biocrnpyler_728640;
    r6_1_biocrnpyler_728640_k = 10;
  r8_biocrnpyler_728640: complex_Core1_OFF_protein_RNAP_biocrnpyler_728640 => Core1_OFF_biocrnpyler_728640 + rna_rR1_biocrnpyler_728640_1_combined + protein_RNAP_biocrnpyler_728640; r8_biocrnpyler_728640_k*complex_Core1_OFF_protein_RNAP_biocrnpyler_728640;
    r8_biocrnpyler_728640_k = 0.007;
  r9_biocrnpyler_728640: complex_Core1_AI_biocrnpyler_728640 + protein_RNAseH_biocrnpyler_728640 => complex_Core1_AI_protein_RNAseH_biocrnpyler_728640; r9_biocrnpyler_728640_k*complex_Core1_AI_biocrnpyler_728640*protein_RNAseH_biocrnpyler_728640;
    r9_biocrnpyler_728640_k = 111.8242;
  r9_1_biocrnpyler_728640: complex_Core1_AI_protein_RNAseH_biocrnpyler_728640 => complex_Core1_AI_biocrnpyler_728640 + protein_RNAseH_biocrnpyler_728640; r9_1_biocrnpyler_728640_k*complex_Core1_AI_protein_RNAseH_biocrnpyler_728640;
    r9_1_biocrnpyler_728640_k = 10;
  r11_biocrnpyler_728640: complex_Core1_AI_protein_RNAseH_biocrnpyler_728640 => dna_dA2_biocrnpyler_728640 + protein_RNAseH_biocrnpyler_728640; r11_biocrnpyler_728640_k*complex_Core1_AI_protein_RNAseH_biocrnpyler_728640;
    r11_biocrnpyler_728640_k = 0.176;
  r12_biocrnpyler_728640: Core2_OFF_biocrnpyler_728640 + dna_dA1_biocrnpyler_728640 => complex_Core2_ON_biocrnpyler_728640; r12_biocrnpyler_728640_k*Core2_OFF_biocrnpyler_728640*dna_dA1_biocrnpyler_728640;
    r12_biocrnpyler_728640_k = 0.00394;
  r13_biocrnpyler_728640: complex_Core2_ON_biocrnpyler_728640 + rna_rR1_biocrnpyler_728640_1_combined => Core2_OFF_biocrnpyler_728640 + complex_Core2_AI_biocrnpyler_728640; r13_biocrnpyler_728640_k*complex_Core2_ON_biocrnpyler_728640*rna_rR1_biocrnpyler_728640_1_combined;
    r13_biocrnpyler_728640_k = 0.0696;
  r14_biocrnpyler_728640: dna_dA1_biocrnpyler_728640 + rna_rR1_biocrnpyler_728640_1_combined => complex_Core2_AI_biocrnpyler_728640; r14_biocrnpyler_728640_k*dna_dA1_biocrnpyler_728640*rna_rR1_biocrnpyler_728640_1_combined;
    r14_biocrnpyler_728640_k = 0.0696;
  r15_biocrnpyler_728640: complex_Core2_ON_biocrnpyler_728640 + protein_RNAP_biocrnpyler_728640 => complex_Core2_ON_protein_RNAP_biocrnpyler_728640; r15_biocrnpyler_728640_k*complex_Core2_ON_biocrnpyler_728640*protein_RNAP_biocrnpyler_728640;
    r15_biocrnpyler_728640_k = 38.85714;
  r15_1_biocrnpyler_728640: complex_Core2_ON_protein_RNAP_biocrnpyler_728640 => complex_Core2_ON_biocrnpyler_728640 + protein_RNAP_biocrnpyler_728640; r15_1_biocrnpyler_728640_k*complex_Core2_ON_protein_RNAP_biocrnpyler_728640;
    r15_1_biocrnpyler_728640_k = 10;
  r17_biocrnpyler_728640: complex_Core2_ON_protein_RNAP_biocrnpyler_728640 => complex_Core2_ON_biocrnpyler_728640 + rna_rR2_biocrnpyler_728640 + protein_RNAP_biocrnpyler_728640; r17_biocrnpyler_728640_k*complex_Core2_ON_protein_RNAP_biocrnpyler_728640;
    r17_biocrnpyler_728640_k = 0.064;
  r18_biocrnpyler_728640: Core2_OFF_biocrnpyler_728640 + protein_RNAP_biocrnpyler_728640 => complex_Core2_OFF_protein_RNAP_biocrnpyler_728640; r18_biocrnpyler_728640_k*Core2_OFF_biocrnpyler_728640*protein_RNAP_biocrnpyler_728640;
    r18_biocrnpyler_728640_k = 9.530476;
  r18_1_biocrnpyler_728640: complex_Core2_OFF_protein_RNAP_biocrnpyler_728640 => Core2_OFF_biocrnpyler_728640 + protein_RNAP_biocrnpyler_728640; r18_1_biocrnpyler_728640_k*complex_Core2_OFF_protein_RNAP_biocrnpyler_728640;
    r18_1_biocrnpyler_728640_k = 10;
  r20_biocrnpyler_728640: complex_Core2_OFF_protein_RNAP_biocrnpyler_728640 => Core2_OFF_biocrnpyler_728640 + rna_rR2_biocrnpyler_728640 + protein_RNAP_biocrnpyler_728640; r20_biocrnpyler_728640_k*complex_Core2_OFF_protein_RNAP_biocrnpyler_728640;
    r20_biocrnpyler_728640_k = 0.007;
  r21_biocrnpyler_728640: complex_Core2_AI_biocrnpyler_728640 + protein_RNAseH_biocrnpyler_728640 => complex_Core2_AI_protein_RNAseH_biocrnpyler_728640; r21_biocrnpyler_728640_k*complex_Core2_AI_biocrnpyler_728640*protein_RNAseH_biocrnpyler_728640;
    r21_biocrnpyler_728640_k = 111.8242;
  r21_1_biocrnpyler_728640: complex_Core2_AI_protein_RNAseH_biocrnpyler_728640 => complex_Core2_AI_biocrnpyler_728640 + protein_RNAseH_biocrnpyler_728640; r21_1_biocrnpyler_728640_k*complex_Core2_AI_protein_RNAseH_biocrnpyler_728640;
    r21_1_biocrnpyler_728640_k = 10;
  r23_biocrnpyler_728640: complex_Core2_AI_protein_RNAseH_biocrnpyler_728640 => dna_dA1_biocrnpyler_728640 + protein_RNAseH_biocrnpyler_728640; r23_biocrnpyler_728640_k*complex_Core2_AI_protein_RNAseH_biocrnpyler_728640;
    r23_biocrnpyler_728640_k = 0.176;
  r0_biocrnpyler_955036: rna_I4_B_biocrnpyler_955036 + rna_rR1_biocrnpyler_728640_1_combined => complex_rna_I4_B_rna_rR1_biocrnpyler_955036; r0_biocrnpyler_955036_k*rna_I4_B_biocrnpyler_955036*rna_rR1_biocrnpyler_728640_1_combined;
    r0_biocrnpyler_955036_k = 0.0996;

  // Unit definitions:
  unit square_metre = metre^2;
end
