// SBML level 3 version 2

model Biexp_membrane()
  // model units - substance: substance, time: second, extent: mole

  // Compartments:
  compartment internal = 1e-6 litre;
  compartment external = 1e-6 litre;

  // Species:
  species rna_I4_e in external = 0;
  species rna_I4_B in internal = 0;
  species sidB in internal = 1;
  species rna_I4_e_sidB in internal = 0;
  species complex_rna_I4_B_rna_rR1_E in external = 0;
  species complex_rna_I4_B_rna_rR1 in internal = 0;
  species sidW in internal = 1;
  species complex_rna_I4_B_rna_rR1_sidW in internal = 0;

  // Parameters:
  kb = 0.01 per_second;
  kd = 0.2 per_second;
  kc = 0.2 per_second;
  ke = 0.01 per_second;

  // Reactions:
  R1: sidB + rna_I4_e -> rna_I4_e_sidB; kb*sidB*rna_I4_e - kd*rna_I4_e_sidB;
  R2: rna_I4_e_sidB -> rna_I4_B + sidB; kd*rna_I4_e_sidB - kb*sidB*rna_I4_B;
  R3: sidW + complex_rna_I4_B_rna_rR1 -> complex_rna_I4_B_rna_rR1_sidW; kc*sidW*complex_rna_I4_B_rna_rR1 - ke*complex_rna_I4_B_rna_rR1_sidW;
  R4: complex_rna_I4_B_rna_rR1_sidW -> complex_rna_I4_B_rna_rR1_E + sidW; ke*complex_rna_I4_B_rna_rR1_sidW - kc*sidW*complex_rna_I4_B_rna_rR1_E;

  // Unit definitions:
  unit per_second = 1 / second;
  unit substance = dimensionless;
end
