// SBML level 3 version 2

model biocrnpyler_593175()
  // model units - substance: mole, time: second, volume: litre, area: square_metre, length: metre, extent: mole

  // Compartments:
  compartment default = 1e-6;

  // Species:
  species Sw1_OFF in default = 0;
  species complex_Sw1_ON in default = 0;
  species rna_I31 in default = 0;
  species dna_A1 in default = 0;
  species rna_I1 in default = 0;
  species protein_RNAP in default = 0;
  species protein_RNAseH in default = 0;
  species complex_Sw1_AI in default = 0;
  species complex_Sw1_ON_protein_RNAP in default = 0;
  species complex_Sw1_OFF_protein_RNAP in default = 0;
  species complex_Sw1_AI_protein_RNAseH in default = 0;
  species Sw2_OFF in default = 0;
  species complex_Sw2_ON in default = 0;
  species rna_I32 in default = 0;
  species dna_A2 in default = 0;
  species rna_I2 in default = 0;
  species complex_Sw2_AI in default = 0;
  species complex_Sw2_ON_protein_RNAP in default = 0;
  species complex_Sw2_OFF_protein_RNAP in default = 0;
  species complex_Sw2_AI_protein_RNAseH in default = 0;
  species Sw3_OFF in default = 0;
  species complex_Sw3_ON_1 in default = 0;
  species complex_Sw3_ON_2 in default = 0;
  species rna_I4 in default = 0;
  species dna_A31 in default = 0;
  species dna_A32 in default = 0;
  species complex_Sw3_AI in default = 0;
  species complex_Sw3_AI_2 in default = 0;
  species complex_Sw3_ON_2_protein_RNAP in default = 0;
  species complex_Sw3_AI_2_protein_RNAseH in default = 0;
  species complex_Sw3_ON_1_protein_RNAP in default = 0;
  species complex_Sw3_OFF_protein_RNAP in default = 0;
  species complex_Sw3_AI_protein_RNAseH in default = 0;

  // Reactions:
  r0: Sw1_OFF + dna_A1 => complex_Sw1_ON; r0_k*Sw1_OFF*dna_A1;
    r0_k = 0.00394;
  r1: complex_Sw1_ON + rna_I1 => Sw1_OFF + complex_Sw1_AI; r1_k*complex_Sw1_ON*rna_I1;
    r1_k = 0.0696;
  r2: dna_A1 + rna_I1 => complex_Sw1_AI; r2_k*dna_A1*rna_I1;
    r2_k = 0.0696;
  r3: complex_Sw1_ON + protein_RNAP => complex_Sw1_ON_protein_RNAP; r3_k*complex_Sw1_ON*protein_RNAP;
    r3_k = 38.85714;
  r3_1: complex_Sw1_ON_protein_RNAP => complex_Sw1_ON + protein_RNAP; r3_1_k*complex_Sw1_ON_protein_RNAP;
    r3_1_k = 10;
  r5: complex_Sw1_ON_protein_RNAP => complex_Sw1_ON + rna_I31 + protein_RNAP; r5_k*complex_Sw1_ON_protein_RNAP;
    r5_k = 0.064;
  r6: Sw1_OFF + protein_RNAP => complex_Sw1_OFF_protein_RNAP; r6_k*Sw1_OFF*protein_RNAP;
    r6_k = 9.530476;
  r6_1: complex_Sw1_OFF_protein_RNAP => Sw1_OFF + protein_RNAP; r6_1_k*complex_Sw1_OFF_protein_RNAP;
    r6_1_k = 10;
  r8: complex_Sw1_OFF_protein_RNAP => Sw1_OFF + rna_I31 + protein_RNAP; r8_k*complex_Sw1_OFF_protein_RNAP;
    r8_k = 0.007;
  r9: complex_Sw1_AI + protein_RNAseH => complex_Sw1_AI_protein_RNAseH; r9_k*complex_Sw1_AI*protein_RNAseH;
    r9_k = 111.8242;
  r9_1: complex_Sw1_AI_protein_RNAseH => complex_Sw1_AI + protein_RNAseH; r9_1_k*complex_Sw1_AI_protein_RNAseH;
    r9_1_k = 10;
  r11: complex_Sw1_AI_protein_RNAseH => dna_A1 + protein_RNAseH; r11_k*complex_Sw1_AI_protein_RNAseH;
    r11_k = 0.176;
  r12: Sw2_OFF + dna_A2 => complex_Sw2_ON; r12_k*Sw2_OFF*dna_A2;
    r12_k = 0.00394;
  r13: complex_Sw2_ON + rna_I2 => Sw2_OFF + complex_Sw2_AI; r13_k*complex_Sw2_ON*rna_I2;
    r13_k = 0.0696;
  r14: dna_A2 + rna_I2 => complex_Sw2_AI; r14_k*dna_A2*rna_I2;
    r14_k = 0.0696;
  r15: complex_Sw2_ON + protein_RNAP => complex_Sw2_ON_protein_RNAP; r15_k*complex_Sw2_ON*protein_RNAP;
    r15_k = 38.85714;
  r15_1: complex_Sw2_ON_protein_RNAP => complex_Sw2_ON + protein_RNAP; r15_1_k*complex_Sw2_ON_protein_RNAP;
    r15_1_k = 10;
  r17: complex_Sw2_ON_protein_RNAP => complex_Sw2_ON + rna_I32 + protein_RNAP; r17_k*complex_Sw2_ON_protein_RNAP;
    r17_k = 0.064;
  r18: Sw2_OFF + protein_RNAP => complex_Sw2_OFF_protein_RNAP; r18_k*Sw2_OFF*protein_RNAP;
    r18_k = 9.530476;
  r18_1: complex_Sw2_OFF_protein_RNAP => Sw2_OFF + protein_RNAP; r18_1_k*complex_Sw2_OFF_protein_RNAP;
    r18_1_k = 10;
  r20: complex_Sw2_OFF_protein_RNAP => Sw2_OFF + rna_I32 + protein_RNAP; r20_k*complex_Sw2_OFF_protein_RNAP;
    r20_k = 0.007;
  r21: complex_Sw2_AI + protein_RNAseH => complex_Sw2_AI_protein_RNAseH; r21_k*complex_Sw2_AI*protein_RNAseH;
    r21_k = 111.8242;
  r21_1: complex_Sw2_AI_protein_RNAseH => complex_Sw2_AI + protein_RNAseH; r21_1_k*complex_Sw2_AI_protein_RNAseH;
    r21_1_k = 10;
  r23: complex_Sw2_AI_protein_RNAseH => dna_A2 + protein_RNAseH; r23_k*complex_Sw2_AI_protein_RNAseH;
    r23_k = 0.176;
  r24: Sw3_OFF + dna_A31 => complex_Sw3_ON_1; r24_k*Sw3_OFF*dna_A31;
    r24_k = 0.00394;
  r25: complex_Sw3_ON_1 + rna_I31 => Sw3_OFF + complex_Sw3_AI; r25_k*complex_Sw3_ON_1*rna_I31;
    r25_k = 0.0696;
  r26: dna_A31 + rna_I31 => complex_Sw3_AI; r26_k*dna_A31*rna_I31;
    r26_k = 0.0696;
  r27: Sw3_OFF + dna_A32 => complex_Sw3_ON_2; r27_k*Sw3_OFF*dna_A32;
    r27_k = 0.00394;
  r28: complex_Sw3_ON_2 + rna_I32 => Sw3_OFF + complex_Sw3_AI_2; r28_k*complex_Sw3_ON_2*rna_I32;
    r28_k = 0.0696;
  r29: dna_A32 + rna_I32 => complex_Sw3_AI_2; r29_k*dna_A32*rna_I32;
    r29_k = 0.0696;
  r30: complex_Sw3_ON_2 + protein_RNAP => complex_Sw3_ON_2_protein_RNAP; r30_k*complex_Sw3_ON_2*protein_RNAP;
    r30_k = 38.85714;
  r30_1: complex_Sw3_ON_2_protein_RNAP => complex_Sw3_ON_2 + protein_RNAP; r30_1_k*complex_Sw3_ON_2_protein_RNAP;
    r30_1_k = 10;
  r32: complex_Sw3_ON_2_protein_RNAP => complex_Sw3_ON_2 + rna_I4 + protein_RNAP; r32_k*complex_Sw3_ON_2_protein_RNAP;
    r32_k = 0.064;
  r33: complex_Sw3_AI_2 + protein_RNAseH => complex_Sw3_AI_2_protein_RNAseH; r33_k*complex_Sw3_AI_2*protein_RNAseH;
    r33_k = 111.8242;
  r33_1: complex_Sw3_AI_2_protein_RNAseH => complex_Sw3_AI_2 + protein_RNAseH; r33_1_k*complex_Sw3_AI_2_protein_RNAseH;
    r33_1_k = 10;
  r35: complex_Sw3_AI_2_protein_RNAseH => dna_A32 + protein_RNAseH; r35_k*complex_Sw3_AI_2_protein_RNAseH;
    r35_k = 0.176;
  r36: complex_Sw3_ON_1 + protein_RNAP => complex_Sw3_ON_1_protein_RNAP; r36_k*complex_Sw3_ON_1*protein_RNAP;
    r36_k = 38.85714;
  r36_1: complex_Sw3_ON_1_protein_RNAP => complex_Sw3_ON_1 + protein_RNAP; r36_1_k*complex_Sw3_ON_1_protein_RNAP;
    r36_1_k = 10;
  r38: complex_Sw3_ON_1_protein_RNAP => complex_Sw3_ON_1 + rna_I4 + protein_RNAP; r38_k*complex_Sw3_ON_1_protein_RNAP;
    r38_k = 0.064;
  r39: Sw3_OFF + protein_RNAP => complex_Sw3_OFF_protein_RNAP; r39_k*Sw3_OFF*protein_RNAP;
    r39_k = 9.530476;
  r39_1: complex_Sw3_OFF_protein_RNAP => Sw3_OFF + protein_RNAP; r39_1_k*complex_Sw3_OFF_protein_RNAP;
    r39_1_k = 10;
  r41: complex_Sw3_OFF_protein_RNAP => Sw3_OFF + rna_I4 + protein_RNAP; r41_k*complex_Sw3_OFF_protein_RNAP;
    r41_k = 0.007;
  r42: complex_Sw3_AI + protein_RNAseH => complex_Sw3_AI_protein_RNAseH; r42_k*complex_Sw3_AI*protein_RNAseH;
    r42_k = 111.8242;
  r42_1: complex_Sw3_AI_protein_RNAseH => complex_Sw3_AI + protein_RNAseH; r42_1_k*complex_Sw3_AI_protein_RNAseH;
    r42_1_k = 10;
  r44: complex_Sw3_AI_protein_RNAseH => dna_A31 + protein_RNAseH; r44_k*complex_Sw3_AI_protein_RNAseH;
    r44_k = 0.176;

  // Unit definitions:
  unit square_metre = metre^2;
end
