// SBML level 3 version 2

model Nexp_membrane()
  // model units - substance: substance, time: second, extent: mole

  // Compartments:
  compartment internal = 1e-6 litre;
  compartment external = 1e-6 litre;

  // Species:
  species sidI1 in internal = 1;
  species sidI2 in internal = 1;
  species sidI4 in internal = 1;
  species rna_I1_e in external = 0;
  species rna_I1 in internal = 0;
  species rna_I1_e_sidI1 in internal = 0;
  species rna_I2_e in external = 0;
  species rna_I2 in internal = 0;
  species rna_I2_e_sidI2 in internal = 0;
  species rna_I4_e in external = 0;
  species rna_I4 in internal = 0;
  species rna_I4_sidI4 in internal = 0;

  // Parameters:
  kb1 = 0.01 per_second;
  kd1 = 0.2 per_second;
  kc1 = 0.2 per_second;
  ke1 = 0.01 per_second;

  // Reactions:
  R5: sidI1 + rna_I1_e -> rna_I1_e_sidI1; kb1*sidI1*rna_I1_e - kd1*rna_I1_e_sidI1;
  R6: rna_I1_e_sidI1 -> rna_I1 + sidI1; kd1*rna_I1_e_sidI1 - kb1*sidI1*rna_I1;
  R7: sidI2 + rna_I2_e -> rna_I2_e_sidI2; kb1*sidI2*rna_I2_e - kd1*rna_I2_e_sidI2;
  R8: rna_I2_e_sidI2 -> rna_I2 + sidI2; kd1*rna_I2_e_sidI2 - kb1*sidI2*rna_I2;
  R9: sidI4 + rna_I4 -> rna_I4_sidI4; kc1*sidI4*rna_I4 - ke1*rna_I4_sidI4;
  R10: rna_I4_sidI4 -> rna_I4_e + sidI4; ke1*rna_I4_sidI4 - kc1*sidI4*rna_I4_e;

  // Unit definitions:
  unit per_second = 1 / second;
  unit substance = dimensionless;
end
