// SBML level 3 version 2

model combined_model_of__combined_model_of__external_environment_model_combined_model_of__Biexp_membrane_combined_model_of__combined_model_of__biocrnpyler_728640_biocrnpyler_955036()
  // model units - substance: mole, time: second, volume: litre, area: square_metre, length: metre, extent: mole

  // Compartments:
  compartment actual_external = 2e-6 litre;
  compartment cell_Bi_internal_combined = 1e-6 litre;

  // Species:
  species rna_I1_e_external_environment_model in actual_external = 0;
  species rna_I2_e_external_environment_model in actual_external = 0;
  species rna_I4_e_external_environment_model_1_combined in actual_external = 0;
  species sidB in cell_Bi_internal_combined = 1;
  species rna_I4_e_sidB in cell_Bi_internal_combined = 0;
  species complex_rna_I4_B_rna_rR1_E_external_environment_model_1_combined in actual_external = 0;
  species sidW in cell_Bi_internal_combined = 1;
  species complex_rna_I4_B_rna_rR1_sidW in cell_Bi_internal_combined = 0;
  species Core1_OFF_biocrnpyler_728640_combined_model_of__biocrnpyler_728640_biocrnpyler_955036 in cell_Bi_internal_combined = 0;
  species complex_Core1_ON_biocrnpyler_728640_combined_model_of__biocrnpyler_728640_biocrnpyler_955036 in cell_Bi_internal_combined = 0;
  species dna_dA2_biocrnpyler_728640_combined_model_of__biocrnpyler_728640_biocrnpyler_955036 in cell_Bi_internal_combined = 0;
  species rna_rR2_biocrnpyler_728640_combined_model_of__biocrnpyler_728640_biocrnpyler_955036 in cell_Bi_internal_combined = 0;
  species protein_RNAP_biocrnpyler_728640_combined_model_of__biocrnpyler_728640_biocrnpyler_955036 in cell_Bi_internal_combined = 0;
  species protein_RNAseH_biocrnpyler_728640_combined_model_of__biocrnpyler_728640_biocrnpyler_955036 in cell_Bi_internal_combined = 0;
  species complex_Core1_AI_biocrnpyler_728640_combined_model_of__biocrnpyler_728640_biocrnpyler_955036 in cell_Bi_internal_combined = 0;
  species complex_Core1_ON_protein_RNAP_biocrnpyler_728640_combined_model_of__biocrnpyler_728640_biocrnpyler_955036 in cell_Bi_internal_combined = 0;
  species complex_Core1_OFF_protein_RNAP_biocrnpyler_728640_combined_model_of__biocrnpyler_728640_biocrnpyler_955036 in cell_Bi_internal_combined = 0;
  species complex_Core1_AI_protein_RNAseH_biocrnpyler_728640_combined_model_of__biocrnpyler_728640_biocrnpyler_955036 in cell_Bi_internal_combined = 0;
  species Core2_OFF_biocrnpyler_728640_combined_model_of__biocrnpyler_728640_biocrnpyler_955036 in cell_Bi_internal_combined = 0;
  species complex_Core2_ON_biocrnpyler_728640_combined_model_of__biocrnpyler_728640_biocrnpyler_955036 in cell_Bi_internal_combined = 0;
  species dna_dA1_biocrnpyler_728640_combined_model_of__biocrnpyler_728640_biocrnpyler_955036 in cell_Bi_internal_combined = 0;
  species complex_Core2_AI_biocrnpyler_728640_combined_model_of__biocrnpyler_728640_biocrnpyler_955036 in cell_Bi_internal_combined = 0;
  species complex_Core2_ON_protein_RNAP_biocrnpyler_728640_combined_model_of__biocrnpyler_728640_biocrnpyler_955036 in cell_Bi_internal_combined = 0;
  species complex_Core2_OFF_protein_RNAP_biocrnpyler_728640_combined_model_of__biocrnpyler_728640_biocrnpyler_955036 in cell_Bi_internal_combined = 0;
  species complex_Core2_AI_protein_RNAseH_biocrnpyler_728640_combined_model_of__biocrnpyler_728640_biocrnpyler_955036 in cell_Bi_internal_combined = 0;
  species rna_I4_B_1_combined in cell_Bi_internal_combined = 0;
  species rna_rR1_biocrnpyler_728640_1_combined_combined_model_of__biocrnpyler_728640_biocrnpyler_955036 in cell_Bi_internal_combined = 0;
  species complex_rna_I4_B_rna_rR1_1_combined in cell_Bi_internal_combined = 0;

  // Parameters:
  kb = 0.01 per_second;
  kd = 0.2 per_second;
  kc = 0.2 per_second;
  ke = 0.01 per_second;

  // Reactions:
  R1: sidB + rna_I4_e_external_environment_model_1_combined -> rna_I4_e_sidB; kb*sidB*rna_I4_e_external_environment_model_1_combined - kd*rna_I4_e_sidB;
  R2: rna_I4_e_sidB -> rna_I4_B_1_combined + sidB; kd*rna_I4_e_sidB - kb*sidB*rna_I4_B_1_combined;
  R3: sidW + complex_rna_I4_B_rna_rR1_1_combined -> complex_rna_I4_B_rna_rR1_sidW; kc*sidW*complex_rna_I4_B_rna_rR1_1_combined - ke*complex_rna_I4_B_rna_rR1_sidW;
  R4: complex_rna_I4_B_rna_rR1_sidW -> complex_rna_I4_B_rna_rR1_E_external_environment_model_1_combined + sidW; ke*complex_rna_I4_B_rna_rR1_sidW - kc*sidW*complex_rna_I4_B_rna_rR1_E_external_environment_model_1_combined;
  r0_biocrnpyler_728640_combined_model_of__biocrnpyler_728640_biocrnpyler_955036: Core1_OFF_biocrnpyler_728640_combined_model_of__biocrnpyler_728640_biocrnpyler_955036 + dna_dA2_biocrnpyler_728640_combined_model_of__biocrnpyler_728640_biocrnpyler_955036 => complex_Core1_ON_biocrnpyler_728640_combined_model_of__biocrnpyler_728640_biocrnpyler_955036; r0_biocrnpyler_728640_combined_model_of__biocrnpyler_728640_biocrnpyler_955036_k*Core1_OFF_biocrnpyler_728640_combined_model_of__biocrnpyler_728640_biocrnpyler_955036*dna_dA2_biocrnpyler_728640_combined_model_of__biocrnpyler_728640_biocrnpyler_955036;
    r0_biocrnpyler_728640_combined_model_of__biocrnpyler_728640_biocrnpyler_955036_k = 0.00394;
  r1_biocrnpyler_728640_combined_model_of__biocrnpyler_728640_biocrnpyler_955036: complex_Core1_ON_biocrnpyler_728640_combined_model_of__biocrnpyler_728640_biocrnpyler_955036 + rna_rR2_biocrnpyler_728640_combined_model_of__biocrnpyler_728640_biocrnpyler_955036 => Core1_OFF_biocrnpyler_728640_combined_model_of__biocrnpyler_728640_biocrnpyler_955036 + complex_Core1_AI_biocrnpyler_728640_combined_model_of__biocrnpyler_728640_biocrnpyler_955036; r1_biocrnpyler_728640_combined_model_of__biocrnpyler_728640_biocrnpyler_955036_k*complex_Core1_ON_biocrnpyler_728640_combined_model_of__biocrnpyler_728640_biocrnpyler_955036*rna_rR2_biocrnpyler_728640_combined_model_of__biocrnpyler_728640_biocrnpyler_955036;
    r1_biocrnpyler_728640_combined_model_of__biocrnpyler_728640_biocrnpyler_955036_k = 0.0696;
  r2_biocrnpyler_728640_combined_model_of__biocrnpyler_728640_biocrnpyler_955036: dna_dA2_biocrnpyler_728640_combined_model_of__biocrnpyler_728640_biocrnpyler_955036 + rna_rR2_biocrnpyler_728640_combined_model_of__biocrnpyler_728640_biocrnpyler_955036 => complex_Core1_AI_biocrnpyler_728640_combined_model_of__biocrnpyler_728640_biocrnpyler_955036; r2_biocrnpyler_728640_combined_model_of__biocrnpyler_728640_biocrnpyler_955036_k*dna_dA2_biocrnpyler_728640_combined_model_of__biocrnpyler_728640_biocrnpyler_955036*rna_rR2_biocrnpyler_728640_combined_model_of__biocrnpyler_728640_biocrnpyler_955036;
    r2_biocrnpyler_728640_combined_model_of__biocrnpyler_728640_biocrnpyler_955036_k = 0.0696;
  r3_biocrnpyler_728640_combined_model_of__biocrnpyler_728640_biocrnpyler_955036: complex_Core1_ON_biocrnpyler_728640_combined_model_of__biocrnpyler_728640_biocrnpyler_955036 + protein_RNAP_biocrnpyler_728640_combined_model_of__biocrnpyler_728640_biocrnpyler_955036 => complex_Core1_ON_protein_RNAP_biocrnpyler_728640_combined_model_of__biocrnpyler_728640_biocrnpyler_955036; r3_biocrnpyler_728640_combined_model_of__biocrnpyler_728640_biocrnpyler_955036_k*complex_Core1_ON_biocrnpyler_728640_combined_model_of__biocrnpyler_728640_biocrnpyler_955036*protein_RNAP_biocrnpyler_728640_combined_model_of__biocrnpyler_728640_biocrnpyler_955036;
    r3_biocrnpyler_728640_combined_model_of__biocrnpyler_728640_biocrnpyler_955036_k = 38.85714;
  r3_1_biocrnpyler_728640_combined_model_of__biocrnpyler_728640_biocrnpyler_955036: complex_Core1_ON_protein_RNAP_biocrnpyler_728640_combined_model_of__biocrnpyler_728640_biocrnpyler_955036 => complex_Core1_ON_biocrnpyler_728640_combined_model_of__biocrnpyler_728640_biocrnpyler_955036 + protein_RNAP_biocrnpyler_728640_combined_model_of__biocrnpyler_728640_biocrnpyler_955036; r3_1_biocrnpyler_728640_combined_model_of__biocrnpyler_728640_biocrnpyler_955036_k*complex_Core1_ON_protein_RNAP_biocrnpyler_728640_combined_model_of__biocrnpyler_728640_biocrnpyler_955036;
    r3_1_biocrnpyler_728640_combined_model_of__biocrnpyler_728640_biocrnpyler_955036_k = 10;
  r5_biocrnpyler_728640_combined_model_of__biocrnpyler_728640_biocrnpyler_955036: complex_Core1_ON_protein_RNAP_biocrnpyler_728640_combined_model_of__biocrnpyler_728640_biocrnpyler_955036 => complex_Core1_ON_biocrnpyler_728640_combined_model_of__biocrnpyler_728640_biocrnpyler_955036 + rna_rR1_biocrnpyler_728640_1_combined_combined_model_of__biocrnpyler_728640_biocrnpyler_955036 + protein_RNAP_biocrnpyler_728640_combined_model_of__biocrnpyler_728640_biocrnpyler_955036; r5_biocrnpyler_728640_combined_model_of__biocrnpyler_728640_biocrnpyler_955036_k*complex_Core1_ON_protein_RNAP_biocrnpyler_728640_combined_model_of__biocrnpyler_728640_biocrnpyler_955036;
    r5_biocrnpyler_728640_combined_model_of__biocrnpyler_728640_biocrnpyler_955036_k = 0.064;
  r6_biocrnpyler_728640_combined_model_of__biocrnpyler_728640_biocrnpyler_955036: Core1_OFF_biocrnpyler_728640_combined_model_of__biocrnpyler_728640_biocrnpyler_955036 + protein_RNAP_biocrnpyler_728640_combined_model_of__biocrnpyler_728640_biocrnpyler_955036 => complex_Core1_OFF_protein_RNAP_biocrnpyler_728640_combined_model_of__biocrnpyler_728640_biocrnpyler_955036; r6_biocrnpyler_728640_combined_model_of__biocrnpyler_728640_biocrnpyler_955036_k*Core1_OFF_biocrnpyler_728640_combined_model_of__biocrnpyler_728640_biocrnpyler_955036*protein_RNAP_biocrnpyler_728640_combined_model_of__biocrnpyler_728640_biocrnpyler_955036;
    r6_biocrnpyler_728640_combined_model_of__biocrnpyler_728640_biocrnpyler_955036_k = 9.530476;
  r6_1_biocrnpyler_728640_combined_model_of__biocrnpyler_728640_biocrnpyler_955036: complex_Core1_OFF_protein_RNAP_biocrnpyler_728640_combined_model_of__biocrnpyler_728640_biocrnpyler_955036 => Core1_OFF_biocrnpyler_728640_combined_model_of__biocrnpyler_728640_biocrnpyler_955036 + protein_RNAP_biocrnpyler_728640_combined_model_of__biocrnpyler_728640_biocrnpyler_955036; r6_1_biocrnpyler_728640_combined_model_of__biocrnpyler_728640_biocrnpyler_955036_k*complex_Core1_OFF_protein_RNAP_biocrnpyler_728640_combined_model_of__biocrnpyler_728640_biocrnpyler_955036;
    r6_1_biocrnpyler_728640_combined_model_of__biocrnpyler_728640_biocrnpyler_955036_k = 10;
  r8_biocrnpyler_728640_combined_model_of__biocrnpyler_728640_biocrnpyler_955036: complex_Core1_OFF_protein_RNAP_biocrnpyler_728640_combined_model_of__biocrnpyler_728640_biocrnpyler_955036 => Core1_OFF_biocrnpyler_728640_combined_model_of__biocrnpyler_728640_biocrnpyler_955036 + rna_rR1_biocrnpyler_728640_1_combined_combined_model_of__biocrnpyler_728640_biocrnpyler_955036 + protein_RNAP_biocrnpyler_728640_combined_model_of__biocrnpyler_728640_biocrnpyler_955036; r8_biocrnpyler_728640_combined_model_of__biocrnpyler_728640_biocrnpyler_955036_k*complex_Core1_OFF_protein_RNAP_biocrnpyler_728640_combined_model_of__biocrnpyler_728640_biocrnpyler_955036;
    r8_biocrnpyler_728640_combined_model_of__biocrnpyler_728640_biocrnpyler_955036_k = 0.007;
  r9_biocrnpyler_728640_combined_model_of__biocrnpyler_728640_biocrnpyler_955036: complex_Core1_AI_biocrnpyler_728640_combined_model_of__biocrnpyler_728640_biocrnpyler_955036 + protein_RNAseH_biocrnpyler_728640_combined_model_of__biocrnpyler_728640_biocrnpyler_955036 => complex_Core1_AI_protein_RNAseH_biocrnpyler_728640_combined_model_of__biocrnpyler_728640_biocrnpyler_955036; r9_biocrnpyler_728640_combined_model_of__biocrnpyler_728640_biocrnpyler_955036_k*complex_Core1_AI_biocrnpyler_728640_combined_model_of__biocrnpyler_728640_biocrnpyler_955036*protein_RNAseH_biocrnpyler_728640_combined_model_of__biocrnpyler_728640_biocrnpyler_955036;
    r9_biocrnpyler_728640_combined_model_of__biocrnpyler_728640_biocrnpyler_955036_k = 111.8242;
  r9_1_biocrnpyler_728640_combined_model_of__biocrnpyler_728640_biocrnpyler_955036: complex_Core1_AI_protein_RNAseH_biocrnpyler_728640_combined_model_of__biocrnpyler_728640_biocrnpyler_955036 => complex_Core1_AI_biocrnpyler_728640_combined_model_of__biocrnpyler_728640_biocrnpyler_955036 + protein_RNAseH_biocrnpyler_728640_combined_model_of__biocrnpyler_728640_biocrnpyler_955036; r9_1_biocrnpyler_728640_combined_model_of__biocrnpyler_728640_biocrnpyler_955036_k*complex_Core1_AI_protein_RNAseH_biocrnpyler_728640_combined_model_of__biocrnpyler_728640_biocrnpyler_955036;
    r9_1_biocrnpyler_728640_combined_model_of__biocrnpyler_728640_biocrnpyler_955036_k = 10;
  r11_biocrnpyler_728640_combined_model_of__biocrnpyler_728640_biocrnpyler_955036: complex_Core1_AI_protein_RNAseH_biocrnpyler_728640_combined_model_of__biocrnpyler_728640_biocrnpyler_955036 => dna_dA2_biocrnpyler_728640_combined_model_of__biocrnpyler_728640_biocrnpyler_955036 + protein_RNAseH_biocrnpyler_728640_combined_model_of__biocrnpyler_728640_biocrnpyler_955036; r11_biocrnpyler_728640_combined_model_of__biocrnpyler_728640_biocrnpyler_955036_k*complex_Core1_AI_protein_RNAseH_biocrnpyler_728640_combined_model_of__biocrnpyler_728640_biocrnpyler_955036;
    r11_biocrnpyler_728640_combined_model_of__biocrnpyler_728640_biocrnpyler_955036_k = 0.176;
  r12_biocrnpyler_728640_combined_model_of__biocrnpyler_728640_biocrnpyler_955036: Core2_OFF_biocrnpyler_728640_combined_model_of__biocrnpyler_728640_biocrnpyler_955036 + dna_dA1_biocrnpyler_728640_combined_model_of__biocrnpyler_728640_biocrnpyler_955036 => complex_Core2_ON_biocrnpyler_728640_combined_model_of__biocrnpyler_728640_biocrnpyler_955036; r12_biocrnpyler_728640_combined_model_of__biocrnpyler_728640_biocrnpyler_955036_k*Core2_OFF_biocrnpyler_728640_combined_model_of__biocrnpyler_728640_biocrnpyler_955036*dna_dA1_biocrnpyler_728640_combined_model_of__biocrnpyler_728640_biocrnpyler_955036;
    r12_biocrnpyler_728640_combined_model_of__biocrnpyler_728640_biocrnpyler_955036_k = 0.00394;
  r13_biocrnpyler_728640_combined_model_of__biocrnpyler_728640_biocrnpyler_955036: complex_Core2_ON_biocrnpyler_728640_combined_model_of__biocrnpyler_728640_biocrnpyler_955036 + rna_rR1_biocrnpyler_728640_1_combined_combined_model_of__biocrnpyler_728640_biocrnpyler_955036 => Core2_OFF_biocrnpyler_728640_combined_model_of__biocrnpyler_728640_biocrnpyler_955036 + complex_Core2_AI_biocrnpyler_728640_combined_model_of__biocrnpyler_728640_biocrnpyler_955036; r13_biocrnpyler_728640_combined_model_of__biocrnpyler_728640_biocrnpyler_955036_k*complex_Core2_ON_biocrnpyler_728640_combined_model_of__biocrnpyler_728640_biocrnpyler_955036*rna_rR1_biocrnpyler_728640_1_combined_combined_model_of__biocrnpyler_728640_biocrnpyler_955036;
    r13_biocrnpyler_728640_combined_model_of__biocrnpyler_728640_biocrnpyler_955036_k = 0.0696;
  r14_biocrnpyler_728640_combined_model_of__biocrnpyler_728640_biocrnpyler_955036: dna_dA1_biocrnpyler_728640_combined_model_of__biocrnpyler_728640_biocrnpyler_955036 + rna_rR1_biocrnpyler_728640_1_combined_combined_model_of__biocrnpyler_728640_biocrnpyler_955036 => complex_Core2_AI_biocrnpyler_728640_combined_model_of__biocrnpyler_728640_biocrnpyler_955036; r14_biocrnpyler_728640_combined_model_of__biocrnpyler_728640_biocrnpyler_955036_k*dna_dA1_biocrnpyler_728640_combined_model_of__biocrnpyler_728640_biocrnpyler_955036*rna_rR1_biocrnpyler_728640_1_combined_combined_model_of__biocrnpyler_728640_biocrnpyler_955036;
    r14_biocrnpyler_728640_combined_model_of__biocrnpyler_728640_biocrnpyler_955036_k = 0.0696;
  r15_biocrnpyler_728640_combined_model_of__biocrnpyler_728640_biocrnpyler_955036: complex_Core2_ON_biocrnpyler_728640_combined_model_of__biocrnpyler_728640_biocrnpyler_955036 + protein_RNAP_biocrnpyler_728640_combined_model_of__biocrnpyler_728640_biocrnpyler_955036 => complex_Core2_ON_protein_RNAP_biocrnpyler_728640_combined_model_of__biocrnpyler_728640_biocrnpyler_955036; r15_biocrnpyler_728640_combined_model_of__biocrnpyler_728640_biocrnpyler_955036_k*complex_Core2_ON_biocrnpyler_728640_combined_model_of__biocrnpyler_728640_biocrnpyler_955036*protein_RNAP_biocrnpyler_728640_combined_model_of__biocrnpyler_728640_biocrnpyler_955036;
    r15_biocrnpyler_728640_combined_model_of__biocrnpyler_728640_biocrnpyler_955036_k = 38.85714;
  r15_1_biocrnpyler_728640_combined_model_of__biocrnpyler_728640_biocrnpyler_955036: complex_Core2_ON_protein_RNAP_biocrnpyler_728640_combined_model_of__biocrnpyler_728640_biocrnpyler_955036 => complex_Core2_ON_biocrnpyler_728640_combined_model_of__biocrnpyler_728640_biocrnpyler_955036 + protein_RNAP_biocrnpyler_728640_combined_model_of__biocrnpyler_728640_biocrnpyler_955036; r15_1_biocrnpyler_728640_combined_model_of__biocrnpyler_728640_biocrnpyler_955036_k*complex_Core2_ON_protein_RNAP_biocrnpyler_728640_combined_model_of__biocrnpyler_728640_biocrnpyler_955036;
    r15_1_biocrnpyler_728640_combined_model_of__biocrnpyler_728640_biocrnpyler_955036_k = 10;
  r17_biocrnpyler_728640_combined_model_of__biocrnpyler_728640_biocrnpyler_955036: complex_Core2_ON_protein_RNAP_biocrnpyler_728640_combined_model_of__biocrnpyler_728640_biocrnpyler_955036 => complex_Core2_ON_biocrnpyler_728640_combined_model_of__biocrnpyler_728640_biocrnpyler_955036 + rna_rR2_biocrnpyler_728640_combined_model_of__biocrnpyler_728640_biocrnpyler_955036 + protein_RNAP_biocrnpyler_728640_combined_model_of__biocrnpyler_728640_biocrnpyler_955036; r17_biocrnpyler_728640_combined_model_of__biocrnpyler_728640_biocrnpyler_955036_k*complex_Core2_ON_protein_RNAP_biocrnpyler_728640_combined_model_of__biocrnpyler_728640_biocrnpyler_955036;
    r17_biocrnpyler_728640_combined_model_of__biocrnpyler_728640_biocrnpyler_955036_k = 0.064;
  r18_biocrnpyler_728640_combined_model_of__biocrnpyler_728640_biocrnpyler_955036: Core2_OFF_biocrnpyler_728640_combined_model_of__biocrnpyler_728640_biocrnpyler_955036 + protein_RNAP_biocrnpyler_728640_combined_model_of__biocrnpyler_728640_biocrnpyler_955036 => complex_Core2_OFF_protein_RNAP_biocrnpyler_728640_combined_model_of__biocrnpyler_728640_biocrnpyler_955036; r18_biocrnpyler_728640_combined_model_of__biocrnpyler_728640_biocrnpyler_955036_k*Core2_OFF_biocrnpyler_728640_combined_model_of__biocrnpyler_728640_biocrnpyler_955036*protein_RNAP_biocrnpyler_728640_combined_model_of__biocrnpyler_728640_biocrnpyler_955036;
    r18_biocrnpyler_728640_combined_model_of__biocrnpyler_728640_biocrnpyler_955036_k = 9.530476;
  r18_1_biocrnpyler_728640_combined_model_of__biocrnpyler_728640_biocrnpyler_955036: complex_Core2_OFF_protein_RNAP_biocrnpyler_728640_combined_model_of__biocrnpyler_728640_biocrnpyler_955036 => Core2_OFF_biocrnpyler_728640_combined_model_of__biocrnpyler_728640_biocrnpyler_955036 + protein_RNAP_biocrnpyler_728640_combined_model_of__biocrnpyler_728640_biocrnpyler_955036; r18_1_biocrnpyler_728640_combined_model_of__biocrnpyler_728640_biocrnpyler_955036_k*complex_Core2_OFF_protein_RNAP_biocrnpyler_728640_combined_model_of__biocrnpyler_728640_biocrnpyler_955036;
    r18_1_biocrnpyler_728640_combined_model_of__biocrnpyler_728640_biocrnpyler_955036_k = 10;
  r20_biocrnpyler_728640_combined_model_of__biocrnpyler_728640_biocrnpyler_955036: complex_Core2_OFF_protein_RNAP_biocrnpyler_728640_combined_model_of__biocrnpyler_728640_biocrnpyler_955036 => Core2_OFF_biocrnpyler_728640_combined_model_of__biocrnpyler_728640_biocrnpyler_955036 + rna_rR2_biocrnpyler_728640_combined_model_of__biocrnpyler_728640_biocrnpyler_955036 + protein_RNAP_biocrnpyler_728640_combined_model_of__biocrnpyler_728640_biocrnpyler_955036; r20_biocrnpyler_728640_combined_model_of__biocrnpyler_728640_biocrnpyler_955036_k*complex_Core2_OFF_protein_RNAP_biocrnpyler_728640_combined_model_of__biocrnpyler_728640_biocrnpyler_955036;
    r20_biocrnpyler_728640_combined_model_of__biocrnpyler_728640_biocrnpyler_955036_k = 0.007;
  r21_biocrnpyler_728640_combined_model_of__biocrnpyler_728640_biocrnpyler_955036: complex_Core2_AI_biocrnpyler_728640_combined_model_of__biocrnpyler_728640_biocrnpyler_955036 + protein_RNAseH_biocrnpyler_728640_combined_model_of__biocrnpyler_728640_biocrnpyler_955036 => complex_Core2_AI_protein_RNAseH_biocrnpyler_728640_combined_model_of__biocrnpyler_728640_biocrnpyler_955036; r21_biocrnpyler_728640_combined_model_of__biocrnpyler_728640_biocrnpyler_955036_k*complex_Core2_AI_biocrnpyler_728640_combined_model_of__biocrnpyler_728640_biocrnpyler_955036*protein_RNAseH_biocrnpyler_728640_combined_model_of__biocrnpyler_728640_biocrnpyler_955036;
    r21_biocrnpyler_728640_combined_model_of__biocrnpyler_728640_biocrnpyler_955036_k = 111.8242;
  r21_1_biocrnpyler_728640_combined_model_of__biocrnpyler_728640_biocrnpyler_955036: complex_Core2_AI_protein_RNAseH_biocrnpyler_728640_combined_model_of__biocrnpyler_728640_biocrnpyler_955036 => complex_Core2_AI_biocrnpyler_728640_combined_model_of__biocrnpyler_728640_biocrnpyler_955036 + protein_RNAseH_biocrnpyler_728640_combined_model_of__biocrnpyler_728640_biocrnpyler_955036; r21_1_biocrnpyler_728640_combined_model_of__biocrnpyler_728640_biocrnpyler_955036_k*complex_Core2_AI_protein_RNAseH_biocrnpyler_728640_combined_model_of__biocrnpyler_728640_biocrnpyler_955036;
    r21_1_biocrnpyler_728640_combined_model_of__biocrnpyler_728640_biocrnpyler_955036_k = 10;
  r23_biocrnpyler_728640_combined_model_of__biocrnpyler_728640_biocrnpyler_955036: complex_Core2_AI_protein_RNAseH_biocrnpyler_728640_combined_model_of__biocrnpyler_728640_biocrnpyler_955036 => dna_dA1_biocrnpyler_728640_combined_model_of__biocrnpyler_728640_biocrnpyler_955036 + protein_RNAseH_biocrnpyler_728640_combined_model_of__biocrnpyler_728640_biocrnpyler_955036; r23_biocrnpyler_728640_combined_model_of__biocrnpyler_728640_biocrnpyler_955036_k*complex_Core2_AI_protein_RNAseH_biocrnpyler_728640_combined_model_of__biocrnpyler_728640_biocrnpyler_955036;
    r23_biocrnpyler_728640_combined_model_of__biocrnpyler_728640_biocrnpyler_955036_k = 0.176;
  r0_biocrnpyler_955036_combined_model_of__biocrnpyler_728640_biocrnpyler_955036: rna_I4_B_1_combined + rna_rR1_biocrnpyler_728640_1_combined_combined_model_of__biocrnpyler_728640_biocrnpyler_955036 => complex_rna_I4_B_rna_rR1_1_combined; r0_biocrnpyler_955036_combined_model_of__biocrnpyler_728640_biocrnpyler_955036_k*rna_I4_B_1_combined*rna_rR1_biocrnpyler_728640_1_combined_combined_model_of__biocrnpyler_728640_biocrnpyler_955036;
    r0_biocrnpyler_955036_combined_model_of__biocrnpyler_728640_biocrnpyler_955036_k = 0.0996;

  // Unit definitions:
  unit square_metre = metre^2;
  unit per_second = 1 / second;
  unit substance = dimensionless;
end
