// SBML level 3 version 2

model combined_model_of__combined_model_of__combined_model_of__external_environment_model_combined_model_of__Biexp_membrane_combined_model_of__combined_model_of__biocrnpyler_728640_biocrnpyler_955036_combined_model_of__combined_model_of__external_environment_model_combined_model_of__Nexp_membrane_combined_model_of__biocrnpyler_593175()
  // model units - substance: mole, time: second, volume: litre, area: square_metre, length: metre, extent: mole

  // Compartments:
  compartment actual_external_combined = 4e-6 litre;
  compartment cell_Bi_internal_combined = 1e-6 litre;
  compartment cell_N_internal_combined = 1e-6 litre;

  // Species:
  species sidB in cell_Bi_internal_combined = 1;
  species rna_I4_e_sidB in cell_Bi_internal_combined = 0;
  species sidW in cell_Bi_internal_combined = 1;
  species complex_rna_I4_B_rna_rR1_sidW in cell_Bi_internal_combined = 0;
  species Core1_OFF_biocrnpyler_728640_combined_model_of__biocrnpyler_728640_biocrnpyler_955036 in cell_Bi_internal_combined = 1.2/cell_Bi_internal_combined;
  species complex_Core1_ON_biocrnpyler_728640_combined_model_of__biocrnpyler_728640_biocrnpyler_955036 in cell_Bi_internal_combined = 0;
  species dna_dA2_biocrnpyler_728640_combined_model_of__biocrnpyler_728640_biocrnpyler_955036 in cell_Bi_internal_combined = 1.2/cell_Bi_internal_combined;
  species rna_rR2_biocrnpyler_728640_combined_model_of__biocrnpyler_728640_biocrnpyler_955036 in cell_Bi_internal_combined = 0;
  species protein_RNAP_biocrnpyler_728640_combined_model_of__biocrnpyler_728640_biocrnpyler_955036 in cell_Bi_internal_combined = 0.03/cell_Bi_internal_combined;
  species protein_RNAseH_biocrnpyler_728640_combined_model_of__biocrnpyler_728640_biocrnpyler_955036 in cell_Bi_internal_combined = 0.0044/cell_Bi_internal_combined;
  species complex_Core1_AI_biocrnpyler_728640_combined_model_of__biocrnpyler_728640_biocrnpyler_955036 in cell_Bi_internal_combined = 0;
  species complex_Core1_ON_protein_RNAP_biocrnpyler_728640_combined_model_of__biocrnpyler_728640_biocrnpyler_955036 in cell_Bi_internal_combined = 0;
  species complex_Core1_OFF_protein_RNAP_biocrnpyler_728640_combined_model_of__biocrnpyler_728640_biocrnpyler_955036 in cell_Bi_internal_combined = 0;
  species complex_Core1_AI_protein_RNAseH_biocrnpyler_728640_combined_model_of__biocrnpyler_728640_biocrnpyler_955036 in cell_Bi_internal_combined = 0;
  species Core2_OFF_biocrnpyler_728640_combined_model_of__biocrnpyler_728640_biocrnpyler_955036 in cell_Bi_internal_combined = 0.99/cell_Bi_internal_combined;
  species complex_Core2_ON_biocrnpyler_728640_combined_model_of__biocrnpyler_728640_biocrnpyler_955036 in cell_Bi_internal_combined = 0;
  species dna_dA1_biocrnpyler_728640_combined_model_of__biocrnpyler_728640_biocrnpyler_955036 in cell_Bi_internal_combined = 1.2/cell_Bi_internal_combined;
  species complex_Core2_AI_biocrnpyler_728640_combined_model_of__biocrnpyler_728640_biocrnpyler_955036 in cell_Bi_internal_combined = 0;
  species complex_Core2_ON_protein_RNAP_biocrnpyler_728640_combined_model_of__biocrnpyler_728640_biocrnpyler_955036 in cell_Bi_internal_combined = 0;
  species complex_Core2_OFF_protein_RNAP_biocrnpyler_728640_combined_model_of__biocrnpyler_728640_biocrnpyler_955036 in cell_Bi_internal_combined = 0;
  species complex_Core2_AI_protein_RNAseH_biocrnpyler_728640_combined_model_of__biocrnpyler_728640_biocrnpyler_955036 in cell_Bi_internal_combined = 0;
  species rna_I4_B_1_combined in cell_Bi_internal_combined = 0;
  species rna_rR1_biocrnpyler_728640_1_combined_combined_model_of__biocrnpyler_728640_biocrnpyler_955036 in cell_Bi_internal_combined = 0;
  species complex_rna_I4_B_rna_rR1_1_combined in cell_Bi_internal_combined = 0;
  species complex_rna_I4_B_rna_rR1_E_external_environment_model_1_combined_1_combined in actual_external_combined = 0;
  species sidI1 in cell_N_internal_combined = 1;
  species sidI2 in cell_N_internal_combined = 1;
  species sidI4 in cell_N_internal_combined = 1;
  species rna_I1_e_external_environment_model_1_combined in actual_external_combined = 0.9/actual_external_combined;
  species rna_I1_e_sidI1 in cell_N_internal_combined = 0;
  species rna_I2_e_external_environment_model_1_combined in actual_external_combined = 0.9/actual_external_combined;
  species rna_I2_e_sidI2 in cell_N_internal_combined = 0;
  species rna_I4_sidI4 in cell_N_internal_combined = 0;
  species Sw1_OFF_biocrnpyler_593175 in cell_N_internal_combined = 1.2/cell_N_internal_combined;
  species complex_Sw1_ON_biocrnpyler_593175 in cell_N_internal_combined = 0;
  species rna_I31_biocrnpyler_593175 in cell_N_internal_combined = 0;
  species dna_A1_biocrnpyler_593175 in cell_N_internal_combined = 1.2/cell_N_internal_combined;
  species rna_I1_1_combined in cell_N_internal_combined = 0;
  species protein_RNAP_biocrnpyler_593175 in cell_N_internal_combined = 0.03/cell_N_internal_combined;
  species protein_RNAseH_biocrnpyler_593175 in cell_N_internal_combined = 0.0044/cell_N_internal_combined;
  species complex_Sw1_AI_biocrnpyler_593175 in cell_N_internal_combined = 0;
  species complex_Sw1_ON_protein_RNAP_biocrnpyler_593175 in cell_N_internal_combined = 0;
  species complex_Sw1_OFF_protein_RNAP_biocrnpyler_593175 in cell_N_internal_combined = 0;
  species complex_Sw1_AI_protein_RNAseH_biocrnpyler_593175 in cell_N_internal_combined = 0;
  species Sw2_OFF_biocrnpyler_593175 in cell_N_internal_combined = 1.2/cell_N_internal_combined;
  species complex_Sw2_ON_biocrnpyler_593175 in cell_N_internal_combined = 0;
  species rna_I32_biocrnpyler_593175 in cell_N_internal_combined = 0;
  species dna_A2_biocrnpyler_593175 in cell_N_internal_combined = 1.2/cell_N_internal_combined;
  species rna_I2_1_combined in cell_N_internal_combined = 0;
  species complex_Sw2_AI_biocrnpyler_593175 in cell_N_internal_combined = 0;
  species complex_Sw2_ON_protein_RNAP_biocrnpyler_593175 in cell_N_internal_combined = 0;
  species complex_Sw2_OFF_protein_RNAP_biocrnpyler_593175 in cell_N_internal_combined = 0;
  species complex_Sw2_AI_protein_RNAseH_biocrnpyler_593175 in cell_N_internal_combined = 0;
  species Sw3_OFF_biocrnpyler_593175 in cell_N_internal_combined = 1.2/cell_N_internal_combined;
  species complex_Sw3_ON_1_biocrnpyler_593175 in cell_N_internal_combined = 0;
  species complex_Sw3_ON_2_biocrnpyler_593175 in cell_N_internal_combined = 0;
  species rna_I4_1_combined in cell_N_internal_combined = 0;
  species dna_A31_biocrnpyler_593175 in cell_N_internal_combined = 1.2/cell_N_internal_combined;
  species dna_A32_biocrnpyler_593175 in cell_N_internal_combined = 1.2/cell_N_internal_combined;
  species complex_Sw3_AI_biocrnpyler_593175 in cell_N_internal_combined = 0;
  species complex_Sw3_AI_2_biocrnpyler_593175 in cell_N_internal_combined = 0;
  species complex_Sw3_ON_2_protein_RNAP_biocrnpyler_593175 in cell_N_internal_combined = 0;
  species complex_Sw3_AI_2_protein_RNAseH_biocrnpyler_593175 in cell_N_internal_combined = 0;
  species complex_Sw3_ON_1_protein_RNAP_biocrnpyler_593175 in cell_N_internal_combined = 0;
  species complex_Sw3_OFF_protein_RNAP_biocrnpyler_593175 in cell_N_internal_combined = 0;
  species complex_Sw3_AI_protein_RNAseH_biocrnpyler_593175 in cell_N_internal_combined = 0;
  species rna_I4_e_external_environment_model_1_combined_1_combined in actual_external = 0;

  // Parameters:
  kb = 0.01 per_second;
  kd = 0.2 per_second;
  kc = 0.2 per_second;
  ke = 0.01 per_second;
  kb1 = 0.01 per_second;
  kd1 = 0.2 per_second;
  kc1 = 0.2 per_second;
  ke1 = 0.01 per_second;

  // Reactions:
  R1: sidB + rna_I4_e_external_environment_model_1_combined_1_combined -> rna_I4_e_sidB; kb*sidB*rna_I4_e_external_environment_model_1_combined_1_combined - kd*rna_I4_e_sidB;
  R2: rna_I4_e_sidB -> rna_I4_B_1_combined + sidB; kd*rna_I4_e_sidB - kb*sidB*rna_I4_B_1_combined;
  R3: sidW + complex_rna_I4_B_rna_rR1_1_combined -> complex_rna_I4_B_rna_rR1_sidW; kc*sidW*complex_rna_I4_B_rna_rR1_1_combined - ke*complex_rna_I4_B_rna_rR1_sidW;
  R4: complex_rna_I4_B_rna_rR1_sidW -> complex_rna_I4_B_rna_rR1_E_external_environment_model_1_combined_1_combined + sidW; ke*complex_rna_I4_B_rna_rR1_sidW - kc*sidW*complex_rna_I4_B_rna_rR1_E_external_environment_model_1_combined_1_combined;
  r0_biocrnpyler_728640_combined_model_of__biocrnpyler_728640_biocrnpyler_955036: Core1_OFF_biocrnpyler_728640_combined_model_of__biocrnpyler_728640_biocrnpyler_955036 + dna_dA2_biocrnpyler_728640_combined_model_of__biocrnpyler_728640_biocrnpyler_955036 => complex_Core1_ON_biocrnpyler_728640_combined_model_of__biocrnpyler_728640_biocrnpyler_955036; r0_biocrnpyler_728640_combined_model_of__biocrnpyler_728640_biocrnpyler_955036_k*Core1_OFF_biocrnpyler_728640_combined_model_of__biocrnpyler_728640_biocrnpyler_955036*dna_dA2_biocrnpyler_728640_combined_model_of__biocrnpyler_728640_biocrnpyler_955036;
    r0_biocrnpyler_728640_combined_model_of__biocrnpyler_728640_biocrnpyler_955036_k = 0.00394;
  r1_biocrnpyler_728640_combined_model_of__biocrnpyler_728640_biocrnpyler_955036: complex_Core1_ON_biocrnpyler_728640_combined_model_of__biocrnpyler_728640_biocrnpyler_955036 + rna_rR2_biocrnpyler_728640_combined_model_of__biocrnpyler_728640_biocrnpyler_955036 => Core1_OFF_biocrnpyler_728640_combined_model_of__biocrnpyler_728640_biocrnpyler_955036 + complex_Core1_AI_biocrnpyler_728640_combined_model_of__biocrnpyler_728640_biocrnpyler_955036; r1_biocrnpyler_728640_combined_model_of__biocrnpyler_728640_biocrnpyler_955036_k*complex_Core1_ON_biocrnpyler_728640_combined_model_of__biocrnpyler_728640_biocrnpyler_955036*rna_rR2_biocrnpyler_728640_combined_model_of__biocrnpyler_728640_biocrnpyler_955036;
    r1_biocrnpyler_728640_combined_model_of__biocrnpyler_728640_biocrnpyler_955036_k = 0.0696;
  r2_biocrnpyler_728640_combined_model_of__biocrnpyler_728640_biocrnpyler_955036: dna_dA2_biocrnpyler_728640_combined_model_of__biocrnpyler_728640_biocrnpyler_955036 + rna_rR2_biocrnpyler_728640_combined_model_of__biocrnpyler_728640_biocrnpyler_955036 => complex_Core1_AI_biocrnpyler_728640_combined_model_of__biocrnpyler_728640_biocrnpyler_955036; r2_biocrnpyler_728640_combined_model_of__biocrnpyler_728640_biocrnpyler_955036_k*dna_dA2_biocrnpyler_728640_combined_model_of__biocrnpyler_728640_biocrnpyler_955036*rna_rR2_biocrnpyler_728640_combined_model_of__biocrnpyler_728640_biocrnpyler_955036;
    r2_biocrnpyler_728640_combined_model_of__biocrnpyler_728640_biocrnpyler_955036_k = 0.0696;
  r3_biocrnpyler_728640_combined_model_of__biocrnpyler_728640_biocrnpyler_955036: complex_Core1_ON_biocrnpyler_728640_combined_model_of__biocrnpyler_728640_biocrnpyler_955036 + protein_RNAP_biocrnpyler_728640_combined_model_of__biocrnpyler_728640_biocrnpyler_955036 => complex_Core1_ON_protein_RNAP_biocrnpyler_728640_combined_model_of__biocrnpyler_728640_biocrnpyler_955036; r3_biocrnpyler_728640_combined_model_of__biocrnpyler_728640_biocrnpyler_955036_k*complex_Core1_ON_biocrnpyler_728640_combined_model_of__biocrnpyler_728640_biocrnpyler_955036*protein_RNAP_biocrnpyler_728640_combined_model_of__biocrnpyler_728640_biocrnpyler_955036;
    r3_biocrnpyler_728640_combined_model_of__biocrnpyler_728640_biocrnpyler_955036_k = 38.85714;
  r3_1_biocrnpyler_728640_combined_model_of__biocrnpyler_728640_biocrnpyler_955036: complex_Core1_ON_protein_RNAP_biocrnpyler_728640_combined_model_of__biocrnpyler_728640_biocrnpyler_955036 => complex_Core1_ON_biocrnpyler_728640_combined_model_of__biocrnpyler_728640_biocrnpyler_955036 + protein_RNAP_biocrnpyler_728640_combined_model_of__biocrnpyler_728640_biocrnpyler_955036; r3_1_biocrnpyler_728640_combined_model_of__biocrnpyler_728640_biocrnpyler_955036_k*complex_Core1_ON_protein_RNAP_biocrnpyler_728640_combined_model_of__biocrnpyler_728640_biocrnpyler_955036;
    r3_1_biocrnpyler_728640_combined_model_of__biocrnpyler_728640_biocrnpyler_955036_k = 10;
  r5_biocrnpyler_728640_combined_model_of__biocrnpyler_728640_biocrnpyler_955036: complex_Core1_ON_protein_RNAP_biocrnpyler_728640_combined_model_of__biocrnpyler_728640_biocrnpyler_955036 => complex_Core1_ON_biocrnpyler_728640_combined_model_of__biocrnpyler_728640_biocrnpyler_955036 + rna_rR1_biocrnpyler_728640_1_combined_combined_model_of__biocrnpyler_728640_biocrnpyler_955036 + protein_RNAP_biocrnpyler_728640_combined_model_of__biocrnpyler_728640_biocrnpyler_955036; r5_biocrnpyler_728640_combined_model_of__biocrnpyler_728640_biocrnpyler_955036_k*complex_Core1_ON_protein_RNAP_biocrnpyler_728640_combined_model_of__biocrnpyler_728640_biocrnpyler_955036;
    r5_biocrnpyler_728640_combined_model_of__biocrnpyler_728640_biocrnpyler_955036_k = 0.064;
  r6_biocrnpyler_728640_combined_model_of__biocrnpyler_728640_biocrnpyler_955036: Core1_OFF_biocrnpyler_728640_combined_model_of__biocrnpyler_728640_biocrnpyler_955036 + protein_RNAP_biocrnpyler_728640_combined_model_of__biocrnpyler_728640_biocrnpyler_955036 => complex_Core1_OFF_protein_RNAP_biocrnpyler_728640_combined_model_of__biocrnpyler_728640_biocrnpyler_955036; r6_biocrnpyler_728640_combined_model_of__biocrnpyler_728640_biocrnpyler_955036_k*Core1_OFF_biocrnpyler_728640_combined_model_of__biocrnpyler_728640_biocrnpyler_955036*protein_RNAP_biocrnpyler_728640_combined_model_of__biocrnpyler_728640_biocrnpyler_955036;
    r6_biocrnpyler_728640_combined_model_of__biocrnpyler_728640_biocrnpyler_955036_k = 9.530476;
  r6_1_biocrnpyler_728640_combined_model_of__biocrnpyler_728640_biocrnpyler_955036: complex_Core1_OFF_protein_RNAP_biocrnpyler_728640_combined_model_of__biocrnpyler_728640_biocrnpyler_955036 => Core1_OFF_biocrnpyler_728640_combined_model_of__biocrnpyler_728640_biocrnpyler_955036 + protein_RNAP_biocrnpyler_728640_combined_model_of__biocrnpyler_728640_biocrnpyler_955036; r6_1_biocrnpyler_728640_combined_model_of__biocrnpyler_728640_biocrnpyler_955036_k*complex_Core1_OFF_protein_RNAP_biocrnpyler_728640_combined_model_of__biocrnpyler_728640_biocrnpyler_955036;
    r6_1_biocrnpyler_728640_combined_model_of__biocrnpyler_728640_biocrnpyler_955036_k = 10;
  r8_biocrnpyler_728640_combined_model_of__biocrnpyler_728640_biocrnpyler_955036: complex_Core1_OFF_protein_RNAP_biocrnpyler_728640_combined_model_of__biocrnpyler_728640_biocrnpyler_955036 => Core1_OFF_biocrnpyler_728640_combined_model_of__biocrnpyler_728640_biocrnpyler_955036 + rna_rR1_biocrnpyler_728640_1_combined_combined_model_of__biocrnpyler_728640_biocrnpyler_955036 + protein_RNAP_biocrnpyler_728640_combined_model_of__biocrnpyler_728640_biocrnpyler_955036; r8_biocrnpyler_728640_combined_model_of__biocrnpyler_728640_biocrnpyler_955036_k*complex_Core1_OFF_protein_RNAP_biocrnpyler_728640_combined_model_of__biocrnpyler_728640_biocrnpyler_955036;
    r8_biocrnpyler_728640_combined_model_of__biocrnpyler_728640_biocrnpyler_955036_k = 0.007;
  r9_biocrnpyler_728640_combined_model_of__biocrnpyler_728640_biocrnpyler_955036: complex_Core1_AI_biocrnpyler_728640_combined_model_of__biocrnpyler_728640_biocrnpyler_955036 + protein_RNAseH_biocrnpyler_728640_combined_model_of__biocrnpyler_728640_biocrnpyler_955036 => complex_Core1_AI_protein_RNAseH_biocrnpyler_728640_combined_model_of__biocrnpyler_728640_biocrnpyler_955036; r9_biocrnpyler_728640_combined_model_of__biocrnpyler_728640_biocrnpyler_955036_k*complex_Core1_AI_biocrnpyler_728640_combined_model_of__biocrnpyler_728640_biocrnpyler_955036*protein_RNAseH_biocrnpyler_728640_combined_model_of__biocrnpyler_728640_biocrnpyler_955036;
    r9_biocrnpyler_728640_combined_model_of__biocrnpyler_728640_biocrnpyler_955036_k = 111.8242;
  r9_1_biocrnpyler_728640_combined_model_of__biocrnpyler_728640_biocrnpyler_955036: complex_Core1_AI_protein_RNAseH_biocrnpyler_728640_combined_model_of__biocrnpyler_728640_biocrnpyler_955036 => complex_Core1_AI_biocrnpyler_728640_combined_model_of__biocrnpyler_728640_biocrnpyler_955036 + protein_RNAseH_biocrnpyler_728640_combined_model_of__biocrnpyler_728640_biocrnpyler_955036; r9_1_biocrnpyler_728640_combined_model_of__biocrnpyler_728640_biocrnpyler_955036_k*complex_Core1_AI_protein_RNAseH_biocrnpyler_728640_combined_model_of__biocrnpyler_728640_biocrnpyler_955036;
    r9_1_biocrnpyler_728640_combined_model_of__biocrnpyler_728640_biocrnpyler_955036_k = 10;
  r11_biocrnpyler_728640_combined_model_of__biocrnpyler_728640_biocrnpyler_955036: complex_Core1_AI_protein_RNAseH_biocrnpyler_728640_combined_model_of__biocrnpyler_728640_biocrnpyler_955036 => dna_dA2_biocrnpyler_728640_combined_model_of__biocrnpyler_728640_biocrnpyler_955036 + protein_RNAseH_biocrnpyler_728640_combined_model_of__biocrnpyler_728640_biocrnpyler_955036; r11_biocrnpyler_728640_combined_model_of__biocrnpyler_728640_biocrnpyler_955036_k*complex_Core1_AI_protein_RNAseH_biocrnpyler_728640_combined_model_of__biocrnpyler_728640_biocrnpyler_955036;
    r11_biocrnpyler_728640_combined_model_of__biocrnpyler_728640_biocrnpyler_955036_k = 0.176;
  r12_biocrnpyler_728640_combined_model_of__biocrnpyler_728640_biocrnpyler_955036: Core2_OFF_biocrnpyler_728640_combined_model_of__biocrnpyler_728640_biocrnpyler_955036 + dna_dA1_biocrnpyler_728640_combined_model_of__biocrnpyler_728640_biocrnpyler_955036 => complex_Core2_ON_biocrnpyler_728640_combined_model_of__biocrnpyler_728640_biocrnpyler_955036; r12_biocrnpyler_728640_combined_model_of__biocrnpyler_728640_biocrnpyler_955036_k*Core2_OFF_biocrnpyler_728640_combined_model_of__biocrnpyler_728640_biocrnpyler_955036*dna_dA1_biocrnpyler_728640_combined_model_of__biocrnpyler_728640_biocrnpyler_955036;
    r12_biocrnpyler_728640_combined_model_of__biocrnpyler_728640_biocrnpyler_955036_k = 0.00394;
  r13_biocrnpyler_728640_combined_model_of__biocrnpyler_728640_biocrnpyler_955036: complex_Core2_ON_biocrnpyler_728640_combined_model_of__biocrnpyler_728640_biocrnpyler_955036 + rna_rR1_biocrnpyler_728640_1_combined_combined_model_of__biocrnpyler_728640_biocrnpyler_955036 => Core2_OFF_biocrnpyler_728640_combined_model_of__biocrnpyler_728640_biocrnpyler_955036 + complex_Core2_AI_biocrnpyler_728640_combined_model_of__biocrnpyler_728640_biocrnpyler_955036; r13_biocrnpyler_728640_combined_model_of__biocrnpyler_728640_biocrnpyler_955036_k*complex_Core2_ON_biocrnpyler_728640_combined_model_of__biocrnpyler_728640_biocrnpyler_955036*rna_rR1_biocrnpyler_728640_1_combined_combined_model_of__biocrnpyler_728640_biocrnpyler_955036;
    r13_biocrnpyler_728640_combined_model_of__biocrnpyler_728640_biocrnpyler_955036_k = 0.0696;
  r14_biocrnpyler_728640_combined_model_of__biocrnpyler_728640_biocrnpyler_955036: dna_dA1_biocrnpyler_728640_combined_model_of__biocrnpyler_728640_biocrnpyler_955036 + rna_rR1_biocrnpyler_728640_1_combined_combined_model_of__biocrnpyler_728640_biocrnpyler_955036 => complex_Core2_AI_biocrnpyler_728640_combined_model_of__biocrnpyler_728640_biocrnpyler_955036; r14_biocrnpyler_728640_combined_model_of__biocrnpyler_728640_biocrnpyler_955036_k*dna_dA1_biocrnpyler_728640_combined_model_of__biocrnpyler_728640_biocrnpyler_955036*rna_rR1_biocrnpyler_728640_1_combined_combined_model_of__biocrnpyler_728640_biocrnpyler_955036;
    r14_biocrnpyler_728640_combined_model_of__biocrnpyler_728640_biocrnpyler_955036_k = 0.0696;
  r15_biocrnpyler_728640_combined_model_of__biocrnpyler_728640_biocrnpyler_955036: complex_Core2_ON_biocrnpyler_728640_combined_model_of__biocrnpyler_728640_biocrnpyler_955036 + protein_RNAP_biocrnpyler_728640_combined_model_of__biocrnpyler_728640_biocrnpyler_955036 => complex_Core2_ON_protein_RNAP_biocrnpyler_728640_combined_model_of__biocrnpyler_728640_biocrnpyler_955036; r15_biocrnpyler_728640_combined_model_of__biocrnpyler_728640_biocrnpyler_955036_k*complex_Core2_ON_biocrnpyler_728640_combined_model_of__biocrnpyler_728640_biocrnpyler_955036*protein_RNAP_biocrnpyler_728640_combined_model_of__biocrnpyler_728640_biocrnpyler_955036;
    r15_biocrnpyler_728640_combined_model_of__biocrnpyler_728640_biocrnpyler_955036_k = 38.85714;
  r15_1_biocrnpyler_728640_combined_model_of__biocrnpyler_728640_biocrnpyler_955036: complex_Core2_ON_protein_RNAP_biocrnpyler_728640_combined_model_of__biocrnpyler_728640_biocrnpyler_955036 => complex_Core2_ON_biocrnpyler_728640_combined_model_of__biocrnpyler_728640_biocrnpyler_955036 + protein_RNAP_biocrnpyler_728640_combined_model_of__biocrnpyler_728640_biocrnpyler_955036; r15_1_biocrnpyler_728640_combined_model_of__biocrnpyler_728640_biocrnpyler_955036_k*complex_Core2_ON_protein_RNAP_biocrnpyler_728640_combined_model_of__biocrnpyler_728640_biocrnpyler_955036;
    r15_1_biocrnpyler_728640_combined_model_of__biocrnpyler_728640_biocrnpyler_955036_k = 10;
  r17_biocrnpyler_728640_combined_model_of__biocrnpyler_728640_biocrnpyler_955036: complex_Core2_ON_protein_RNAP_biocrnpyler_728640_combined_model_of__biocrnpyler_728640_biocrnpyler_955036 => complex_Core2_ON_biocrnpyler_728640_combined_model_of__biocrnpyler_728640_biocrnpyler_955036 + rna_rR2_biocrnpyler_728640_combined_model_of__biocrnpyler_728640_biocrnpyler_955036 + protein_RNAP_biocrnpyler_728640_combined_model_of__biocrnpyler_728640_biocrnpyler_955036; r17_biocrnpyler_728640_combined_model_of__biocrnpyler_728640_biocrnpyler_955036_k*complex_Core2_ON_protein_RNAP_biocrnpyler_728640_combined_model_of__biocrnpyler_728640_biocrnpyler_955036;
    r17_biocrnpyler_728640_combined_model_of__biocrnpyler_728640_biocrnpyler_955036_k = 0.064;
  r18_biocrnpyler_728640_combined_model_of__biocrnpyler_728640_biocrnpyler_955036: Core2_OFF_biocrnpyler_728640_combined_model_of__biocrnpyler_728640_biocrnpyler_955036 + protein_RNAP_biocrnpyler_728640_combined_model_of__biocrnpyler_728640_biocrnpyler_955036 => complex_Core2_OFF_protein_RNAP_biocrnpyler_728640_combined_model_of__biocrnpyler_728640_biocrnpyler_955036; r18_biocrnpyler_728640_combined_model_of__biocrnpyler_728640_biocrnpyler_955036_k*Core2_OFF_biocrnpyler_728640_combined_model_of__biocrnpyler_728640_biocrnpyler_955036*protein_RNAP_biocrnpyler_728640_combined_model_of__biocrnpyler_728640_biocrnpyler_955036;
    r18_biocrnpyler_728640_combined_model_of__biocrnpyler_728640_biocrnpyler_955036_k = 9.530476;
  r18_1_biocrnpyler_728640_combined_model_of__biocrnpyler_728640_biocrnpyler_955036: complex_Core2_OFF_protein_RNAP_biocrnpyler_728640_combined_model_of__biocrnpyler_728640_biocrnpyler_955036 => Core2_OFF_biocrnpyler_728640_combined_model_of__biocrnpyler_728640_biocrnpyler_955036 + protein_RNAP_biocrnpyler_728640_combined_model_of__biocrnpyler_728640_biocrnpyler_955036; r18_1_biocrnpyler_728640_combined_model_of__biocrnpyler_728640_biocrnpyler_955036_k*complex_Core2_OFF_protein_RNAP_biocrnpyler_728640_combined_model_of__biocrnpyler_728640_biocrnpyler_955036;
    r18_1_biocrnpyler_728640_combined_model_of__biocrnpyler_728640_biocrnpyler_955036_k = 10;
  r20_biocrnpyler_728640_combined_model_of__biocrnpyler_728640_biocrnpyler_955036: complex_Core2_OFF_protein_RNAP_biocrnpyler_728640_combined_model_of__biocrnpyler_728640_biocrnpyler_955036 => Core2_OFF_biocrnpyler_728640_combined_model_of__biocrnpyler_728640_biocrnpyler_955036 + rna_rR2_biocrnpyler_728640_combined_model_of__biocrnpyler_728640_biocrnpyler_955036 + protein_RNAP_biocrnpyler_728640_combined_model_of__biocrnpyler_728640_biocrnpyler_955036; r20_biocrnpyler_728640_combined_model_of__biocrnpyler_728640_biocrnpyler_955036_k*complex_Core2_OFF_protein_RNAP_biocrnpyler_728640_combined_model_of__biocrnpyler_728640_biocrnpyler_955036;
    r20_biocrnpyler_728640_combined_model_of__biocrnpyler_728640_biocrnpyler_955036_k = 0.007;
  r21_biocrnpyler_728640_combined_model_of__biocrnpyler_728640_biocrnpyler_955036: complex_Core2_AI_biocrnpyler_728640_combined_model_of__biocrnpyler_728640_biocrnpyler_955036 + protein_RNAseH_biocrnpyler_728640_combined_model_of__biocrnpyler_728640_biocrnpyler_955036 => complex_Core2_AI_protein_RNAseH_biocrnpyler_728640_combined_model_of__biocrnpyler_728640_biocrnpyler_955036; r21_biocrnpyler_728640_combined_model_of__biocrnpyler_728640_biocrnpyler_955036_k*complex_Core2_AI_biocrnpyler_728640_combined_model_of__biocrnpyler_728640_biocrnpyler_955036*protein_RNAseH_biocrnpyler_728640_combined_model_of__biocrnpyler_728640_biocrnpyler_955036;
    r21_biocrnpyler_728640_combined_model_of__biocrnpyler_728640_biocrnpyler_955036_k = 111.8242;
  r21_1_biocrnpyler_728640_combined_model_of__biocrnpyler_728640_biocrnpyler_955036: complex_Core2_AI_protein_RNAseH_biocrnpyler_728640_combined_model_of__biocrnpyler_728640_biocrnpyler_955036 => complex_Core2_AI_biocrnpyler_728640_combined_model_of__biocrnpyler_728640_biocrnpyler_955036 + protein_RNAseH_biocrnpyler_728640_combined_model_of__biocrnpyler_728640_biocrnpyler_955036; r21_1_biocrnpyler_728640_combined_model_of__biocrnpyler_728640_biocrnpyler_955036_k*complex_Core2_AI_protein_RNAseH_biocrnpyler_728640_combined_model_of__biocrnpyler_728640_biocrnpyler_955036;
    r21_1_biocrnpyler_728640_combined_model_of__biocrnpyler_728640_biocrnpyler_955036_k = 10;
  r23_biocrnpyler_728640_combined_model_of__biocrnpyler_728640_biocrnpyler_955036: complex_Core2_AI_protein_RNAseH_biocrnpyler_728640_combined_model_of__biocrnpyler_728640_biocrnpyler_955036 => dna_dA1_biocrnpyler_728640_combined_model_of__biocrnpyler_728640_biocrnpyler_955036 + protein_RNAseH_biocrnpyler_728640_combined_model_of__biocrnpyler_728640_biocrnpyler_955036; r23_biocrnpyler_728640_combined_model_of__biocrnpyler_728640_biocrnpyler_955036_k*complex_Core2_AI_protein_RNAseH_biocrnpyler_728640_combined_model_of__biocrnpyler_728640_biocrnpyler_955036;
    r23_biocrnpyler_728640_combined_model_of__biocrnpyler_728640_biocrnpyler_955036_k = 0.176;
  r0_biocrnpyler_955036_combined_model_of__biocrnpyler_728640_biocrnpyler_955036: rna_I4_B_1_combined + rna_rR1_biocrnpyler_728640_1_combined_combined_model_of__biocrnpyler_728640_biocrnpyler_955036 => complex_rna_I4_B_rna_rR1_1_combined; r0_biocrnpyler_955036_combined_model_of__biocrnpyler_728640_biocrnpyler_955036_k*rna_I4_B_1_combined*rna_rR1_biocrnpyler_728640_1_combined_combined_model_of__biocrnpyler_728640_biocrnpyler_955036;
    r0_biocrnpyler_955036_combined_model_of__biocrnpyler_728640_biocrnpyler_955036_k = 0.0996;
  R5: sidI1 + rna_I1_e_external_environment_model_1_combined -> rna_I1_e_sidI1; kb1*sidI1*rna_I1_e_external_environment_model_1_combined - kd1*rna_I1_e_sidI1;
  R6: rna_I1_e_sidI1 -> rna_I1_1_combined + sidI1; kd1*rna_I1_e_sidI1 - kb1*sidI1*rna_I1_1_combined;
  R7: sidI2 + rna_I2_e_external_environment_model_1_combined -> rna_I2_e_sidI2; kb1*sidI2*rna_I2_e_external_environment_model_1_combined - kd1*rna_I2_e_sidI2;
  R8: rna_I2_e_sidI2 -> rna_I2_1_combined + sidI2; kd1*rna_I2_e_sidI2 - kb1*sidI2*rna_I2_1_combined;
  R9: sidI4 + rna_I4_1_combined -> rna_I4_sidI4; kc1*sidI4*rna_I4_1_combined - ke1*rna_I4_sidI4;
  R10: rna_I4_sidI4 -> rna_I4_e_external_environment_model_1_combined_1_combined + sidI4; ke1*rna_I4_sidI4 - kc1*sidI4*rna_I4_e_external_environment_model_1_combined_1_combined;
  r0_biocrnpyler_593175: Sw1_OFF_biocrnpyler_593175 + dna_A1_biocrnpyler_593175 => complex_Sw1_ON_biocrnpyler_593175; r0_biocrnpyler_593175_k*Sw1_OFF_biocrnpyler_593175*dna_A1_biocrnpyler_593175;
    r0_biocrnpyler_593175_k = 0.00394;
  r1_biocrnpyler_593175: complex_Sw1_ON_biocrnpyler_593175 + rna_I1_1_combined => Sw1_OFF_biocrnpyler_593175 + complex_Sw1_AI_biocrnpyler_593175; r1_biocrnpyler_593175_k*complex_Sw1_ON_biocrnpyler_593175*rna_I1_1_combined;
    r1_biocrnpyler_593175_k = 0.0696;
  r2_biocrnpyler_593175: dna_A1_biocrnpyler_593175 + rna_I1_1_combined => complex_Sw1_AI_biocrnpyler_593175; r2_biocrnpyler_593175_k*dna_A1_biocrnpyler_593175*rna_I1_1_combined;
    r2_biocrnpyler_593175_k = 0.0696;
  r3_biocrnpyler_593175: complex_Sw1_ON_biocrnpyler_593175 + protein_RNAP_biocrnpyler_593175 => complex_Sw1_ON_protein_RNAP_biocrnpyler_593175; r3_biocrnpyler_593175_k*complex_Sw1_ON_biocrnpyler_593175*protein_RNAP_biocrnpyler_593175;
    r3_biocrnpyler_593175_k = 38.85714;
  r3_1_biocrnpyler_593175: complex_Sw1_ON_protein_RNAP_biocrnpyler_593175 => complex_Sw1_ON_biocrnpyler_593175 + protein_RNAP_biocrnpyler_593175; r3_1_biocrnpyler_593175_k*complex_Sw1_ON_protein_RNAP_biocrnpyler_593175;
    r3_1_biocrnpyler_593175_k = 10;
  r5_biocrnpyler_593175: complex_Sw1_ON_protein_RNAP_biocrnpyler_593175 => complex_Sw1_ON_biocrnpyler_593175 + rna_I31_biocrnpyler_593175 + protein_RNAP_biocrnpyler_593175; r5_biocrnpyler_593175_k*complex_Sw1_ON_protein_RNAP_biocrnpyler_593175;
    r5_biocrnpyler_593175_k = 0.064;
  r6_biocrnpyler_593175: Sw1_OFF_biocrnpyler_593175 + protein_RNAP_biocrnpyler_593175 => complex_Sw1_OFF_protein_RNAP_biocrnpyler_593175; r6_biocrnpyler_593175_k*Sw1_OFF_biocrnpyler_593175*protein_RNAP_biocrnpyler_593175;
    r6_biocrnpyler_593175_k = 9.530476;
  r6_1_biocrnpyler_593175: complex_Sw1_OFF_protein_RNAP_biocrnpyler_593175 => Sw1_OFF_biocrnpyler_593175 + protein_RNAP_biocrnpyler_593175; r6_1_biocrnpyler_593175_k*complex_Sw1_OFF_protein_RNAP_biocrnpyler_593175;
    r6_1_biocrnpyler_593175_k = 10;
  r8_biocrnpyler_593175: complex_Sw1_OFF_protein_RNAP_biocrnpyler_593175 => Sw1_OFF_biocrnpyler_593175 + rna_I31_biocrnpyler_593175 + protein_RNAP_biocrnpyler_593175; r8_biocrnpyler_593175_k*complex_Sw1_OFF_protein_RNAP_biocrnpyler_593175;
    r8_biocrnpyler_593175_k = 0.007;
  r9_biocrnpyler_593175: complex_Sw1_AI_biocrnpyler_593175 + protein_RNAseH_biocrnpyler_593175 => complex_Sw1_AI_protein_RNAseH_biocrnpyler_593175; r9_biocrnpyler_593175_k*complex_Sw1_AI_biocrnpyler_593175*protein_RNAseH_biocrnpyler_593175;
    r9_biocrnpyler_593175_k = 111.8242;
  r9_1_biocrnpyler_593175: complex_Sw1_AI_protein_RNAseH_biocrnpyler_593175 => complex_Sw1_AI_biocrnpyler_593175 + protein_RNAseH_biocrnpyler_593175; r9_1_biocrnpyler_593175_k*complex_Sw1_AI_protein_RNAseH_biocrnpyler_593175;
    r9_1_biocrnpyler_593175_k = 10;
  r11_biocrnpyler_593175: complex_Sw1_AI_protein_RNAseH_biocrnpyler_593175 => dna_A1_biocrnpyler_593175 + protein_RNAseH_biocrnpyler_593175; r11_biocrnpyler_593175_k*complex_Sw1_AI_protein_RNAseH_biocrnpyler_593175;
    r11_biocrnpyler_593175_k = 0.176;
  r12_biocrnpyler_593175: Sw2_OFF_biocrnpyler_593175 + dna_A2_biocrnpyler_593175 => complex_Sw2_ON_biocrnpyler_593175; r12_biocrnpyler_593175_k*Sw2_OFF_biocrnpyler_593175*dna_A2_biocrnpyler_593175;
    r12_biocrnpyler_593175_k = 0.00394;
  r13_biocrnpyler_593175: complex_Sw2_ON_biocrnpyler_593175 + rna_I2_1_combined => Sw2_OFF_biocrnpyler_593175 + complex_Sw2_AI_biocrnpyler_593175; r13_biocrnpyler_593175_k*complex_Sw2_ON_biocrnpyler_593175*rna_I2_1_combined;
    r13_biocrnpyler_593175_k = 0.0696;
  r14_biocrnpyler_593175: dna_A2_biocrnpyler_593175 + rna_I2_1_combined => complex_Sw2_AI_biocrnpyler_593175; r14_biocrnpyler_593175_k*dna_A2_biocrnpyler_593175*rna_I2_1_combined;
    r14_biocrnpyler_593175_k = 0.0696;
  r15_biocrnpyler_593175: complex_Sw2_ON_biocrnpyler_593175 + protein_RNAP_biocrnpyler_593175 => complex_Sw2_ON_protein_RNAP_biocrnpyler_593175; r15_biocrnpyler_593175_k*complex_Sw2_ON_biocrnpyler_593175*protein_RNAP_biocrnpyler_593175;
    r15_biocrnpyler_593175_k = 38.85714;
  r15_1_biocrnpyler_593175: complex_Sw2_ON_protein_RNAP_biocrnpyler_593175 => complex_Sw2_ON_biocrnpyler_593175 + protein_RNAP_biocrnpyler_593175; r15_1_biocrnpyler_593175_k*complex_Sw2_ON_protein_RNAP_biocrnpyler_593175;
    r15_1_biocrnpyler_593175_k = 10;
  r17_biocrnpyler_593175: complex_Sw2_ON_protein_RNAP_biocrnpyler_593175 => complex_Sw2_ON_biocrnpyler_593175 + rna_I32_biocrnpyler_593175 + protein_RNAP_biocrnpyler_593175; r17_biocrnpyler_593175_k*complex_Sw2_ON_protein_RNAP_biocrnpyler_593175;
    r17_biocrnpyler_593175_k = 0.064;
  r18_biocrnpyler_593175: Sw2_OFF_biocrnpyler_593175 + protein_RNAP_biocrnpyler_593175 => complex_Sw2_OFF_protein_RNAP_biocrnpyler_593175; r18_biocrnpyler_593175_k*Sw2_OFF_biocrnpyler_593175*protein_RNAP_biocrnpyler_593175;
    r18_biocrnpyler_593175_k = 9.530476;
  r18_1_biocrnpyler_593175: complex_Sw2_OFF_protein_RNAP_biocrnpyler_593175 => Sw2_OFF_biocrnpyler_593175 + protein_RNAP_biocrnpyler_593175; r18_1_biocrnpyler_593175_k*complex_Sw2_OFF_protein_RNAP_biocrnpyler_593175;
    r18_1_biocrnpyler_593175_k = 10;
  r20_biocrnpyler_593175: complex_Sw2_OFF_protein_RNAP_biocrnpyler_593175 => Sw2_OFF_biocrnpyler_593175 + rna_I32_biocrnpyler_593175 + protein_RNAP_biocrnpyler_593175; r20_biocrnpyler_593175_k*complex_Sw2_OFF_protein_RNAP_biocrnpyler_593175;
    r20_biocrnpyler_593175_k = 0.007;
  r21_biocrnpyler_593175: complex_Sw2_AI_biocrnpyler_593175 + protein_RNAseH_biocrnpyler_593175 => complex_Sw2_AI_protein_RNAseH_biocrnpyler_593175; r21_biocrnpyler_593175_k*complex_Sw2_AI_biocrnpyler_593175*protein_RNAseH_biocrnpyler_593175;
    r21_biocrnpyler_593175_k = 111.8242;
  r21_1_biocrnpyler_593175: complex_Sw2_AI_protein_RNAseH_biocrnpyler_593175 => complex_Sw2_AI_biocrnpyler_593175 + protein_RNAseH_biocrnpyler_593175; r21_1_biocrnpyler_593175_k*complex_Sw2_AI_protein_RNAseH_biocrnpyler_593175;
    r21_1_biocrnpyler_593175_k = 10;
  r23_biocrnpyler_593175: complex_Sw2_AI_protein_RNAseH_biocrnpyler_593175 => dna_A2_biocrnpyler_593175 + protein_RNAseH_biocrnpyler_593175; r23_biocrnpyler_593175_k*complex_Sw2_AI_protein_RNAseH_biocrnpyler_593175;
    r23_biocrnpyler_593175_k = 0.176;
  r24_biocrnpyler_593175: Sw3_OFF_biocrnpyler_593175 + dna_A31_biocrnpyler_593175 => complex_Sw3_ON_1_biocrnpyler_593175; r24_biocrnpyler_593175_k*Sw3_OFF_biocrnpyler_593175*dna_A31_biocrnpyler_593175;
    r24_biocrnpyler_593175_k = 0.00394;
  r25_biocrnpyler_593175: complex_Sw3_ON_1_biocrnpyler_593175 + rna_I31_biocrnpyler_593175 => Sw3_OFF_biocrnpyler_593175 + complex_Sw3_AI_biocrnpyler_593175; r25_biocrnpyler_593175_k*complex_Sw3_ON_1_biocrnpyler_593175*rna_I31_biocrnpyler_593175;
    r25_biocrnpyler_593175_k = 0.0696;
  r26_biocrnpyler_593175: dna_A31_biocrnpyler_593175 + rna_I31_biocrnpyler_593175 => complex_Sw3_AI_biocrnpyler_593175; r26_biocrnpyler_593175_k*dna_A31_biocrnpyler_593175*rna_I31_biocrnpyler_593175;
    r26_biocrnpyler_593175_k = 0.0696;
  r27_biocrnpyler_593175: Sw3_OFF_biocrnpyler_593175 + dna_A32_biocrnpyler_593175 => complex_Sw3_ON_2_biocrnpyler_593175; r27_biocrnpyler_593175_k*Sw3_OFF_biocrnpyler_593175*dna_A32_biocrnpyler_593175;
    r27_biocrnpyler_593175_k = 0.00394;
  r28_biocrnpyler_593175: complex_Sw3_ON_2_biocrnpyler_593175 + rna_I32_biocrnpyler_593175 => Sw3_OFF_biocrnpyler_593175 + complex_Sw3_AI_2_biocrnpyler_593175; r28_biocrnpyler_593175_k*complex_Sw3_ON_2_biocrnpyler_593175*rna_I32_biocrnpyler_593175;
    r28_biocrnpyler_593175_k = 0.0696;
  r29_biocrnpyler_593175: dna_A32_biocrnpyler_593175 + rna_I32_biocrnpyler_593175 => complex_Sw3_AI_2_biocrnpyler_593175; r29_biocrnpyler_593175_k*dna_A32_biocrnpyler_593175*rna_I32_biocrnpyler_593175;
    r29_biocrnpyler_593175_k = 0.0696;
  r30_biocrnpyler_593175: complex_Sw3_ON_2_biocrnpyler_593175 + protein_RNAP_biocrnpyler_593175 => complex_Sw3_ON_2_protein_RNAP_biocrnpyler_593175; r30_biocrnpyler_593175_k*complex_Sw3_ON_2_biocrnpyler_593175*protein_RNAP_biocrnpyler_593175;
    r30_biocrnpyler_593175_k = 38.85714;
  r30_1_biocrnpyler_593175: complex_Sw3_ON_2_protein_RNAP_biocrnpyler_593175 => complex_Sw3_ON_2_biocrnpyler_593175 + protein_RNAP_biocrnpyler_593175; r30_1_biocrnpyler_593175_k*complex_Sw3_ON_2_protein_RNAP_biocrnpyler_593175;
    r30_1_biocrnpyler_593175_k = 10;
  r32_biocrnpyler_593175: complex_Sw3_ON_2_protein_RNAP_biocrnpyler_593175 => complex_Sw3_ON_2_biocrnpyler_593175 + rna_I4_1_combined + protein_RNAP_biocrnpyler_593175; r32_biocrnpyler_593175_k*complex_Sw3_ON_2_protein_RNAP_biocrnpyler_593175;
    r32_biocrnpyler_593175_k = 0.064;
  r33_biocrnpyler_593175: complex_Sw3_AI_2_biocrnpyler_593175 + protein_RNAseH_biocrnpyler_593175 => complex_Sw3_AI_2_protein_RNAseH_biocrnpyler_593175; r33_biocrnpyler_593175_k*complex_Sw3_AI_2_biocrnpyler_593175*protein_RNAseH_biocrnpyler_593175;
    r33_biocrnpyler_593175_k = 111.8242;
  r33_1_biocrnpyler_593175: complex_Sw3_AI_2_protein_RNAseH_biocrnpyler_593175 => complex_Sw3_AI_2_biocrnpyler_593175 + protein_RNAseH_biocrnpyler_593175; r33_1_biocrnpyler_593175_k*complex_Sw3_AI_2_protein_RNAseH_biocrnpyler_593175;
    r33_1_biocrnpyler_593175_k = 10;
  r35_biocrnpyler_593175: complex_Sw3_AI_2_protein_RNAseH_biocrnpyler_593175 => dna_A32_biocrnpyler_593175 + protein_RNAseH_biocrnpyler_593175; r35_biocrnpyler_593175_k*complex_Sw3_AI_2_protein_RNAseH_biocrnpyler_593175;
    r35_biocrnpyler_593175_k = 0.176;
  r36_biocrnpyler_593175: complex_Sw3_ON_1_biocrnpyler_593175 + protein_RNAP_biocrnpyler_593175 => complex_Sw3_ON_1_protein_RNAP_biocrnpyler_593175; r36_biocrnpyler_593175_k*complex_Sw3_ON_1_biocrnpyler_593175*protein_RNAP_biocrnpyler_593175;
    r36_biocrnpyler_593175_k = 38.85714;
  r36_1_biocrnpyler_593175: complex_Sw3_ON_1_protein_RNAP_biocrnpyler_593175 => complex_Sw3_ON_1_biocrnpyler_593175 + protein_RNAP_biocrnpyler_593175; r36_1_biocrnpyler_593175_k*complex_Sw3_ON_1_protein_RNAP_biocrnpyler_593175;
    r36_1_biocrnpyler_593175_k = 10;
  r38_biocrnpyler_593175: complex_Sw3_ON_1_protein_RNAP_biocrnpyler_593175 => complex_Sw3_ON_1_biocrnpyler_593175 + rna_I4_1_combined + protein_RNAP_biocrnpyler_593175; r38_biocrnpyler_593175_k*complex_Sw3_ON_1_protein_RNAP_biocrnpyler_593175;
    r38_biocrnpyler_593175_k = 0.064;
  r39_biocrnpyler_593175: Sw3_OFF_biocrnpyler_593175 + protein_RNAP_biocrnpyler_593175 => complex_Sw3_OFF_protein_RNAP_biocrnpyler_593175; r39_biocrnpyler_593175_k*Sw3_OFF_biocrnpyler_593175*protein_RNAP_biocrnpyler_593175;
    r39_biocrnpyler_593175_k = 9.530476;
  r39_1_biocrnpyler_593175: complex_Sw3_OFF_protein_RNAP_biocrnpyler_593175 => Sw3_OFF_biocrnpyler_593175 + protein_RNAP_biocrnpyler_593175; r39_1_biocrnpyler_593175_k*complex_Sw3_OFF_protein_RNAP_biocrnpyler_593175;
    r39_1_biocrnpyler_593175_k = 10;
  r41_biocrnpyler_593175: complex_Sw3_OFF_protein_RNAP_biocrnpyler_593175 => Sw3_OFF_biocrnpyler_593175 + rna_I4_1_combined + protein_RNAP_biocrnpyler_593175; r41_biocrnpyler_593175_k*complex_Sw3_OFF_protein_RNAP_biocrnpyler_593175;
    r41_biocrnpyler_593175_k = 0.007;
  r42_biocrnpyler_593175: complex_Sw3_AI_biocrnpyler_593175 + protein_RNAseH_biocrnpyler_593175 => complex_Sw3_AI_protein_RNAseH_biocrnpyler_593175; r42_biocrnpyler_593175_k*complex_Sw3_AI_biocrnpyler_593175*protein_RNAseH_biocrnpyler_593175;
    r42_biocrnpyler_593175_k = 111.8242;
  r42_1_biocrnpyler_593175: complex_Sw3_AI_protein_RNAseH_biocrnpyler_593175 => complex_Sw3_AI_biocrnpyler_593175 + protein_RNAseH_biocrnpyler_593175; r42_1_biocrnpyler_593175_k*complex_Sw3_AI_protein_RNAseH_biocrnpyler_593175;
    r42_1_biocrnpyler_593175_k = 10;
  r44_biocrnpyler_593175: complex_Sw3_AI_protein_RNAseH_biocrnpyler_593175 => dna_A31_biocrnpyler_593175 + protein_RNAseH_biocrnpyler_593175; r44_biocrnpyler_593175_k*complex_Sw3_AI_protein_RNAseH_biocrnpyler_593175;
    r44_biocrnpyler_593175_k = 0.176;

  // Unit definitions:
  unit square_metre = metre^2;
  unit per_second = 1 / second;
  unit substance = dimensionless;
end
