// SBML level 3 version 2

model rnaexp_membrane()
  // model units - substance: substance, time: second, extent: mole

  // Compartments:
  compartment internal = 1e-6 litre;
  compartment external = 1e-6 litre;

  // Species:
  species rna_rR1_e in external = 0;
  species rna_rR1_i in internal = 0;
  species VirE2_b in internal = 1;
  species VirE2_b_rna_rR1_i in internal = 0;

  // Parameters:
  kb = 0.2 per_second;
  kd = 0.01 per_second;

  // Reactions:
  R1: VirE2_b + rna_rR1_i -> VirE2_b_rna_rR1_i; kb*VirE2_b*rna_rR1_i - kd*VirE2_b_rna_rR1_i;
  R2: VirE2_b_rna_rR1_i -> rna_rR1_e + VirE2_b; kd*VirE2_b_rna_rR1_i - kb*VirE2_b*rna_rR1_e;

  // Unit definitions:
  unit per_second = 1 / second;
  unit substance = dimensionless;
end
