// SBML level 3 version 2

model combined_model_of__biocrnpyler_381549_biocrnpyler_35010()
  // model units - substance: mole, time: second, volume: litre, area: square_metre, length: metre, extent: mole

  // Compartments:
  compartment default_biocrnpyler_381549_combined = 2e-6;

  // Species:
  species Prod2_OFF_biocrnpyler_381549 in default_biocrnpyler_381549_combined = 0;
  species complex_Prod2_ON_biocrnpyler_381549 in default_biocrnpyler_381549_combined = 0;
  species dna_dA1_biocrnpyler_381549 in default_biocrnpyler_381549_combined = 0;
  species rna_rR1_biocrnpyler_381549 in default_biocrnpyler_381549_combined = 0;
  species protein_RNAP_biocrnpyler_381549 in default_biocrnpyler_381549_combined = 0;
  species protein_RNAseH_biocrnpyler_381549 in default_biocrnpyler_381549_combined = 0;
  species complex_Prod2_AI_biocrnpyler_381549 in default_biocrnpyler_381549_combined = 0;
  species complex_Prod2_ON_protein_RNAP_biocrnpyler_381549 in default_biocrnpyler_381549_combined = 0;
  species complex_Prod2_OFF_protein_RNAP_biocrnpyler_381549 in default_biocrnpyler_381549_combined = 0;
  species complex_Prod2_AI_protein_RNAseH_biocrnpyler_381549 in default_biocrnpyler_381549_combined = 0;
  species BrocApt_biocrnpyler_381549_1_combined in default_biocrnpyler_381549_combined = 0;
  species DFHBI_biocrnpyler_35010 in default_biocrnpyler_381549_combined = 0;
  species complex_BrocApt_DFHBI_biocrnpyler_35010 in default_biocrnpyler_381549_combined = 0;

  // Reactions:
  r0_biocrnpyler_381549: Prod2_OFF_biocrnpyler_381549 + dna_dA1_biocrnpyler_381549 => complex_Prod2_ON_biocrnpyler_381549; r0_biocrnpyler_381549_k*Prod2_OFF_biocrnpyler_381549*dna_dA1_biocrnpyler_381549;
    r0_biocrnpyler_381549_k = 0.00394;
  r1_biocrnpyler_381549: complex_Prod2_ON_biocrnpyler_381549 + rna_rR1_biocrnpyler_381549 => Prod2_OFF_biocrnpyler_381549 + complex_Prod2_AI_biocrnpyler_381549; r1_biocrnpyler_381549_k*complex_Prod2_ON_biocrnpyler_381549*rna_rR1_biocrnpyler_381549;
    r1_biocrnpyler_381549_k = 0.0696;
  r2_biocrnpyler_381549: dna_dA1_biocrnpyler_381549 + rna_rR1_biocrnpyler_381549 => complex_Prod2_AI_biocrnpyler_381549; r2_biocrnpyler_381549_k*dna_dA1_biocrnpyler_381549*rna_rR1_biocrnpyler_381549;
    r2_biocrnpyler_381549_k = 0.0696;
  r3_biocrnpyler_381549: complex_Prod2_ON_biocrnpyler_381549 + protein_RNAP_biocrnpyler_381549 => complex_Prod2_ON_protein_RNAP_biocrnpyler_381549; r3_biocrnpyler_381549_k*complex_Prod2_ON_biocrnpyler_381549*protein_RNAP_biocrnpyler_381549;
    r3_biocrnpyler_381549_k = 38.85714;
  r3_1_biocrnpyler_381549: complex_Prod2_ON_protein_RNAP_biocrnpyler_381549 => complex_Prod2_ON_biocrnpyler_381549 + protein_RNAP_biocrnpyler_381549; r3_1_biocrnpyler_381549_k*complex_Prod2_ON_protein_RNAP_biocrnpyler_381549;
    r3_1_biocrnpyler_381549_k = 10;
  r5_biocrnpyler_381549: complex_Prod2_ON_protein_RNAP_biocrnpyler_381549 => complex_Prod2_ON_biocrnpyler_381549 + BrocApt_biocrnpyler_381549_1_combined + protein_RNAP_biocrnpyler_381549; r5_biocrnpyler_381549_k*complex_Prod2_ON_protein_RNAP_biocrnpyler_381549;
    r5_biocrnpyler_381549_k = 0.064;
  r6_biocrnpyler_381549: Prod2_OFF_biocrnpyler_381549 + protein_RNAP_biocrnpyler_381549 => complex_Prod2_OFF_protein_RNAP_biocrnpyler_381549; r6_biocrnpyler_381549_k*Prod2_OFF_biocrnpyler_381549*protein_RNAP_biocrnpyler_381549;
    r6_biocrnpyler_381549_k = 9.530476;
  r6_1_biocrnpyler_381549: complex_Prod2_OFF_protein_RNAP_biocrnpyler_381549 => Prod2_OFF_biocrnpyler_381549 + protein_RNAP_biocrnpyler_381549; r6_1_biocrnpyler_381549_k*complex_Prod2_OFF_protein_RNAP_biocrnpyler_381549;
    r6_1_biocrnpyler_381549_k = 10;
  r8_biocrnpyler_381549: complex_Prod2_OFF_protein_RNAP_biocrnpyler_381549 => Prod2_OFF_biocrnpyler_381549 + BrocApt_biocrnpyler_381549_1_combined + protein_RNAP_biocrnpyler_381549; r8_biocrnpyler_381549_k*complex_Prod2_OFF_protein_RNAP_biocrnpyler_381549;
    r8_biocrnpyler_381549_k = 0.007;
  r9_biocrnpyler_381549: complex_Prod2_AI_biocrnpyler_381549 + protein_RNAseH_biocrnpyler_381549 => complex_Prod2_AI_protein_RNAseH_biocrnpyler_381549; r9_biocrnpyler_381549_k*complex_Prod2_AI_biocrnpyler_381549*protein_RNAseH_biocrnpyler_381549;
    r9_biocrnpyler_381549_k = 111.8242;
  r9_1_biocrnpyler_381549: complex_Prod2_AI_protein_RNAseH_biocrnpyler_381549 => complex_Prod2_AI_biocrnpyler_381549 + protein_RNAseH_biocrnpyler_381549; r9_1_biocrnpyler_381549_k*complex_Prod2_AI_protein_RNAseH_biocrnpyler_381549;
    r9_1_biocrnpyler_381549_k = 10;
  r11_biocrnpyler_381549: complex_Prod2_AI_protein_RNAseH_biocrnpyler_381549 => dna_dA1_biocrnpyler_381549 + protein_RNAseH_biocrnpyler_381549; r11_biocrnpyler_381549_k*complex_Prod2_AI_protein_RNAseH_biocrnpyler_381549;
    r11_biocrnpyler_381549_k = 0.176;
  r0_biocrnpyler_35010: BrocApt_biocrnpyler_381549_1_combined + DFHBI_biocrnpyler_35010 => complex_BrocApt_DFHBI_biocrnpyler_35010; r0_biocrnpyler_35010_k*BrocApt_biocrnpyler_381549_1_combined*DFHBI_biocrnpyler_35010;
    r0_biocrnpyler_35010_k = 9.96e-5;

  // Unit definitions:
  unit square_metre = metre^2;
end
