// SBML level 3 version 2

model rnaexp_membrane()
  // model units - substance: substance, time: second, extent: mole

  // Compartments:
  compartment internal = 1e-6 litre;
  compartment external = 1e-6 litre;

  // Species:
  species rna_rR1_e in external = 0;
  species rna_rR1 in internal = 0;
  species SID_b in internal = 0;
  species SID_b_rna_rR1 in internal = 0;

  // Parameters:
  kb1 = 0.002 per_second;
  kd1 = 1e-5 per_second;
  kd2 = 0.01 per_second;

  // Reactions:
  R1: SID_b + rna_rR1 -> SID_b_rna_rR1; kb1*SID_b*rna_rR1 - kd1*SID_b_rna_rR1;
  R2: SID_b_rna_rR1 => rna_rR1_e + SID_b; kd2*SID_b_rna_rR1;

  // Unit definitions:
  unit per_second = 1 / second;
  unit substance = dimensionless;
end
