// SBML level 3 version 2

model combined_model_of__combined_model_of__external_environment_model_combined_model_of__rnaexp_membrane_DFHBI_membrane2_combined_model_of__biocrnpyler_844477()
  // model units - substance: mole, time: second, volume: litre, area: square_metre, length: metre, extent: mole

  // Compartments:
  compartment cell_2B_internal_combined = 3e-6 litre;
  compartment actual_external = 0.0001 litre;

  // Species:
  species BrocApt_e_external_environment_model in actual_external = 0;
  species rna_rR1_e_external_environment_model_1_combined in actual_external = 0;
  species sid in cell_2B_internal_combined = 1;
  species rna_rR1_sid in cell_2B_internal_combined = 0;
  species DFHBI_e_external_environment_model_1_combined in actual_external = 100/actual_external;
  species DFHBI_B in cell_2B_internal_combined = 0;
  species Core1_OFF_biocrnpyler_844477 in cell_2B_internal_combined = 1.2/cell_2B_internal_combined;
  species complex_Core1_ON_biocrnpyler_844477 in cell_2B_internal_combined = 0;
  species rna_rR1_1_combined in cell_2B_internal_combined = 0;
  species dna_dA2_biocrnpyler_844477 in cell_2B_internal_combined = 1.2/cell_2B_internal_combined;
  species rna_rR2_biocrnpyler_844477 in cell_2B_internal_combined = 0;
  species protein_RNAP_biocrnpyler_844477 in cell_2B_internal_combined = 0.03/cell_2B_internal_combined;
  species protein_RNAseH_biocrnpyler_844477 in cell_2B_internal_combined = 0.0044/cell_2B_internal_combined;
  species complex_Core1_AI_biocrnpyler_844477 in cell_2B_internal_combined = 0;
  species complex_Core1_ON_protein_RNAP_biocrnpyler_844477 in cell_2B_internal_combined = 0;
  species complex_Core1_OFF_protein_RNAP_biocrnpyler_844477 in cell_2B_internal_combined = 0;
  species complex_Core1_AI_protein_RNAseH_biocrnpyler_844477 in cell_2B_internal_combined = 0;
  species Core2_OFF_biocrnpyler_844477 in cell_2B_internal_combined = 0.99/cell_2B_internal_combined;
  species complex_Core2_ON_biocrnpyler_844477 in cell_2B_internal_combined = 0;
  species dna_dA1_biocrnpyler_844477 in cell_2B_internal_combined = 1.2/cell_2B_internal_combined;
  species complex_Core2_AI_biocrnpyler_844477 in cell_2B_internal_combined = 0;
  species complex_Core2_ON_protein_RNAP_biocrnpyler_844477 in cell_2B_internal_combined = 0;
  species complex_Core2_OFF_protein_RNAP_biocrnpyler_844477 in cell_2B_internal_combined = 0;
  species complex_Core2_AI_protein_RNAseH_biocrnpyler_844477 in cell_2B_internal_combined = 0;

  // Parameters:
  kb = 0.2 per_second;
  kd = 0.01 per_second;
  kb_B = 0.002 per_second;
  kd_B = 1e-5 per_second;

  // Reactions:
  R1: sid + rna_rR1_1_combined -> rna_rR1_sid; kb*sid*rna_rR1_1_combined - kd*rna_rR1_sid;
  R2: rna_rR1_sid -> rna_rR1_e_external_environment_model_1_combined + sid; kd*rna_rR1_sid - kb*sid*rna_rR1_e_external_environment_model_1_combined;
  r3: DFHBI_e_external_environment_model_1_combined -> DFHBI_B; kb_B*DFHBI_e_external_environment_model_1_combined - kd_B*DFBHI_B;
  r4: DFHBI_e_external_environment_model_1_combined -> DFHBI_B; kd_B*DFHBI_e_external_environment_model_1_combined - kb_B*DFBHI_B;
  r0_biocrnpyler_844477: Core1_OFF_biocrnpyler_844477 + dna_dA2_biocrnpyler_844477 => complex_Core1_ON_biocrnpyler_844477; r0_biocrnpyler_844477_k*Core1_OFF_biocrnpyler_844477*dna_dA2_biocrnpyler_844477;
    r0_biocrnpyler_844477_k = 0.00394;
  r1_biocrnpyler_844477: complex_Core1_ON_biocrnpyler_844477 + rna_rR2_biocrnpyler_844477 => Core1_OFF_biocrnpyler_844477 + complex_Core1_AI_biocrnpyler_844477; r1_biocrnpyler_844477_k*complex_Core1_ON_biocrnpyler_844477*rna_rR2_biocrnpyler_844477;
    r1_biocrnpyler_844477_k = 0.0696;
  r2_biocrnpyler_844477: dna_dA2_biocrnpyler_844477 + rna_rR2_biocrnpyler_844477 => complex_Core1_AI_biocrnpyler_844477; r2_biocrnpyler_844477_k*dna_dA2_biocrnpyler_844477*rna_rR2_biocrnpyler_844477;
    r2_biocrnpyler_844477_k = 0.0696;
  r3_biocrnpyler_844477: complex_Core1_ON_biocrnpyler_844477 + protein_RNAP_biocrnpyler_844477 => complex_Core1_ON_protein_RNAP_biocrnpyler_844477; r3_biocrnpyler_844477_k*complex_Core1_ON_biocrnpyler_844477*protein_RNAP_biocrnpyler_844477;
    r3_biocrnpyler_844477_k = 38.85714;
  r3_1_biocrnpyler_844477: complex_Core1_ON_protein_RNAP_biocrnpyler_844477 => complex_Core1_ON_biocrnpyler_844477 + protein_RNAP_biocrnpyler_844477; r3_1_biocrnpyler_844477_k*complex_Core1_ON_protein_RNAP_biocrnpyler_844477;
    r3_1_biocrnpyler_844477_k = 10;
  r5_biocrnpyler_844477: complex_Core1_ON_protein_RNAP_biocrnpyler_844477 => complex_Core1_ON_biocrnpyler_844477 + rna_rR1_1_combined + protein_RNAP_biocrnpyler_844477; r5_biocrnpyler_844477_k*complex_Core1_ON_protein_RNAP_biocrnpyler_844477;
    r5_biocrnpyler_844477_k = 0.064;
  r6_biocrnpyler_844477: Core1_OFF_biocrnpyler_844477 + protein_RNAP_biocrnpyler_844477 => complex_Core1_OFF_protein_RNAP_biocrnpyler_844477; r6_biocrnpyler_844477_k*Core1_OFF_biocrnpyler_844477*protein_RNAP_biocrnpyler_844477;
    r6_biocrnpyler_844477_k = 9.530476;
  r6_1_biocrnpyler_844477: complex_Core1_OFF_protein_RNAP_biocrnpyler_844477 => Core1_OFF_biocrnpyler_844477 + protein_RNAP_biocrnpyler_844477; r6_1_biocrnpyler_844477_k*complex_Core1_OFF_protein_RNAP_biocrnpyler_844477;
    r6_1_biocrnpyler_844477_k = 10;
  r8_biocrnpyler_844477: complex_Core1_OFF_protein_RNAP_biocrnpyler_844477 => Core1_OFF_biocrnpyler_844477 + rna_rR1_1_combined + protein_RNAP_biocrnpyler_844477; r8_biocrnpyler_844477_k*complex_Core1_OFF_protein_RNAP_biocrnpyler_844477;
    r8_biocrnpyler_844477_k = 0.007;
  r9_biocrnpyler_844477: complex_Core1_AI_biocrnpyler_844477 + protein_RNAseH_biocrnpyler_844477 => complex_Core1_AI_protein_RNAseH_biocrnpyler_844477; r9_biocrnpyler_844477_k*complex_Core1_AI_biocrnpyler_844477*protein_RNAseH_biocrnpyler_844477;
    r9_biocrnpyler_844477_k = 111.8242;
  r9_1_biocrnpyler_844477: complex_Core1_AI_protein_RNAseH_biocrnpyler_844477 => complex_Core1_AI_biocrnpyler_844477 + protein_RNAseH_biocrnpyler_844477; r9_1_biocrnpyler_844477_k*complex_Core1_AI_protein_RNAseH_biocrnpyler_844477;
    r9_1_biocrnpyler_844477_k = 10;
  r11_biocrnpyler_844477: complex_Core1_AI_protein_RNAseH_biocrnpyler_844477 => dna_dA2_biocrnpyler_844477 + protein_RNAseH_biocrnpyler_844477; r11_biocrnpyler_844477_k*complex_Core1_AI_protein_RNAseH_biocrnpyler_844477;
    r11_biocrnpyler_844477_k = 0.176;
  r12_biocrnpyler_844477: Core2_OFF_biocrnpyler_844477 + dna_dA1_biocrnpyler_844477 => complex_Core2_ON_biocrnpyler_844477; r12_biocrnpyler_844477_k*Core2_OFF_biocrnpyler_844477*dna_dA1_biocrnpyler_844477;
    r12_biocrnpyler_844477_k = 0.00394;
  r13_biocrnpyler_844477: complex_Core2_ON_biocrnpyler_844477 + rna_rR1_1_combined => Core2_OFF_biocrnpyler_844477 + complex_Core2_AI_biocrnpyler_844477; r13_biocrnpyler_844477_k*complex_Core2_ON_biocrnpyler_844477*rna_rR1_1_combined;
    r13_biocrnpyler_844477_k = 0.0696;
  r14_biocrnpyler_844477: dna_dA1_biocrnpyler_844477 + rna_rR1_1_combined => complex_Core2_AI_biocrnpyler_844477; r14_biocrnpyler_844477_k*dna_dA1_biocrnpyler_844477*rna_rR1_1_combined;
    r14_biocrnpyler_844477_k = 0.0696;
  r15_biocrnpyler_844477: complex_Core2_ON_biocrnpyler_844477 + protein_RNAP_biocrnpyler_844477 => complex_Core2_ON_protein_RNAP_biocrnpyler_844477; r15_biocrnpyler_844477_k*complex_Core2_ON_biocrnpyler_844477*protein_RNAP_biocrnpyler_844477;
    r15_biocrnpyler_844477_k = 38.85714;
  r15_1_biocrnpyler_844477: complex_Core2_ON_protein_RNAP_biocrnpyler_844477 => complex_Core2_ON_biocrnpyler_844477 + protein_RNAP_biocrnpyler_844477; r15_1_biocrnpyler_844477_k*complex_Core2_ON_protein_RNAP_biocrnpyler_844477;
    r15_1_biocrnpyler_844477_k = 10;
  r17_biocrnpyler_844477: complex_Core2_ON_protein_RNAP_biocrnpyler_844477 => complex_Core2_ON_biocrnpyler_844477 + rna_rR2_biocrnpyler_844477 + protein_RNAP_biocrnpyler_844477; r17_biocrnpyler_844477_k*complex_Core2_ON_protein_RNAP_biocrnpyler_844477;
    r17_biocrnpyler_844477_k = 0.064;
  r18_biocrnpyler_844477: Core2_OFF_biocrnpyler_844477 + protein_RNAP_biocrnpyler_844477 => complex_Core2_OFF_protein_RNAP_biocrnpyler_844477; r18_biocrnpyler_844477_k*Core2_OFF_biocrnpyler_844477*protein_RNAP_biocrnpyler_844477;
    r18_biocrnpyler_844477_k = 9.530476;
  r18_1_biocrnpyler_844477: complex_Core2_OFF_protein_RNAP_biocrnpyler_844477 => Core2_OFF_biocrnpyler_844477 + protein_RNAP_biocrnpyler_844477; r18_1_biocrnpyler_844477_k*complex_Core2_OFF_protein_RNAP_biocrnpyler_844477;
    r18_1_biocrnpyler_844477_k = 10;
  r20_biocrnpyler_844477: complex_Core2_OFF_protein_RNAP_biocrnpyler_844477 => Core2_OFF_biocrnpyler_844477 + rna_rR2_biocrnpyler_844477 + protein_RNAP_biocrnpyler_844477; r20_biocrnpyler_844477_k*complex_Core2_OFF_protein_RNAP_biocrnpyler_844477;
    r20_biocrnpyler_844477_k = 0.007;
  r21_biocrnpyler_844477: complex_Core2_AI_biocrnpyler_844477 + protein_RNAseH_biocrnpyler_844477 => complex_Core2_AI_protein_RNAseH_biocrnpyler_844477; r21_biocrnpyler_844477_k*complex_Core2_AI_biocrnpyler_844477*protein_RNAseH_biocrnpyler_844477;
    r21_biocrnpyler_844477_k = 111.8242;
  r21_1_biocrnpyler_844477: complex_Core2_AI_protein_RNAseH_biocrnpyler_844477 => complex_Core2_AI_biocrnpyler_844477 + protein_RNAseH_biocrnpyler_844477; r21_1_biocrnpyler_844477_k*complex_Core2_AI_protein_RNAseH_biocrnpyler_844477;
    r21_1_biocrnpyler_844477_k = 10;
  r23_biocrnpyler_844477: complex_Core2_AI_protein_RNAseH_biocrnpyler_844477 => dna_dA1_biocrnpyler_844477 + protein_RNAseH_biocrnpyler_844477; r23_biocrnpyler_844477_k*complex_Core2_AI_protein_RNAseH_biocrnpyler_844477;
    r23_biocrnpyler_844477_k = 0.176;

  // Unit definitions:
  unit square_metre = metre^2;
  unit per_second = 1 / second;
  unit substance = dimensionless;
end
