// SBML level 3 version 2

model combined_model_of__combined_model_of__external_reservoir_model_combined_model_of__rnaexp_membrane_combined_model_of__biocrnpyler_821483()
  // model units - substance: mole, time: second, volume: litre, area: square_metre, length: metre, extent: mole

  // Compartments:
  compartment cell_4_external_combined = 2e-6 litre;
  compartment cell_4_internal_combined = 1e-6 litre;

  // Species:
  species rna_rR1_external_reservoir_model_1_combined in cell_4_external_combined = 0;
  species VirE2_b in cell_4_internal_combined = 1;
  species VirE2_b_rna_rR1 in cell_4_internal_combined = 0;
  species Prod2_OFF_biocrnpyler_821483 in cell_4_internal_combined = 0;
  species complex_Prod2_ON_biocrnpyler_821483 in cell_4_internal_combined = 0;
  species rna_BrocApt_biocrnpyler_821483 in cell_4_internal_combined = 0;
  species dna_dA1_biocrnpyler_821483 in cell_4_internal_combined = 0;
  species rna_rR1_1_1_combined in cell_4_internal_combined = 0;
  species protein_RNAP_biocrnpyler_821483 in cell_4_internal_combined = 0;
  species protein_RNAseH_biocrnpyler_821483 in cell_4_internal_combined = 0;
  species complex_Prod2_AI_biocrnpyler_821483 in cell_4_internal_combined = 0;
  species complex_Prod2_ON_protein_RNAP_biocrnpyler_821483 in cell_4_internal_combined = 0;
  species complex_Prod2_OFF_protein_RNAP_biocrnpyler_821483 in cell_4_internal_combined = 0;
  species complex_Prod2_AI_protein_RNAseH_biocrnpyler_821483 in cell_4_internal_combined = 0;

  // Parameters:
  kb = 0.01 per_second;
  kd = 0.2 per_second;

  // Reactions:
  R1: VirE2_b + rna_rR1_external_reservoir_model_1_combined -> VirE2_b_rna_rR1; kb*VirE2_b*rna_rR1_external_reservoir_model_1_combined - kd*VirE2_b_rna_rR1;
  R2: VirE2_b_rna_rR1 -> rna_rR1_1_1_combined + VirE2_b; kd*VirE2_b_rna_rR1 - kb*VirE2_b*rna_rR1_1_1_combined;
  r0_biocrnpyler_821483: Prod2_OFF_biocrnpyler_821483 + dna_dA1_biocrnpyler_821483 => complex_Prod2_ON_biocrnpyler_821483; r0_biocrnpyler_821483_k*Prod2_OFF_biocrnpyler_821483*dna_dA1_biocrnpyler_821483;
    r0_biocrnpyler_821483_k = 0.00394;
  r1_biocrnpyler_821483: complex_Prod2_ON_biocrnpyler_821483 + rna_rR1_1_1_combined => Prod2_OFF_biocrnpyler_821483 + complex_Prod2_AI_biocrnpyler_821483; r1_biocrnpyler_821483_k*complex_Prod2_ON_biocrnpyler_821483*rna_rR1_1_1_combined;
    r1_biocrnpyler_821483_k = 0.0696;
  r2_biocrnpyler_821483: dna_dA1_biocrnpyler_821483 + rna_rR1_1_1_combined => complex_Prod2_AI_biocrnpyler_821483; r2_biocrnpyler_821483_k*dna_dA1_biocrnpyler_821483*rna_rR1_1_1_combined;
    r2_biocrnpyler_821483_k = 0.0696;
  r3_biocrnpyler_821483: complex_Prod2_ON_biocrnpyler_821483 + protein_RNAP_biocrnpyler_821483 => complex_Prod2_ON_protein_RNAP_biocrnpyler_821483; r3_biocrnpyler_821483_k*complex_Prod2_ON_biocrnpyler_821483*protein_RNAP_biocrnpyler_821483;
    r3_biocrnpyler_821483_k = 38.85714;
  r3_1_biocrnpyler_821483: complex_Prod2_ON_protein_RNAP_biocrnpyler_821483 => complex_Prod2_ON_biocrnpyler_821483 + protein_RNAP_biocrnpyler_821483; r3_1_biocrnpyler_821483_k*complex_Prod2_ON_protein_RNAP_biocrnpyler_821483;
    r3_1_biocrnpyler_821483_k = 10;
  r5_biocrnpyler_821483: complex_Prod2_ON_protein_RNAP_biocrnpyler_821483 => complex_Prod2_ON_biocrnpyler_821483 + rna_BrocApt_biocrnpyler_821483 + protein_RNAP_biocrnpyler_821483; r5_biocrnpyler_821483_k*complex_Prod2_ON_protein_RNAP_biocrnpyler_821483;
    r5_biocrnpyler_821483_k = 0.064;
  r6_biocrnpyler_821483: Prod2_OFF_biocrnpyler_821483 + protein_RNAP_biocrnpyler_821483 => complex_Prod2_OFF_protein_RNAP_biocrnpyler_821483; r6_biocrnpyler_821483_k*Prod2_OFF_biocrnpyler_821483*protein_RNAP_biocrnpyler_821483;
    r6_biocrnpyler_821483_k = 9.530476;
  r6_1_biocrnpyler_821483: complex_Prod2_OFF_protein_RNAP_biocrnpyler_821483 => Prod2_OFF_biocrnpyler_821483 + protein_RNAP_biocrnpyler_821483; r6_1_biocrnpyler_821483_k*complex_Prod2_OFF_protein_RNAP_biocrnpyler_821483;
    r6_1_biocrnpyler_821483_k = 10;
  r8_biocrnpyler_821483: complex_Prod2_OFF_protein_RNAP_biocrnpyler_821483 => Prod2_OFF_biocrnpyler_821483 + rna_BrocApt_biocrnpyler_821483 + protein_RNAP_biocrnpyler_821483; r8_biocrnpyler_821483_k*complex_Prod2_OFF_protein_RNAP_biocrnpyler_821483;
    r8_biocrnpyler_821483_k = 0.007;
  r9_biocrnpyler_821483: complex_Prod2_AI_biocrnpyler_821483 + protein_RNAseH_biocrnpyler_821483 => complex_Prod2_AI_protein_RNAseH_biocrnpyler_821483; r9_biocrnpyler_821483_k*complex_Prod2_AI_biocrnpyler_821483*protein_RNAseH_biocrnpyler_821483;
    r9_biocrnpyler_821483_k = 111.8242;
  r9_1_biocrnpyler_821483: complex_Prod2_AI_protein_RNAseH_biocrnpyler_821483 => complex_Prod2_AI_biocrnpyler_821483 + protein_RNAseH_biocrnpyler_821483; r9_1_biocrnpyler_821483_k*complex_Prod2_AI_protein_RNAseH_biocrnpyler_821483;
    r9_1_biocrnpyler_821483_k = 10;
  r11_biocrnpyler_821483: complex_Prod2_AI_protein_RNAseH_biocrnpyler_821483 => dna_dA1_biocrnpyler_821483 + protein_RNAseH_biocrnpyler_821483; r11_biocrnpyler_821483_k*complex_Prod2_AI_protein_RNAseH_biocrnpyler_821483;
    r11_biocrnpyler_821483_k = 0.176;

  // Unit definitions:
  unit square_metre = metre^2;
  unit per_second = 1 / second;
  unit substance = dimensionless;
end
