// SBML level 3 version 2

model combined_model_of__combined_model_of__external_reservoir_model_combined_model_of__rnaexp_membrane_combined_model_of__combined_model_of__biocrnpyler_381549_biocrnpyler_35010()
  // model units - substance: mole, time: second, volume: litre, area: square_metre, length: metre, extent: mole

  // Compartments:
  compartment cell_P_external_combined = 2e-6 litre;
  compartment cell_P_internal_combined = 1e-6 litre;

  // Species:
  species rna_rR1_e_external_reservoir_model_1_combined in cell_P_external_combined = 0;
  species sid in cell_P_internal_combined = 1;
  species rna_rR1_sid in cell_P_internal_combined = 0;
  species Prod2_OFF_biocrnpyler_381549_combined_model_of__biocrnpyler_381549_biocrnpyler_35010 in cell_P_internal_combined = 0;
  species complex_Prod2_ON_biocrnpyler_381549_combined_model_of__biocrnpyler_381549_biocrnpyler_35010 in cell_P_internal_combined = 0;
  species dna_dA1_biocrnpyler_381549_combined_model_of__biocrnpyler_381549_biocrnpyler_35010 in cell_P_internal_combined = 0;
  species rna_rR1_1_combined in cell_P_internal_combined = 0;
  species protein_RNAP_biocrnpyler_381549_combined_model_of__biocrnpyler_381549_biocrnpyler_35010 in cell_P_internal_combined = 0;
  species protein_RNAseH_biocrnpyler_381549_combined_model_of__biocrnpyler_381549_biocrnpyler_35010 in cell_P_internal_combined = 0;
  species complex_Prod2_AI_biocrnpyler_381549_combined_model_of__biocrnpyler_381549_biocrnpyler_35010 in cell_P_internal_combined = 0;
  species complex_Prod2_ON_protein_RNAP_biocrnpyler_381549_combined_model_of__biocrnpyler_381549_biocrnpyler_35010 in cell_P_internal_combined = 0;
  species complex_Prod2_OFF_protein_RNAP_biocrnpyler_381549_combined_model_of__biocrnpyler_381549_biocrnpyler_35010 in cell_P_internal_combined = 0;
  species complex_Prod2_AI_protein_RNAseH_biocrnpyler_381549_combined_model_of__biocrnpyler_381549_biocrnpyler_35010 in cell_P_internal_combined = 0;
  species BrocApt_biocrnpyler_381549_1_combined_combined_model_of__biocrnpyler_381549_biocrnpyler_35010 in cell_P_internal_combined = 0;
  species DFHBI_biocrnpyler_35010_combined_model_of__biocrnpyler_381549_biocrnpyler_35010 in cell_P_internal_combined = 0;
  species complex_BrocApt_DFHBI_biocrnpyler_35010_combined_model_of__biocrnpyler_381549_biocrnpyler_35010 in cell_P_internal_combined = 0;

  // Parameters:
  kb = 0.2 per_second;
  kd = 0.01 per_second;

  // Reactions:
  R1: sid + rna_rR1_1_combined -> rna_rR1_sid; kb*sid*rna_rR1_1_combined - kd*rna_rR1_sid;
  R2: rna_rR1_sid -> rna_rR1_e_external_reservoir_model_1_combined + sid; kd*rna_rR1_sid - kb*sid*rna_rR1_e_external_reservoir_model_1_combined;
  r0_biocrnpyler_381549_combined_model_of__biocrnpyler_381549_biocrnpyler_35010: Prod2_OFF_biocrnpyler_381549_combined_model_of__biocrnpyler_381549_biocrnpyler_35010 + dna_dA1_biocrnpyler_381549_combined_model_of__biocrnpyler_381549_biocrnpyler_35010 => complex_Prod2_ON_biocrnpyler_381549_combined_model_of__biocrnpyler_381549_biocrnpyler_35010; r0_biocrnpyler_381549_combined_model_of__biocrnpyler_381549_biocrnpyler_35010_k*Prod2_OFF_biocrnpyler_381549_combined_model_of__biocrnpyler_381549_biocrnpyler_35010*dna_dA1_biocrnpyler_381549_combined_model_of__biocrnpyler_381549_biocrnpyler_35010;
    r0_biocrnpyler_381549_combined_model_of__biocrnpyler_381549_biocrnpyler_35010_k = 0.00394;
  r1_biocrnpyler_381549_combined_model_of__biocrnpyler_381549_biocrnpyler_35010: complex_Prod2_ON_biocrnpyler_381549_combined_model_of__biocrnpyler_381549_biocrnpyler_35010 + rna_rR1_1_combined => Prod2_OFF_biocrnpyler_381549_combined_model_of__biocrnpyler_381549_biocrnpyler_35010 + complex_Prod2_AI_biocrnpyler_381549_combined_model_of__biocrnpyler_381549_biocrnpyler_35010; r1_biocrnpyler_381549_combined_model_of__biocrnpyler_381549_biocrnpyler_35010_k*complex_Prod2_ON_biocrnpyler_381549_combined_model_of__biocrnpyler_381549_biocrnpyler_35010*rna_rR1_1_combined;
    r1_biocrnpyler_381549_combined_model_of__biocrnpyler_381549_biocrnpyler_35010_k = 0.0696;
  r2_biocrnpyler_381549_combined_model_of__biocrnpyler_381549_biocrnpyler_35010: dna_dA1_biocrnpyler_381549_combined_model_of__biocrnpyler_381549_biocrnpyler_35010 + rna_rR1_1_combined => complex_Prod2_AI_biocrnpyler_381549_combined_model_of__biocrnpyler_381549_biocrnpyler_35010; r2_biocrnpyler_381549_combined_model_of__biocrnpyler_381549_biocrnpyler_35010_k*dna_dA1_biocrnpyler_381549_combined_model_of__biocrnpyler_381549_biocrnpyler_35010*rna_rR1_1_combined;
    r2_biocrnpyler_381549_combined_model_of__biocrnpyler_381549_biocrnpyler_35010_k = 0.0696;
  r3_biocrnpyler_381549_combined_model_of__biocrnpyler_381549_biocrnpyler_35010: complex_Prod2_ON_biocrnpyler_381549_combined_model_of__biocrnpyler_381549_biocrnpyler_35010 + protein_RNAP_biocrnpyler_381549_combined_model_of__biocrnpyler_381549_biocrnpyler_35010 => complex_Prod2_ON_protein_RNAP_biocrnpyler_381549_combined_model_of__biocrnpyler_381549_biocrnpyler_35010; r3_biocrnpyler_381549_combined_model_of__biocrnpyler_381549_biocrnpyler_35010_k*complex_Prod2_ON_biocrnpyler_381549_combined_model_of__biocrnpyler_381549_biocrnpyler_35010*protein_RNAP_biocrnpyler_381549_combined_model_of__biocrnpyler_381549_biocrnpyler_35010;
    r3_biocrnpyler_381549_combined_model_of__biocrnpyler_381549_biocrnpyler_35010_k = 38.85714;
  r3_1_biocrnpyler_381549_combined_model_of__biocrnpyler_381549_biocrnpyler_35010: complex_Prod2_ON_protein_RNAP_biocrnpyler_381549_combined_model_of__biocrnpyler_381549_biocrnpyler_35010 => complex_Prod2_ON_biocrnpyler_381549_combined_model_of__biocrnpyler_381549_biocrnpyler_35010 + protein_RNAP_biocrnpyler_381549_combined_model_of__biocrnpyler_381549_biocrnpyler_35010; r3_1_biocrnpyler_381549_combined_model_of__biocrnpyler_381549_biocrnpyler_35010_k*complex_Prod2_ON_protein_RNAP_biocrnpyler_381549_combined_model_of__biocrnpyler_381549_biocrnpyler_35010;
    r3_1_biocrnpyler_381549_combined_model_of__biocrnpyler_381549_biocrnpyler_35010_k = 10;
  r5_biocrnpyler_381549_combined_model_of__biocrnpyler_381549_biocrnpyler_35010: complex_Prod2_ON_protein_RNAP_biocrnpyler_381549_combined_model_of__biocrnpyler_381549_biocrnpyler_35010 => complex_Prod2_ON_biocrnpyler_381549_combined_model_of__biocrnpyler_381549_biocrnpyler_35010 + BrocApt_biocrnpyler_381549_1_combined_combined_model_of__biocrnpyler_381549_biocrnpyler_35010 + protein_RNAP_biocrnpyler_381549_combined_model_of__biocrnpyler_381549_biocrnpyler_35010; r5_biocrnpyler_381549_combined_model_of__biocrnpyler_381549_biocrnpyler_35010_k*complex_Prod2_ON_protein_RNAP_biocrnpyler_381549_combined_model_of__biocrnpyler_381549_biocrnpyler_35010;
    r5_biocrnpyler_381549_combined_model_of__biocrnpyler_381549_biocrnpyler_35010_k = 0.064;
  r6_biocrnpyler_381549_combined_model_of__biocrnpyler_381549_biocrnpyler_35010: Prod2_OFF_biocrnpyler_381549_combined_model_of__biocrnpyler_381549_biocrnpyler_35010 + protein_RNAP_biocrnpyler_381549_combined_model_of__biocrnpyler_381549_biocrnpyler_35010 => complex_Prod2_OFF_protein_RNAP_biocrnpyler_381549_combined_model_of__biocrnpyler_381549_biocrnpyler_35010; r6_biocrnpyler_381549_combined_model_of__biocrnpyler_381549_biocrnpyler_35010_k*Prod2_OFF_biocrnpyler_381549_combined_model_of__biocrnpyler_381549_biocrnpyler_35010*protein_RNAP_biocrnpyler_381549_combined_model_of__biocrnpyler_381549_biocrnpyler_35010;
    r6_biocrnpyler_381549_combined_model_of__biocrnpyler_381549_biocrnpyler_35010_k = 9.530476;
  r6_1_biocrnpyler_381549_combined_model_of__biocrnpyler_381549_biocrnpyler_35010: complex_Prod2_OFF_protein_RNAP_biocrnpyler_381549_combined_model_of__biocrnpyler_381549_biocrnpyler_35010 => Prod2_OFF_biocrnpyler_381549_combined_model_of__biocrnpyler_381549_biocrnpyler_35010 + protein_RNAP_biocrnpyler_381549_combined_model_of__biocrnpyler_381549_biocrnpyler_35010; r6_1_biocrnpyler_381549_combined_model_of__biocrnpyler_381549_biocrnpyler_35010_k*complex_Prod2_OFF_protein_RNAP_biocrnpyler_381549_combined_model_of__biocrnpyler_381549_biocrnpyler_35010;
    r6_1_biocrnpyler_381549_combined_model_of__biocrnpyler_381549_biocrnpyler_35010_k = 10;
  r8_biocrnpyler_381549_combined_model_of__biocrnpyler_381549_biocrnpyler_35010: complex_Prod2_OFF_protein_RNAP_biocrnpyler_381549_combined_model_of__biocrnpyler_381549_biocrnpyler_35010 => Prod2_OFF_biocrnpyler_381549_combined_model_of__biocrnpyler_381549_biocrnpyler_35010 + BrocApt_biocrnpyler_381549_1_combined_combined_model_of__biocrnpyler_381549_biocrnpyler_35010 + protein_RNAP_biocrnpyler_381549_combined_model_of__biocrnpyler_381549_biocrnpyler_35010; r8_biocrnpyler_381549_combined_model_of__biocrnpyler_381549_biocrnpyler_35010_k*complex_Prod2_OFF_protein_RNAP_biocrnpyler_381549_combined_model_of__biocrnpyler_381549_biocrnpyler_35010;
    r8_biocrnpyler_381549_combined_model_of__biocrnpyler_381549_biocrnpyler_35010_k = 0.007;
  r9_biocrnpyler_381549_combined_model_of__biocrnpyler_381549_biocrnpyler_35010: complex_Prod2_AI_biocrnpyler_381549_combined_model_of__biocrnpyler_381549_biocrnpyler_35010 + protein_RNAseH_biocrnpyler_381549_combined_model_of__biocrnpyler_381549_biocrnpyler_35010 => complex_Prod2_AI_protein_RNAseH_biocrnpyler_381549_combined_model_of__biocrnpyler_381549_biocrnpyler_35010; r9_biocrnpyler_381549_combined_model_of__biocrnpyler_381549_biocrnpyler_35010_k*complex_Prod2_AI_biocrnpyler_381549_combined_model_of__biocrnpyler_381549_biocrnpyler_35010*protein_RNAseH_biocrnpyler_381549_combined_model_of__biocrnpyler_381549_biocrnpyler_35010;
    r9_biocrnpyler_381549_combined_model_of__biocrnpyler_381549_biocrnpyler_35010_k = 111.8242;
  r9_1_biocrnpyler_381549_combined_model_of__biocrnpyler_381549_biocrnpyler_35010: complex_Prod2_AI_protein_RNAseH_biocrnpyler_381549_combined_model_of__biocrnpyler_381549_biocrnpyler_35010 => complex_Prod2_AI_biocrnpyler_381549_combined_model_of__biocrnpyler_381549_biocrnpyler_35010 + protein_RNAseH_biocrnpyler_381549_combined_model_of__biocrnpyler_381549_biocrnpyler_35010; r9_1_biocrnpyler_381549_combined_model_of__biocrnpyler_381549_biocrnpyler_35010_k*complex_Prod2_AI_protein_RNAseH_biocrnpyler_381549_combined_model_of__biocrnpyler_381549_biocrnpyler_35010;
    r9_1_biocrnpyler_381549_combined_model_of__biocrnpyler_381549_biocrnpyler_35010_k = 10;
  r11_biocrnpyler_381549_combined_model_of__biocrnpyler_381549_biocrnpyler_35010: complex_Prod2_AI_protein_RNAseH_biocrnpyler_381549_combined_model_of__biocrnpyler_381549_biocrnpyler_35010 => dna_dA1_biocrnpyler_381549_combined_model_of__biocrnpyler_381549_biocrnpyler_35010 + protein_RNAseH_biocrnpyler_381549_combined_model_of__biocrnpyler_381549_biocrnpyler_35010; r11_biocrnpyler_381549_combined_model_of__biocrnpyler_381549_biocrnpyler_35010_k*complex_Prod2_AI_protein_RNAseH_biocrnpyler_381549_combined_model_of__biocrnpyler_381549_biocrnpyler_35010;
    r11_biocrnpyler_381549_combined_model_of__biocrnpyler_381549_biocrnpyler_35010_k = 0.176;
  r0_biocrnpyler_35010_combined_model_of__biocrnpyler_381549_biocrnpyler_35010: BrocApt_biocrnpyler_381549_1_combined_combined_model_of__biocrnpyler_381549_biocrnpyler_35010 + DFHBI_biocrnpyler_35010_combined_model_of__biocrnpyler_381549_biocrnpyler_35010 => complex_BrocApt_DFHBI_biocrnpyler_35010_combined_model_of__biocrnpyler_381549_biocrnpyler_35010; r0_biocrnpyler_35010_combined_model_of__biocrnpyler_381549_biocrnpyler_35010_k*BrocApt_biocrnpyler_381549_1_combined_combined_model_of__biocrnpyler_381549_biocrnpyler_35010*DFHBI_biocrnpyler_35010_combined_model_of__biocrnpyler_381549_biocrnpyler_35010;
    r0_biocrnpyler_35010_combined_model_of__biocrnpyler_381549_biocrnpyler_35010_k = 9.96e-5;

  // Unit definitions:
  unit square_metre = metre^2;
  unit per_second = 1 / second;
  unit substance = dimensionless;
end
