// SBML level 3 version 2

model rnaexp_membrane3()
  // model units - substance: substance, time: second, extent: mole

  // Compartments:
  compartment internal = 1e-6 litre;
  compartment external = 1e-6 litre;

  // Species:
  species sidP in internal = 1;
  species sidB in internal = 1;
  species rna_rR1_e in external = 0;
  species rna_rR1_e_sidP in internal = 0;
  species rna_rR1P in internal = 0;
  species BrocApt_e in external = 0;
  species BrocApt in internal = 0;
  species BrocApt_sidB in internal = 0;

  // Parameters:
  kb1 = 0.01 per_second;
  kd1 = 0.2 per_second;
  kc = 0.2 per_second;
  ke = 0.01 per_second;

  // Reactions:
  R3: sidP + rna_rR1_e -> rna_rR1_e_sidP; kb1*sidP*rna_rR1_e - kd1*rna_rR1_e_sidP;
  R4: rna_rR1_e_sidP -> rna_rR1P + sidP; kd1*rna_rR1_e_sidP - kb1*sidP*rna_rR1P;
  R5: sidB + BrocApt -> BrocApt_sidB; kc*sidB*BrocApt - ke*BrocApt_sidB;
  R6: BrocApt_sidB -> BrocApt_e + sidB; ke*BrocApt_sidB - kc*sidB*BrocApt_e;

  // Unit definitions:
  unit per_second = 1 / second;
  unit substance = dimensionless;
end
