// SBML level 3 version 2

model rnaexp_membrane()
  // model units - substance: substance, time: second, extent: mole

  // Compartments:
  compartment internal = 1e-6 litre;
  compartment external = 1e-6 litre;

  // Species:
  species rna_rR1_e in external = 0;
  species rna_rR1 in internal = 0;
  species sid in internal = 1;
  species rna_rR1_sid in internal = 0;

  // Parameters:
  kb = 0.2 per_second;
  kd = 0.01 per_second;

  // Reactions:
  R1: sid + rna_rR1 -> rna_rR1_sid; kb*sid*rna_rR1 - kd*rna_rR1_sid;
  R2: rna_rR1_sid -> rna_rR1_e + sid; kd*rna_rR1_sid - kb*sid*rna_rR1_e;

  // Unit definitions:
  unit per_second = 1 / second;
  unit substance = dimensionless;
end
