// SBML level 3 version 2

model biocrnpyler_755286()
  // model units - substance: mole, time: second, volume: litre, area: square_metre, length: metre, extent: mole

  // Compartments:
  compartment default_biocrnpyler_755286 = 1e-6;

  // Species:
  species Core1_OFF_biocrnpyler_755286 in default_biocrnpyler_755286 = 0;
  species complex_Core1_ON_biocrnpyler_755286 in default_biocrnpyler_755286 = 0;
  species rna_rR1_biocrnpyler_755286 in default_biocrnpyler_755286 = 0;
  species dna_dA2_biocrnpyler_755286 in default_biocrnpyler_755286 = 0;
  species rna_rR2_biocrnpyler_755286 in default_biocrnpyler_755286 = 0;
  species protein_RNAP_biocrnpyler_755286 in default_biocrnpyler_755286 = 0;
  species protein_RNAseH_biocrnpyler_755286 in default_biocrnpyler_755286 = 0;
  species complex_Core1_AI_biocrnpyler_755286 in default_biocrnpyler_755286 = 0;
  species complex_Core1_ON_protein_RNAP_biocrnpyler_755286 in default_biocrnpyler_755286 = 0;
  species complex_Core1_OFF_protein_RNAP_biocrnpyler_755286 in default_biocrnpyler_755286 = 0;
  species complex_Core1_AI_protein_RNAseH_biocrnpyler_755286 in default_biocrnpyler_755286 = 0;
  species Core2_OFF_biocrnpyler_755286 in default_biocrnpyler_755286 = 0;
  species complex_Core2_ON_biocrnpyler_755286 in default_biocrnpyler_755286 = 0;
  species dna_dA1_biocrnpyler_755286 in default_biocrnpyler_755286 = 0;
  species complex_Core2_AI_biocrnpyler_755286 in default_biocrnpyler_755286 = 0;
  species complex_Core2_ON_protein_RNAP_biocrnpyler_755286 in default_biocrnpyler_755286 = 0;
  species complex_Core2_OFF_protein_RNAP_biocrnpyler_755286 in default_biocrnpyler_755286 = 0;
  species complex_Core2_AI_protein_RNAseH_biocrnpyler_755286 in default_biocrnpyler_755286 = 0;

  // Reactions:
  r0_biocrnpyler_755286: Core1_OFF_biocrnpyler_755286 + dna_dA2_biocrnpyler_755286 => complex_Core1_ON_biocrnpyler_755286; r0_biocrnpyler_755286_k*Core1_OFF_biocrnpyler_755286*dna_dA2_biocrnpyler_755286;
    r0_biocrnpyler_755286_k = 0.00394;
  r1_biocrnpyler_755286: complex_Core1_ON_biocrnpyler_755286 + rna_rR2_biocrnpyler_755286 => Core1_OFF_biocrnpyler_755286 + complex_Core1_AI_biocrnpyler_755286; r1_biocrnpyler_755286_k*complex_Core1_ON_biocrnpyler_755286*rna_rR2_biocrnpyler_755286;
    r1_biocrnpyler_755286_k = 0.0696;
  r2_biocrnpyler_755286: dna_dA2_biocrnpyler_755286 + rna_rR2_biocrnpyler_755286 => complex_Core1_AI_biocrnpyler_755286; r2_biocrnpyler_755286_k*dna_dA2_biocrnpyler_755286*rna_rR2_biocrnpyler_755286;
    r2_biocrnpyler_755286_k = 0.0696;
  r3_biocrnpyler_755286: complex_Core1_ON_biocrnpyler_755286 + protein_RNAP_biocrnpyler_755286 => complex_Core1_ON_protein_RNAP_biocrnpyler_755286; r3_biocrnpyler_755286_k*complex_Core1_ON_biocrnpyler_755286*protein_RNAP_biocrnpyler_755286;
    r3_biocrnpyler_755286_k = 38.85714;
  r3_1_biocrnpyler_755286: complex_Core1_ON_protein_RNAP_biocrnpyler_755286 => complex_Core1_ON_biocrnpyler_755286 + protein_RNAP_biocrnpyler_755286; r3_1_biocrnpyler_755286_k*complex_Core1_ON_protein_RNAP_biocrnpyler_755286;
    r3_1_biocrnpyler_755286_k = 10;
  r5_biocrnpyler_755286: complex_Core1_ON_protein_RNAP_biocrnpyler_755286 => complex_Core1_ON_biocrnpyler_755286 + rna_rR1_biocrnpyler_755286 + protein_RNAP_biocrnpyler_755286; r5_biocrnpyler_755286_k*complex_Core1_ON_protein_RNAP_biocrnpyler_755286;
    r5_biocrnpyler_755286_k = 0.064;
  r6_biocrnpyler_755286: Core1_OFF_biocrnpyler_755286 + protein_RNAP_biocrnpyler_755286 => complex_Core1_OFF_protein_RNAP_biocrnpyler_755286; r6_biocrnpyler_755286_k*Core1_OFF_biocrnpyler_755286*protein_RNAP_biocrnpyler_755286;
    r6_biocrnpyler_755286_k = 9.530476;
  r6_1_biocrnpyler_755286: complex_Core1_OFF_protein_RNAP_biocrnpyler_755286 => Core1_OFF_biocrnpyler_755286 + protein_RNAP_biocrnpyler_755286; r6_1_biocrnpyler_755286_k*complex_Core1_OFF_protein_RNAP_biocrnpyler_755286;
    r6_1_biocrnpyler_755286_k = 10;
  r8_biocrnpyler_755286: complex_Core1_OFF_protein_RNAP_biocrnpyler_755286 => Core1_OFF_biocrnpyler_755286 + rna_rR1_biocrnpyler_755286 + protein_RNAP_biocrnpyler_755286; r8_biocrnpyler_755286_k*complex_Core1_OFF_protein_RNAP_biocrnpyler_755286;
    r8_biocrnpyler_755286_k = 0.007;
  r9_biocrnpyler_755286: complex_Core1_AI_biocrnpyler_755286 + protein_RNAseH_biocrnpyler_755286 => complex_Core1_AI_protein_RNAseH_biocrnpyler_755286; r9_biocrnpyler_755286_k*complex_Core1_AI_biocrnpyler_755286*protein_RNAseH_biocrnpyler_755286;
    r9_biocrnpyler_755286_k = 111.8242;
  r9_1_biocrnpyler_755286: complex_Core1_AI_protein_RNAseH_biocrnpyler_755286 => complex_Core1_AI_biocrnpyler_755286 + protein_RNAseH_biocrnpyler_755286; r9_1_biocrnpyler_755286_k*complex_Core1_AI_protein_RNAseH_biocrnpyler_755286;
    r9_1_biocrnpyler_755286_k = 10;
  r11_biocrnpyler_755286: complex_Core1_AI_protein_RNAseH_biocrnpyler_755286 => dna_dA2_biocrnpyler_755286 + protein_RNAseH_biocrnpyler_755286; r11_biocrnpyler_755286_k*complex_Core1_AI_protein_RNAseH_biocrnpyler_755286;
    r11_biocrnpyler_755286_k = 0.176;
  r12_biocrnpyler_755286: Core2_OFF_biocrnpyler_755286 + dna_dA1_biocrnpyler_755286 => complex_Core2_ON_biocrnpyler_755286; r12_biocrnpyler_755286_k*Core2_OFF_biocrnpyler_755286*dna_dA1_biocrnpyler_755286;
    r12_biocrnpyler_755286_k = 0.00394;
  r13_biocrnpyler_755286: complex_Core2_ON_biocrnpyler_755286 + rna_rR1_biocrnpyler_755286 => Core2_OFF_biocrnpyler_755286 + complex_Core2_AI_biocrnpyler_755286; r13_biocrnpyler_755286_k*complex_Core2_ON_biocrnpyler_755286*rna_rR1_biocrnpyler_755286;
    r13_biocrnpyler_755286_k = 0.0696;
  r14_biocrnpyler_755286: dna_dA1_biocrnpyler_755286 + rna_rR1_biocrnpyler_755286 => complex_Core2_AI_biocrnpyler_755286; r14_biocrnpyler_755286_k*dna_dA1_biocrnpyler_755286*rna_rR1_biocrnpyler_755286;
    r14_biocrnpyler_755286_k = 0.0696;
  r15_biocrnpyler_755286: complex_Core2_ON_biocrnpyler_755286 + protein_RNAP_biocrnpyler_755286 => complex_Core2_ON_protein_RNAP_biocrnpyler_755286; r15_biocrnpyler_755286_k*complex_Core2_ON_biocrnpyler_755286*protein_RNAP_biocrnpyler_755286;
    r15_biocrnpyler_755286_k = 38.85714;
  r15_1_biocrnpyler_755286: complex_Core2_ON_protein_RNAP_biocrnpyler_755286 => complex_Core2_ON_biocrnpyler_755286 + protein_RNAP_biocrnpyler_755286; r15_1_biocrnpyler_755286_k*complex_Core2_ON_protein_RNAP_biocrnpyler_755286;
    r15_1_biocrnpyler_755286_k = 10;
  r17_biocrnpyler_755286: complex_Core2_ON_protein_RNAP_biocrnpyler_755286 => complex_Core2_ON_biocrnpyler_755286 + rna_rR2_biocrnpyler_755286 + protein_RNAP_biocrnpyler_755286; r17_biocrnpyler_755286_k*complex_Core2_ON_protein_RNAP_biocrnpyler_755286;
    r17_biocrnpyler_755286_k = 0.064;
  r18_biocrnpyler_755286: Core2_OFF_biocrnpyler_755286 + protein_RNAP_biocrnpyler_755286 => complex_Core2_OFF_protein_RNAP_biocrnpyler_755286; r18_biocrnpyler_755286_k*Core2_OFF_biocrnpyler_755286*protein_RNAP_biocrnpyler_755286;
    r18_biocrnpyler_755286_k = 9.530476;
  r18_1_biocrnpyler_755286: complex_Core2_OFF_protein_RNAP_biocrnpyler_755286 => Core2_OFF_biocrnpyler_755286 + protein_RNAP_biocrnpyler_755286; r18_1_biocrnpyler_755286_k*complex_Core2_OFF_protein_RNAP_biocrnpyler_755286;
    r18_1_biocrnpyler_755286_k = 10;
  r20_biocrnpyler_755286: complex_Core2_OFF_protein_RNAP_biocrnpyler_755286 => Core2_OFF_biocrnpyler_755286 + rna_rR2_biocrnpyler_755286 + protein_RNAP_biocrnpyler_755286; r20_biocrnpyler_755286_k*complex_Core2_OFF_protein_RNAP_biocrnpyler_755286;
    r20_biocrnpyler_755286_k = 0.007;
  r21_biocrnpyler_755286: complex_Core2_AI_biocrnpyler_755286 + protein_RNAseH_biocrnpyler_755286 => complex_Core2_AI_protein_RNAseH_biocrnpyler_755286; r21_biocrnpyler_755286_k*complex_Core2_AI_biocrnpyler_755286*protein_RNAseH_biocrnpyler_755286;
    r21_biocrnpyler_755286_k = 111.8242;
  r21_1_biocrnpyler_755286: complex_Core2_AI_protein_RNAseH_biocrnpyler_755286 => complex_Core2_AI_biocrnpyler_755286 + protein_RNAseH_biocrnpyler_755286; r21_1_biocrnpyler_755286_k*complex_Core2_AI_protein_RNAseH_biocrnpyler_755286;
    r21_1_biocrnpyler_755286_k = 10;
  r23_biocrnpyler_755286: complex_Core2_AI_protein_RNAseH_biocrnpyler_755286 => dna_dA1_biocrnpyler_755286 + protein_RNAseH_biocrnpyler_755286; r23_biocrnpyler_755286_k*complex_Core2_AI_protein_RNAseH_biocrnpyler_755286;
    r23_biocrnpyler_755286_k = 0.176;

  // Unit definitions:
  unit square_metre = metre^2;
end
