// SBML level 3 version 2

model combined_model_of__combined_model_of__external_reservoir_model_combined_model_of__rR1_membrane_combined_model_of__biocrnpyler_153440()
  // model units - substance: mole, time: second, volume: litre, area: square_metre, length: metre, extent: mole

  // Compartments:
  compartment cell_1_external_combined = 2e-6 litre;
  compartment cell_1_internal_combined = 0.0001 litre;

  // Species:
  species rR1_e_external_reservoir_model_1_combined in cell_1_external_combined = 10000/cell_1_external_combined;
  species rR1_i in cell_1_internal_combined = 0;
  species Core1_OFF_biocrnpyler_153440 in cell_1_internal_combined = 6000/cell_1_internal_combined;
  species complex_Core1_ON_biocrnpyler_153440 in cell_1_internal_combined = 0;
  species rna_rR1_i_biocrnpyler_153440 in cell_1_internal_combined = 0;
  species dna_dA2_biocrnpyler_153440 in cell_1_internal_combined = 6000/cell_1_internal_combined;
  species rna_rR2_biocrnpyler_153440 in cell_1_internal_combined = 0;
  species protein_RNAP_biocrnpyler_153440 in cell_1_internal_combined = 150/cell_1_internal_combined;
  species protein_RNAseH_biocrnpyler_153440 in cell_1_internal_combined = 25/cell_1_internal_combined;
  species complex_Core1_AI_biocrnpyler_153440 in cell_1_internal_combined = 0;
  species complex_Core1_ON_protein_RNAP_biocrnpyler_153440 in cell_1_internal_combined = 0;
  species complex_Core1_OFF_protein_RNAP_biocrnpyler_153440 in cell_1_internal_combined = 0;
  species complex_Core1_AI_protein_RNAseH_biocrnpyler_153440 in cell_1_internal_combined = 0;
  species Core2_OFF_biocrnpyler_153440 in cell_1_internal_combined = 5000/cell_1_internal_combined;
  species complex_Core2_ON_biocrnpyler_153440 in cell_1_internal_combined = 0;
  species dna_dA1_biocrnpyler_153440 in cell_1_internal_combined = 6000/cell_1_internal_combined;
  species complex_Core2_AI_biocrnpyler_153440 in cell_1_internal_combined = 0;
  species complex_Core2_ON_protein_RNAP_biocrnpyler_153440 in cell_1_internal_combined = 0;
  species complex_Core2_OFF_protein_RNAP_biocrnpyler_153440 in cell_1_internal_combined = 0;
  species complex_Core2_AI_protein_RNAseH_biocrnpyler_153440 in cell_1_internal_combined = 0;

  // Parameters:
  kb = 0.002 per_second;
  kd = 1e-5 per_second;

  // Reactions:
  r1: rR1_e_external_reservoir_model_1_combined -> rR1_i; kb*rR1_e_external_reservoir_model_1_combined - kd*rR1_i;
  r0_biocrnpyler_153440: Core1_OFF_biocrnpyler_153440 + dna_dA2_biocrnpyler_153440 => complex_Core1_ON_biocrnpyler_153440; r0_biocrnpyler_153440_k*Core1_OFF_biocrnpyler_153440*dna_dA2_biocrnpyler_153440;
    r0_biocrnpyler_153440_k = 0.00394;
  r1_biocrnpyler_153440: complex_Core1_ON_biocrnpyler_153440 + rna_rR2_biocrnpyler_153440 => Core1_OFF_biocrnpyler_153440 + complex_Core1_AI_biocrnpyler_153440; r1_biocrnpyler_153440_k*complex_Core1_ON_biocrnpyler_153440*rna_rR2_biocrnpyler_153440;
    r1_biocrnpyler_153440_k = 0.0696;
  r2_biocrnpyler_153440: dna_dA2_biocrnpyler_153440 + rna_rR2_biocrnpyler_153440 => complex_Core1_AI_biocrnpyler_153440; r2_biocrnpyler_153440_k*dna_dA2_biocrnpyler_153440*rna_rR2_biocrnpyler_153440;
    r2_biocrnpyler_153440_k = 0.0696;
  r3_biocrnpyler_153440: complex_Core1_ON_biocrnpyler_153440 + protein_RNAP_biocrnpyler_153440 => complex_Core1_ON_protein_RNAP_biocrnpyler_153440; r3_biocrnpyler_153440_k*complex_Core1_ON_biocrnpyler_153440*protein_RNAP_biocrnpyler_153440;
    r3_biocrnpyler_153440_k = 38.85714;
  r3_1_biocrnpyler_153440: complex_Core1_ON_protein_RNAP_biocrnpyler_153440 => complex_Core1_ON_biocrnpyler_153440 + protein_RNAP_biocrnpyler_153440; r3_1_biocrnpyler_153440_k*complex_Core1_ON_protein_RNAP_biocrnpyler_153440;
    r3_1_biocrnpyler_153440_k = 10;
  r5_biocrnpyler_153440: complex_Core1_ON_protein_RNAP_biocrnpyler_153440 => complex_Core1_ON_biocrnpyler_153440 + rna_rR1_i_biocrnpyler_153440 + protein_RNAP_biocrnpyler_153440; r5_biocrnpyler_153440_k*complex_Core1_ON_protein_RNAP_biocrnpyler_153440;
    r5_biocrnpyler_153440_k = 0.064;
  r6_biocrnpyler_153440: Core1_OFF_biocrnpyler_153440 + protein_RNAP_biocrnpyler_153440 => complex_Core1_OFF_protein_RNAP_biocrnpyler_153440; r6_biocrnpyler_153440_k*Core1_OFF_biocrnpyler_153440*protein_RNAP_biocrnpyler_153440;
    r6_biocrnpyler_153440_k = 9.530476;
  r6_1_biocrnpyler_153440: complex_Core1_OFF_protein_RNAP_biocrnpyler_153440 => Core1_OFF_biocrnpyler_153440 + protein_RNAP_biocrnpyler_153440; r6_1_biocrnpyler_153440_k*complex_Core1_OFF_protein_RNAP_biocrnpyler_153440;
    r6_1_biocrnpyler_153440_k = 10;
  r8_biocrnpyler_153440: complex_Core1_OFF_protein_RNAP_biocrnpyler_153440 => Core1_OFF_biocrnpyler_153440 + rna_rR1_i_biocrnpyler_153440 + protein_RNAP_biocrnpyler_153440; r8_biocrnpyler_153440_k*complex_Core1_OFF_protein_RNAP_biocrnpyler_153440;
    r8_biocrnpyler_153440_k = 0.007;
  r9_biocrnpyler_153440: complex_Core1_AI_biocrnpyler_153440 + protein_RNAseH_biocrnpyler_153440 => complex_Core1_AI_protein_RNAseH_biocrnpyler_153440; r9_biocrnpyler_153440_k*complex_Core1_AI_biocrnpyler_153440*protein_RNAseH_biocrnpyler_153440;
    r9_biocrnpyler_153440_k = 111.8242;
  r9_1_biocrnpyler_153440: complex_Core1_AI_protein_RNAseH_biocrnpyler_153440 => complex_Core1_AI_biocrnpyler_153440 + protein_RNAseH_biocrnpyler_153440; r9_1_biocrnpyler_153440_k*complex_Core1_AI_protein_RNAseH_biocrnpyler_153440;
    r9_1_biocrnpyler_153440_k = 10;
  r11_biocrnpyler_153440: complex_Core1_AI_protein_RNAseH_biocrnpyler_153440 => dna_dA2_biocrnpyler_153440 + protein_RNAseH_biocrnpyler_153440; r11_biocrnpyler_153440_k*complex_Core1_AI_protein_RNAseH_biocrnpyler_153440;
    r11_biocrnpyler_153440_k = 0.176;
  r12_biocrnpyler_153440: Core2_OFF_biocrnpyler_153440 + dna_dA1_biocrnpyler_153440 => complex_Core2_ON_biocrnpyler_153440; r12_biocrnpyler_153440_k*Core2_OFF_biocrnpyler_153440*dna_dA1_biocrnpyler_153440;
    r12_biocrnpyler_153440_k = 0.00394;
  r13_biocrnpyler_153440: complex_Core2_ON_biocrnpyler_153440 + rna_rR1_i_biocrnpyler_153440 => Core2_OFF_biocrnpyler_153440 + complex_Core2_AI_biocrnpyler_153440; r13_biocrnpyler_153440_k*complex_Core2_ON_biocrnpyler_153440*rna_rR1_i_biocrnpyler_153440;
    r13_biocrnpyler_153440_k = 0.0696;
  r14_biocrnpyler_153440: dna_dA1_biocrnpyler_153440 + rna_rR1_i_biocrnpyler_153440 => complex_Core2_AI_biocrnpyler_153440; r14_biocrnpyler_153440_k*dna_dA1_biocrnpyler_153440*rna_rR1_i_biocrnpyler_153440;
    r14_biocrnpyler_153440_k = 0.0696;
  r15_biocrnpyler_153440: complex_Core2_ON_biocrnpyler_153440 + protein_RNAP_biocrnpyler_153440 => complex_Core2_ON_protein_RNAP_biocrnpyler_153440; r15_biocrnpyler_153440_k*complex_Core2_ON_biocrnpyler_153440*protein_RNAP_biocrnpyler_153440;
    r15_biocrnpyler_153440_k = 38.85714;
  r15_1_biocrnpyler_153440: complex_Core2_ON_protein_RNAP_biocrnpyler_153440 => complex_Core2_ON_biocrnpyler_153440 + protein_RNAP_biocrnpyler_153440; r15_1_biocrnpyler_153440_k*complex_Core2_ON_protein_RNAP_biocrnpyler_153440;
    r15_1_biocrnpyler_153440_k = 10;
  r17_biocrnpyler_153440: complex_Core2_ON_protein_RNAP_biocrnpyler_153440 => complex_Core2_ON_biocrnpyler_153440 + rna_rR2_biocrnpyler_153440 + protein_RNAP_biocrnpyler_153440; r17_biocrnpyler_153440_k*complex_Core2_ON_protein_RNAP_biocrnpyler_153440;
    r17_biocrnpyler_153440_k = 0.064;
  r18_biocrnpyler_153440: Core2_OFF_biocrnpyler_153440 + protein_RNAP_biocrnpyler_153440 => complex_Core2_OFF_protein_RNAP_biocrnpyler_153440; r18_biocrnpyler_153440_k*Core2_OFF_biocrnpyler_153440*protein_RNAP_biocrnpyler_153440;
    r18_biocrnpyler_153440_k = 9.530476;
  r18_1_biocrnpyler_153440: complex_Core2_OFF_protein_RNAP_biocrnpyler_153440 => Core2_OFF_biocrnpyler_153440 + protein_RNAP_biocrnpyler_153440; r18_1_biocrnpyler_153440_k*complex_Core2_OFF_protein_RNAP_biocrnpyler_153440;
    r18_1_biocrnpyler_153440_k = 10;
  r20_biocrnpyler_153440: complex_Core2_OFF_protein_RNAP_biocrnpyler_153440 => Core2_OFF_biocrnpyler_153440 + rna_rR2_biocrnpyler_153440 + protein_RNAP_biocrnpyler_153440; r20_biocrnpyler_153440_k*complex_Core2_OFF_protein_RNAP_biocrnpyler_153440;
    r20_biocrnpyler_153440_k = 0.007;
  r21_biocrnpyler_153440: complex_Core2_AI_biocrnpyler_153440 + protein_RNAseH_biocrnpyler_153440 => complex_Core2_AI_protein_RNAseH_biocrnpyler_153440; r21_biocrnpyler_153440_k*complex_Core2_AI_biocrnpyler_153440*protein_RNAseH_biocrnpyler_153440;
    r21_biocrnpyler_153440_k = 111.8242;
  r21_1_biocrnpyler_153440: complex_Core2_AI_protein_RNAseH_biocrnpyler_153440 => complex_Core2_AI_biocrnpyler_153440 + protein_RNAseH_biocrnpyler_153440; r21_1_biocrnpyler_153440_k*complex_Core2_AI_protein_RNAseH_biocrnpyler_153440;
    r21_1_biocrnpyler_153440_k = 10;
  r23_biocrnpyler_153440: complex_Core2_AI_protein_RNAseH_biocrnpyler_153440 => dna_dA1_biocrnpyler_153440 + protein_RNAseH_biocrnpyler_153440; r23_biocrnpyler_153440_k*complex_Core2_AI_protein_RNAseH_biocrnpyler_153440;
    r23_biocrnpyler_153440_k = 0.176;

  // Unit definitions:
  unit square_metre = metre^2;
  unit per_second = 1 / second;
  unit substance = dimensionless;
end
