// SBML level 3 version 2

model biocrnpyler_417220()
  // model units - substance: mole, time: second, volume: litre, area: square_metre, length: metre, extent: mole

  // Compartments:
  compartment default_biocrnpyler_417220 = 1e-6;

  // Species:
  species Core1_OFF_biocrnpyler_417220 in default_biocrnpyler_417220 = 6000/default_biocrnpyler_417220;
  species complex_Core1_ON_biocrnpyler_417220 in default_biocrnpyler_417220 = 0;
  species rR1_biocrnpyler_417220 in default_biocrnpyler_417220 = 0;
  species dA2_biocrnpyler_417220 in default_biocrnpyler_417220 = 6000/default_biocrnpyler_417220;
  species rR2_biocrnpyler_417220 in default_biocrnpyler_417220 = 0;
  species protein_RNAP_biocrnpyler_417220 in default_biocrnpyler_417220 = 150/default_biocrnpyler_417220;
  species protein_RNAseH_biocrnpyler_417220 in default_biocrnpyler_417220 = 5/default_biocrnpyler_417220;
  species complex_Core1_AI_biocrnpyler_417220 in default_biocrnpyler_417220 = 0;
  species complex_Core1_ON_protein_RNAP_biocrnpyler_417220 in default_biocrnpyler_417220 = 0;
  species complex_Core1_OFF_protein_RNAP_biocrnpyler_417220 in default_biocrnpyler_417220 = 0;
  species complex_Core1_AI_protein_RNAseH_biocrnpyler_417220 in default_biocrnpyler_417220 = 0;
  species Core2_OFF_biocrnpyler_417220 in default_biocrnpyler_417220 = 5000/default_biocrnpyler_417220;
  species complex_Core2_ON_biocrnpyler_417220 in default_biocrnpyler_417220 = 0;
  species dA1_biocrnpyler_417220 in default_biocrnpyler_417220 = 6000/default_biocrnpyler_417220;
  species complex_Core2_AI_biocrnpyler_417220 in default_biocrnpyler_417220 = 0;
  species complex_Core2_ON_protein_RNAP_biocrnpyler_417220 in default_biocrnpyler_417220 = 0;
  species complex_Core2_OFF_protein_RNAP_biocrnpyler_417220 in default_biocrnpyler_417220 = 0;
  species complex_Core2_AI_protein_RNAseH_biocrnpyler_417220 in default_biocrnpyler_417220 = 0;

  // Reactions:
  r0_biocrnpyler_417220: Core1_OFF_biocrnpyler_417220 + dA2_biocrnpyler_417220 => complex_Core1_ON_biocrnpyler_417220; r0_biocrnpyler_417220_k*Core1_OFF_biocrnpyler_417220*dA2_biocrnpyler_417220;
    r0_biocrnpyler_417220_k = 0.00394;
  r1_biocrnpyler_417220: complex_Core1_ON_biocrnpyler_417220 + rR2_biocrnpyler_417220 => Core1_OFF_biocrnpyler_417220 + complex_Core1_AI_biocrnpyler_417220; r1_biocrnpyler_417220_k*complex_Core1_ON_biocrnpyler_417220*rR2_biocrnpyler_417220;
    r1_biocrnpyler_417220_k = 0.0696;
  r2_biocrnpyler_417220: dA2_biocrnpyler_417220 + rR2_biocrnpyler_417220 => complex_Core1_AI_biocrnpyler_417220; r2_biocrnpyler_417220_k*dA2_biocrnpyler_417220*rR2_biocrnpyler_417220;
    r2_biocrnpyler_417220_k = 0.0696;
  r3_biocrnpyler_417220: complex_Core1_ON_biocrnpyler_417220 + protein_RNAP_biocrnpyler_417220 => complex_Core1_ON_protein_RNAP_biocrnpyler_417220; r3_biocrnpyler_417220_k*complex_Core1_ON_biocrnpyler_417220*protein_RNAP_biocrnpyler_417220;
    r3_biocrnpyler_417220_k = 38.85714;
  r3_1_biocrnpyler_417220: complex_Core1_ON_protein_RNAP_biocrnpyler_417220 => complex_Core1_ON_biocrnpyler_417220 + protein_RNAP_biocrnpyler_417220; r3_1_biocrnpyler_417220_k*complex_Core1_ON_protein_RNAP_biocrnpyler_417220;
    r3_1_biocrnpyler_417220_k = 10;
  r5_biocrnpyler_417220: complex_Core1_ON_protein_RNAP_biocrnpyler_417220 => complex_Core1_ON_biocrnpyler_417220 + rR1_biocrnpyler_417220 + protein_RNAP_biocrnpyler_417220; r5_biocrnpyler_417220_k*complex_Core1_ON_protein_RNAP_biocrnpyler_417220;
    r5_biocrnpyler_417220_k = 0.064;
  r6_biocrnpyler_417220: Core1_OFF_biocrnpyler_417220 + protein_RNAP_biocrnpyler_417220 => complex_Core1_OFF_protein_RNAP_biocrnpyler_417220; r6_biocrnpyler_417220_k*Core1_OFF_biocrnpyler_417220*protein_RNAP_biocrnpyler_417220;
    r6_biocrnpyler_417220_k = 9.530476;
  r6_1_biocrnpyler_417220: complex_Core1_OFF_protein_RNAP_biocrnpyler_417220 => Core1_OFF_biocrnpyler_417220 + protein_RNAP_biocrnpyler_417220; r6_1_biocrnpyler_417220_k*complex_Core1_OFF_protein_RNAP_biocrnpyler_417220;
    r6_1_biocrnpyler_417220_k = 10;
  r8_biocrnpyler_417220: complex_Core1_OFF_protein_RNAP_biocrnpyler_417220 => Core1_OFF_biocrnpyler_417220 + rR1_biocrnpyler_417220 + protein_RNAP_biocrnpyler_417220; r8_biocrnpyler_417220_k*complex_Core1_OFF_protein_RNAP_biocrnpyler_417220;
    r8_biocrnpyler_417220_k = 0.007;
  r9_biocrnpyler_417220: complex_Core1_AI_biocrnpyler_417220 + protein_RNAseH_biocrnpyler_417220 => complex_Core1_AI_protein_RNAseH_biocrnpyler_417220; r9_biocrnpyler_417220_k*complex_Core1_AI_biocrnpyler_417220*protein_RNAseH_biocrnpyler_417220;
    r9_biocrnpyler_417220_k = 111.8242;
  r9_1_biocrnpyler_417220: complex_Core1_AI_protein_RNAseH_biocrnpyler_417220 => complex_Core1_AI_biocrnpyler_417220 + protein_RNAseH_biocrnpyler_417220; r9_1_biocrnpyler_417220_k*complex_Core1_AI_protein_RNAseH_biocrnpyler_417220;
    r9_1_biocrnpyler_417220_k = 10;
  r11_biocrnpyler_417220: complex_Core1_AI_protein_RNAseH_biocrnpyler_417220 => dA2_biocrnpyler_417220 + protein_RNAseH_biocrnpyler_417220; r11_biocrnpyler_417220_k*complex_Core1_AI_protein_RNAseH_biocrnpyler_417220;
    r11_biocrnpyler_417220_k = 0.176;
  r12_biocrnpyler_417220: Core2_OFF_biocrnpyler_417220 + dA1_biocrnpyler_417220 => complex_Core2_ON_biocrnpyler_417220; r12_biocrnpyler_417220_k*Core2_OFF_biocrnpyler_417220*dA1_biocrnpyler_417220;
    r12_biocrnpyler_417220_k = 0.00394;
  r13_biocrnpyler_417220: complex_Core2_ON_biocrnpyler_417220 + rR1_biocrnpyler_417220 => Core2_OFF_biocrnpyler_417220 + complex_Core2_AI_biocrnpyler_417220; r13_biocrnpyler_417220_k*complex_Core2_ON_biocrnpyler_417220*rR1_biocrnpyler_417220;
    r13_biocrnpyler_417220_k = 0.0696;
  r14_biocrnpyler_417220: dA1_biocrnpyler_417220 + rR1_biocrnpyler_417220 => complex_Core2_AI_biocrnpyler_417220; r14_biocrnpyler_417220_k*dA1_biocrnpyler_417220*rR1_biocrnpyler_417220;
    r14_biocrnpyler_417220_k = 0.0696;
  r15_biocrnpyler_417220: complex_Core2_ON_biocrnpyler_417220 + protein_RNAP_biocrnpyler_417220 => complex_Core2_ON_protein_RNAP_biocrnpyler_417220; r15_biocrnpyler_417220_k*complex_Core2_ON_biocrnpyler_417220*protein_RNAP_biocrnpyler_417220;
    r15_biocrnpyler_417220_k = 38.85714;
  r15_1_biocrnpyler_417220: complex_Core2_ON_protein_RNAP_biocrnpyler_417220 => complex_Core2_ON_biocrnpyler_417220 + protein_RNAP_biocrnpyler_417220; r15_1_biocrnpyler_417220_k*complex_Core2_ON_protein_RNAP_biocrnpyler_417220;
    r15_1_biocrnpyler_417220_k = 10;
  r17_biocrnpyler_417220: complex_Core2_ON_protein_RNAP_biocrnpyler_417220 => complex_Core2_ON_biocrnpyler_417220 + rR2_biocrnpyler_417220 + protein_RNAP_biocrnpyler_417220; r17_biocrnpyler_417220_k*complex_Core2_ON_protein_RNAP_biocrnpyler_417220;
    r17_biocrnpyler_417220_k = 0.064;
  r18_biocrnpyler_417220: Core2_OFF_biocrnpyler_417220 + protein_RNAP_biocrnpyler_417220 => complex_Core2_OFF_protein_RNAP_biocrnpyler_417220; r18_biocrnpyler_417220_k*Core2_OFF_biocrnpyler_417220*protein_RNAP_biocrnpyler_417220;
    r18_biocrnpyler_417220_k = 9.530476;
  r18_1_biocrnpyler_417220: complex_Core2_OFF_protein_RNAP_biocrnpyler_417220 => Core2_OFF_biocrnpyler_417220 + protein_RNAP_biocrnpyler_417220; r18_1_biocrnpyler_417220_k*complex_Core2_OFF_protein_RNAP_biocrnpyler_417220;
    r18_1_biocrnpyler_417220_k = 10;
  r20_biocrnpyler_417220: complex_Core2_OFF_protein_RNAP_biocrnpyler_417220 => Core2_OFF_biocrnpyler_417220 + rR2_biocrnpyler_417220 + protein_RNAP_biocrnpyler_417220; r20_biocrnpyler_417220_k*complex_Core2_OFF_protein_RNAP_biocrnpyler_417220;
    r20_biocrnpyler_417220_k = 0.007;
  r21_biocrnpyler_417220: complex_Core2_AI_biocrnpyler_417220 + protein_RNAseH_biocrnpyler_417220 => complex_Core2_AI_protein_RNAseH_biocrnpyler_417220; r21_biocrnpyler_417220_k*complex_Core2_AI_biocrnpyler_417220*protein_RNAseH_biocrnpyler_417220;
    r21_biocrnpyler_417220_k = 111.8242;
  r21_1_biocrnpyler_417220: complex_Core2_AI_protein_RNAseH_biocrnpyler_417220 => complex_Core2_AI_biocrnpyler_417220 + protein_RNAseH_biocrnpyler_417220; r21_1_biocrnpyler_417220_k*complex_Core2_AI_protein_RNAseH_biocrnpyler_417220;
    r21_1_biocrnpyler_417220_k = 10;
  r23_biocrnpyler_417220: complex_Core2_AI_protein_RNAseH_biocrnpyler_417220 => dA1_biocrnpyler_417220 + protein_RNAseH_biocrnpyler_417220; r23_biocrnpyler_417220_k*complex_Core2_AI_protein_RNAseH_biocrnpyler_417220;
    r23_biocrnpyler_417220_k = 0.176;

  // Unit definitions:
  unit square_metre = metre^2;
end
